// SBML level 2 version 1
// This model was downloaded from BioModels Database
// http://www.ebi.ac.uk/biomodels-static/

model Bungay2003_Thrombin_Generation()
  // This model is from the article:
  // A mathematical model of lipid-mediated thrombin generation
  // Bungay Sharene D., Gentry Patricia A., Gentry Rodney D. Mathematical Medicine and BiologyVolume 20, Issue 1, 1 March 2003, Pages 105-29 12974500,
  // Abstract:
  // Thrombin is an enzyme that is generated in both vascular and non-vascular systems. In blood coagulation, a fundamental process in all species, thrombin induces the formation of a fibrin clot. A dynamical model of thrombin generation in the presence of lipid surfaces is presented. This model also includes the self-regulating thrombin feedback reactions, the thrombomodulin-protein C-protein S inhibitory system, tissue factor pathway inhibitor (TFPI), and the inhibitor, antithrombin (AT). The dynamics of this complex system were found to be highly lipid dependent, as would be expected from experimental studies. Simulations of this model indicate that a threshold lipid level is required to generate physiologically relevant amounts of thrombin. The dependence of the onset, the peak levels, and the duration of thrombin generation on lipid was saturable. The lipid concentration affects the way in which the inhibitors modulate thrombin production. A novel feature of this model is the inclusion of the dynamical protein C pathway, initiated by thrombin feedback. This inhibitory system exerts its effects on the lipid surface, where its substrates are formed. The maximum impact of TFPI occurs at intermediate vesicle concentrations. Inhibition by AT is only indirectly affected by the lipid since AT irreversibly binds only to solution phase proteins. In a system with normal plasma concentrations of the proteins involved in thrombin formation, the combination of these three inhibitors is sufficient both to effectively stop thrombin generation prior to the exhaustion of its precursor, prothrombin, and to inhibit all thrombin formed. This model can be used to predict thrombin generation under extreme lipid conditions that are difficult to implement experimentally and to examine thrombin generation in non-vascular systems.
  // This model originates from BioModels Database: A Database of Annotated Published Models (http://www.ebi.ac.uk/biomodels/). It is copyright (c) 2005-2011 The BioModels.net Team.
  // For more information see the terms of use.
  // To cite BioModels Database, please use: Li C, Donizelli M, Rodriguez N, Dharuri H, Endler L, Chelliah V, Li L, He E, Henry A, Stefan MI, Snoep JL, Hucka M, Le Novère N, Laibe C (2010) BioModels Database: An enhanced, curated and annotated resource for published quantitative kinetic models. BMC Syst Biol., 4:92.
  // biomodels.db:MODEL9852292468
  // biomodels.db:BIOMD0000000334
  // isDescribedBy pubmed:12974500
  // isVersionOf GO:0007596
  // hasProperty mamo:MAMO_0000046
  // hasTaxon taxonomy:9606

  // Compartments:
  compartment compartment = 1; compartment is "Cell";

  // Species:
  species II_f in compartment = 1400;  // isVersionOf PR:000007299; occursIn BTO:0004383
  species II_l in compartment = 0;  // isVersionOf PR:000007299; hasProperty CHEBI:50967
  species mIIa_f in compartment = 0;  // isVersionOf PR:000007299; occursIn BTO:0004383
  species mIIa_l in compartment = 0;  // isVersionOf PR:000007299; hasProperty CHEBI:50967
  species V_f in compartment = 20;  // isVersionOf PR:000007300; occursIn BTO:0004383
  species V_l in compartment = 0;  // isVersionOf PR:000007300; hasProperty CHEBI:50967
  species Va_f in compartment = 0;  // isVersionOf PR:000007300; occursIn BTO:0004383
  species Va_l in compartment = 0;  // isVersionOf PR:000007300; hasProperty CHEBI:50967
  species VII_f in compartment = 10;  // isVersionOf PR:000007301; occursIn BTO:0004383
  species VII_l in compartment = 0;  // isVersionOf PR:000007301; hasProperty CHEBI:50967
  species VIIa_f in compartment = 0.1;  // isVersionOf PR:000007301; occursIn BTO:0004383
  species VIIa_l in compartment = 0;  // isVersionOf PR:000007301; hasProperty CHEBI:50967
  species VIII_f in compartment = 0.7;  // isVersionOf PR:000007302; occursIn BTO:0004383
  species VIII_l in compartment = 0;  // isVersionOf PR:000007302; hasProperty CHEBI:50967
  species VIIIa_f in compartment = 0;  // isVersionOf PR:000007302; occursIn BTO:0004383
  species VIIIa_l in compartment = 0;  // isVersionOf PR:000007302; hasProperty CHEBI:50967
  species IX_f in compartment = 90;  // isVersionOf PR:000007303; occursIn BTO:0004383
  species IX_l in compartment = 0;  // isVersionOf PR:000007303; hasProperty CHEBI:50967
  species IXa_f in compartment = 0;  // isVersionOf PR:000007303; occursIn BTO:0004383
  species IXa_l in compartment = 0;  // isVersionOf PR:000007303; hasProperty CHEBI:50967
  species X_f in compartment = 170;  // isVersionOf PR:000007294; occursIn BTO:0004383
  species X_l in compartment = 0;  // isVersionOf PR:000007294; hasProperty CHEBI:50967
  species Xa_f in compartment = 0;  // isVersionOf PR:000007294; occursIn BTO:0004383
  species Xa_l in compartment = 0;  // isVersionOf PR:000007294; hasProperty CHEBI:50967
  species APC_f in compartment = 0;  // isVersionOf PR:000013261; occursIn BTO:0004383
  species APC_l in compartment = 0;  // isVersionOf PR:000013261; hasProperty CHEBI:50967
  species PS_f in compartment = 300;  // isVersionOf PR:000013269; occursIn BTO:0004383
  species PS_l in compartment = 0;  // isVersionOf PR:000013269; hasProperty CHEBI:50967
  species VIIIai_f in compartment = 0;  // isVersionOf PR:000007302; occursIn BTO:0004383
  species VIIIai_l in compartment = 0;  // isVersionOf PR:000007302; hasProperty CHEBI:50967
  species Vai_f in compartment = 0;  // isVersionOf PR:000007300; occursIn BTO:0004383
  species Vai_l in compartment = 0;  // isVersionOf PR:000007300; hasProperty CHEBI:50967
  species PC_f in compartment = 60;  // isVersionOf PR:000013261; occursIn BTO:0004383
  species PC_l in compartment = 0;  // isVersionOf PR:000013261; hasProperty CHEBI:50967
  species TF_l in compartment = 0.005;  // isVersionOf PR:000001940; hasProperty CHEBI:50967
  species TF_VIIa_l in compartment = 0;  // hasPart PR:000007301 PR:000001940; hasProperty CHEBI:50967
  species TF_VII_l in compartment = 0;  // hasPart PR:000007301 PR:000001940; hasProperty CHEBI:50967
  species TF_VIIa_IX_l in compartment = 0;  // hasPart PR:000007301 PR:000007303 PR:000001940; hasProperty CHEBI:50967
  species TF_VIIa_IXa_l in compartment = 0;  // hasPart PR:000007301 PR:000007303 PR:000001940; hasProperty CHEBI:50967
  species TF_VIIa_X_l in compartment = 0;  // hasPart PR:000007301 PR:000007294 PR:000001940; hasProperty CHEBI:50967
  species TF_VIIa_Xa_l in compartment = 0;  // hasPart PR:000007301 PR:000007294 PR:000001940; hasProperty CHEBI:50967
  species TF_VII_Xa_l in compartment = 0;  // hasPart PR:000007301 PR:000007294 PR:000001940; hasProperty CHEBI:50967
  species IXa_VIIIa_l in compartment = 0;  // hasPart PR:000007302 PR:000007303; hasProperty CHEBI:50967
  species Xa_Va_l in compartment = 0;  // hasPart PR:000007300 PR:000007294; hasProperty CHEBI:50967
  species IXa_VIIIa_X_l in compartment = 0;  // hasPart PR:000007302 PR:000007303 PR:000007294; hasProperty CHEBI:50967
  species V_Xa_l in compartment = 0;  // hasPart PR:000007300 PR:000007294; hasProperty CHEBI:50967
  species VIII_Xa_l in compartment = 0;  // hasPart PR:000007302 PR:000007294; hasProperty CHEBI:50967
  species IIa_f in compartment = 0;  // isVersionOf PR:000007299; occursIn BTO:0004383
  species V_IIa_l in compartment = 0;  // hasPart PR:000007299 PR:000007300; hasProperty CHEBI:50967
  species VIII_IIa_l in compartment = 0;  // hasPart PR:000007299 PR:000007302; hasProperty CHEBI:50967
  species Xa_Va_II_l in compartment = 0;  // hasPart PR:000007299 PR:000007300 PR:000007294; hasProperty CHEBI:50967
  species Xa_Va_mIIa_l in compartment = 0;  // hasPart PR:000007299 PR:000007300 PR:000007294; hasProperty CHEBI:50967
  species XI_f in compartment = 30;  // isVersionOf PR:000007295; occursIn BTO:0004383
  species XI_IIa_l in compartment = 0;  // hasPart PR:000007299 PR:000007295; hasProperty CHEBI:50967
  species XIa_l in compartment = 0;  // isVersionOf PR:000007295; hasProperty CHEBI:50967
  species APC_PS_l in compartment = 0;  // hasPart PR:000013261 PR:000013269; hasProperty CHEBI:50967
  species APC_PS_VIIIa_l in compartment = 0;  // hasPart PR:000007302 PR:000013261 PR:000013269; hasProperty CHEBI:50967
  species TFPI_f in compartment = 2.5;  // isVersionOf PR:000016279; occursIn BTO:0004383
  species AT_f in compartment = 3400;  // isVersionOf PR:000003252; occursIn BTO:0004383
  species IIa_AT_f in compartment = 0;  // hasPart PR:000007299 PR:000003252; occursIn BTO:0004383
  species TFPI_Xa_l in compartment = 0;  // hasPart PR:000007294 PR:000016279; hasProperty CHEBI:50967
  species TFPI_Xa_TF_VIIa_l in compartment = 0;  // hasPart PR:000007301 PR:000007294 PR:000001940 PR:000016279; hasProperty CHEBI:50967
  species APC_PS_Va_l in compartment = 0;  // hasPart PR:000007300 PR:000013261 PR:000013269; hasProperty CHEBI:50967
  species IXa_AT_f in compartment = 0;  // hasPart PR:000007303 PR:000003252; occursIn BTO:0004383
  species Xa_AT_f in compartment = 0;  // hasPart PR:000007294 PR:000003252; occursIn BTO:0004383
  species VII_Xa_l in compartment = 0;  // hasPart PR:000007301 PR:000007294; hasProperty CHEBI:50967
  species V_mIIa_l in compartment = 0;  // hasPart PR:000007299 PR:000007300; hasProperty CHEBI:50967
  species VIII_mIIa_l in compartment = 0;  // hasPart PR:000007299 PR:000007302; hasProperty CHEBI:50967
  species TM_l in compartment = 1;  // isVersionOf PR:000002105; hasProperty CHEBI:50967
  species IIa_TM_l in compartment = 0;  // hasPart PR:000007299 PR:000002105; hasProperty CHEBI:50967
  species IIa_TM_PC_l in compartment = 0;  // hasPart PR:000007299 PR:000013261 PR:000002105; hasProperty CHEBI:50967
  species mIIa_AT_l in compartment = 0;  // hasPart PR:000007299; hasProperty CHEBI:50967
  species XIa_IX_l in compartment = 0;  // hasPart PR:000007295 PR:000007303; hasProperty CHEBI:50967
  species LIPID in compartment = 849079;  // isVersionOf CHEBI:18059

  // Parameters:
  konII = 0.0043;
  nva = 100;
  koffII = 1;
  konmIIa = 0.05;
  koffmIIa = 0.475;
  konV = 0.05;
  koffV = 0.145;
  konVa = 0.057;
  koffVa = 0.17;
  konVII = 0.05;
  koffVII = 0.66;
  konVIIa = 0.05;
  koffVIIa = 0.227;
  konVIII = 0.05;
  koffVIII = 0.1;
  konVIIIa = 0.05;
  koffVIIIa = 0.335;
  konIX = 0.05;
  koffIX = 0.115;
  konIXa = 0.05;
  koffIXa = 0.115;
  konX = 0.01;
  koffX = 1.9;
  konXa = 0.029;
  koffXa = 3.3;
  konAPC = 0.05;
  koffAPC = 3.5;
  konPS = 0.05;
  koffPS = 0.2;
  konVIIIai = 0.05;
  koffVIIIai = 0.335;
  konVai = 0.057;
  koffVai = 0.17;
  konPC = 0.05;
  koffPC = 11.5;
  k1 = 0.5;
  k2 = 0.005;
  k3 = 0.005;
  k4 = 0.005;
  k5 = 0.01;
  k6 = 2.09;
  k7 = 0.34;
  k8 = 0.1;
  k9 = 32.5;
  k10 = 1.5;
  k75 = 1;
  k11 = 0.05;
  k12 = 44.8;
  k13 = 15.2;
  k14 = 0.1;
  k15 = 0.2;
  k16 = 1;
  k17 = 1;
  k18 = 0.1;
  k19 = 10.7;
  k20 = 8.3;
  k21 = 0.1;
  k22 = 1;
  k23 = 0.043;
  k24 = 0.1;
  k25 = 2.1;
  k26 = 0.023;
  k27 = 0.1;
  k28 = 6.94;
  k29 = 0.23;
  k30 = 0.1;
  k31 = 13.8;
  k32 = 0.9;
  k33 = 0.1;
  k34 = 100;
  k35 = 0.1;
  k36 = 66;
  k37 = 13;
  k38 = 15;
  k39 = 0.05;
  k40 = 44.8;
  k41 = 15.2;
  k42 = 0.1;
  k43 = 10;
  k44 = 1.43;
  k45 = 0.1;
  k46 = 1.6;
  k47 = 0.4;
  k48 = 0.1;
  k49 = 1.6;
  k50 = 0.4;
  k51 = 0.016;
  k52 = 0.00033;
  k53 = 0.01;
  k54 = 0.0011;
  k55 = 4.9e-7;
  k56 = 2.3e-6;
  k57 = 6.83e-5;
  k58 = 0.1;
  k59 = 6.94;
  k60 = 1.035;
  k61 = 0.1;
  k62 = 13.8;
  k63 = 0.9;
  k64 = 1;
  k65 = 0.5;
  k66 = 0.1;
  k67 = 6.4;
  k68 = 3.6;
  k69 = 6.83e-6;
  k70 = 0.1;
  k71 = 0.5;
  k72 = 0.01;
  k73 = 1.417;
  k74 = 0.183;

  // Reactions:
  LB1: II_f + 100 LIPID => II_l; compartment*(konII*II_f*LIPID/nva - koffII*II_l); LB1 is "Factor II lipid binding";  // isVersionOf GO:0008289
  LB2: mIIa_f + 100 LIPID => mIIa_l; compartment*(konmIIa*mIIa_f*LIPID/nva - koffmIIa*mIIa_l); LB2 is "Factor mIIa lipid binding";  // isVersionOf GO:0008289
  LB3: V_f + 100 LIPID => V_l; compartment*(konV*V_f*LIPID/nva - koffV*V_l); LB3 is "Factor V lipid binding";  // isVersionOf GO:0008289
  LB4: Va_f + 100 LIPID => Va_l; compartment*(konVa*Va_f*LIPID/nva - koffVa*Va_l); LB4 is "Factor Va lipid binding";  // isVersionOf GO:0008289
  LB5: VII_f + 100 LIPID => VII_l; compartment*(konVII*VII_f*LIPID/nva - koffVII*VII_l); LB5 is "Factor VII lipid binding";  // isVersionOf GO:0008289
  LB6: VIIa_f + 100 LIPID => VIIa_l; compartment*(konVIIa*VIIa_f*LIPID/nva - koffVIIa*VIIa_l); LB6 is "Factor VIIa lipid binding";  // isVersionOf GO:0008289
  LB7: VIII_f + 100 LIPID => VIII_l; compartment*(konVIII*VIII_f*LIPID/nva - koffVIII*VIII_l); LB7 is "Factor VIII lipid binding";  // isVersionOf GO:0008289
  LB8: VIIIa_f + 100 LIPID => VIIIa_l; compartment*(konVIIIa*VIIIa_f*LIPID/nva - koffVIIIa*VIIIa_l); LB8 is "Factor VIIIa lipid binding";  // isVersionOf GO:0008289
  LB9: IX_f + 100 LIPID => IX_l; compartment*(konIX*IX_f*LIPID/nva - koffIX*IX_l); LB9 is "Factor IX lipid binding";  // isVersionOf GO:0008289
  LB10: IXa_f + 100 LIPID => IXa_l; compartment*(konIXa*IXa_f*LIPID/nva - koffIXa*IXa_l); LB10 is "Factor IXa lipid binding";  // isVersionOf GO:0008289
  LB11: X_f + 100 LIPID => X_l; compartment*(konX*X_f*LIPID/nva - koffX*X_l); LB11 is "Factor X lipid binding";  // isVersionOf GO:0008289
  LB12: Xa_f + 100 LIPID => Xa_l; konXa*Xa_f*LIPID/nva - koffXa*Xa_l; LB12 is "Factor Xa lipid binding";  // isVersionOf GO:0008289
  LB13: APC_f + 100 LIPID => APC_l; compartment*(konAPC*APC_f*LIPID/nva - koffAPC*APC_l); LB13 is "APC lipid binding";  // isVersionOf GO:0008289
  LB14: PS_f + 100 LIPID => PS_l; compartment*(konPS*PS_f*LIPID/nva - koffPS*PS_l); LB14 is "PS lipid binding";  // isVersionOf GO:0008289
  LB15: VIIIai_f + 100 LIPID => VIIIai_l; compartment*(konVIIIai*VIIIai_f*LIPID/nva - koffVIIIai*VIIIai_l); LB15 is "Factor VIIIai lipid binding";  // isVersionOf GO:0008289
  LB16: Vai_f + 100 LIPID => Vai_l; compartment*(konVai*Vai_f*LIPID/nva - koffVai*Vai_l); LB16 is "Factor Vai lipid binding";  // isVersionOf GO:0008289
  LB17: PC_f + 100 LIPID => PC_l; compartment*(konPC*PC_f*LIPID/nva - koffPC*PC_l); LB17 is "PC lipid binding";  // isVersionOf GO:0008289
  TF_VIIa_binding: VIIa_l + TF_l => TF_VIIa_l; compartment*(k1*TF_l*VIIa_l - k2*TF_VIIa_l);
  TF_VII_binding: VII_l + TF_l => TF_VII_l; compartment*(k3*TF_l*VII_l - k4*TF_VII_l);
  IX_TF_VIIa_binding: IX_l + TF_VIIa_l => TF_VIIa_IX_l; compartment*(k5*TF_VIIa_l*IX_l - k6*TF_VIIa_IX_l);
  R3b: TF_VIIa_IX_l => TF_VIIa_l + IXa_l; compartment*k7*TF_VIIa_IX_l; R3b is "Factor IX activation";
  X_TF_VIIa_complex_formation: X_l + TF_VIIa_l => TF_VIIa_X_l; compartment*(k8*TF_VIIa_l*X_l - k9*TF_VIIa_X_l);
  R4b: TF_VIIa_X_l => TF_VIIa_Xa_l; compartment*k10*TF_VIIa_X_l; R4b is "Factor X activation";
  R4c: TF_VIIa_Xa_l => Xa_l + TF_VIIa_l; compartment*k75*TF_VIIa_Xa_l; R4c is "Factor Xa release";
  Xa_TF_VII_binding: Xa_l + TF_VII_l => TF_VII_Xa_l; compartment*(k11*TF_VII_l*Xa_l - k12*TF_VII_Xa_l);
  R5b: TF_VII_Xa_l => Xa_l + TF_VIIa_l; compartment*k13*TF_VII_Xa_l; R5b is "TF_VII activation";
  VIIIa_IXa_binding: VIIIa_l + IXa_l => IXa_VIIIa_l; compartment*(k14*IXa_l*VIIIa_l - k15*IXa_VIIIa_l);
  Va_Xa_binding: Va_l + Xa_l => Xa_Va_l; compartment*(k16*Xa_l*Va_l - k17*Xa_Va_l);
  X_IXa_VIIIa_complex_formation: X_l + IXa_VIIIa_l => IXa_VIIIa_X_l; compartment*(k18*IXa_VIIIa_l*X_l - k19*IXa_VIIIa_X_l);
  R8b: IXa_VIIIa_X_l => Xa_l + IXa_VIIIa_l; compartment*k20*IXa_VIIIa_X_l; R8b is "Factor X activation";
  V_Xa_binding: Xa_l + V_l => V_Xa_l; compartment*(k21*V_l*Xa_l - k22*V_Xa_l);
  R9b: V_Xa_l => Xa_l + Va_l; compartment*k23*V_Xa_l; R9b is "Factor V activation";
  Xa_VIII_binding: Xa_l + VIII_l => VIII_Xa_l; k24*VIII_l*Xa_l - k25*VIII_Xa_l;
  R10b: VIII_Xa_l => Xa_l + VIIIa_l; compartment*k26*VIII_Xa_l; R10b is "Factor VIII activation";
  R11: IIa_f + V_l => V_IIa_l; compartment*(k27*V_l*IIa_f - k28*V_IIa_l);
  R11b: V_IIa_l => IIa_f + Va_l; compartment*k29*V_IIa_l;
  R12: IIa_f + VIII_l => VIII_IIa_l; compartment*(k30*VIII_l*IIa_f - k31*VIII_IIa_l);
  R12b: VIII_IIa_l => IIa_f + VIIIa_l; compartment*k32*VIII_IIa_l;
  R13: II_l + Xa_Va_l => Xa_Va_II_l; compartment*(k33*Xa_Va_l*II_l - k34*Xa_Va_II_l);
  R14: mIIa_l + Xa_Va_l => Xa_Va_mIIa_l; compartment*(k35*Xa_Va_l*mIIa_l - k36*Xa_Va_mIIa_l);
  R15: Xa_Va_II_l => Xa_Va_mIIa_l; compartment*k37*Xa_Va_II_l;
  R15b: Xa_Va_mIIa_l => IIa_f + Xa_Va_l; compartment*k38*Xa_Va_mIIa_l;
  R16: Xa_l + VII_l => VII_Xa_l; compartment*(k39*VII_l*Xa_l - k40*VII_Xa_l);
  R16b: VII_Xa_l => Xa_l + VIIa_l; compartment*k41*VII_Xa_l;
  R17: IIa_f + XI_f => XI_IIa_l; compartment*(k42*XI_f*IIa_f - k43*XI_IIa_l);
  R17b: XI_IIa_l => IIa_f + XIa_l; compartment*k44*XI_IIa_l;
  R18: VIIIa_l + APC_PS_l => APC_PS_VIIIa_l; compartment*(k45*APC_PS_l*VIIIa_l - k46*APC_PS_VIIIa_l);
  R18b: APC_PS_VIIIa_l => VIIIai_l + APC_PS_l; compartment*k47*APC_PS_VIIIa_l;
  R19: Va_l + APC_PS_l => APC_PS_Va_l; compartment*(k48*APC_PS_l*Va_l - k49*APC_PS_Va_l);
  R19b: APC_PS_Va_l => Vai_l + APC_PS_l; compartment*k50*APC_PS_Va_l;
  R20: Xa_f + TFPI_f => TFPI_Xa_l; compartment*(k51*TFPI_f*Xa_f - k52*TFPI_Xa_l);
  R21: TF_VIIa_l + TFPI_Xa_l => TFPI_Xa_TF_VIIa_l; compartment*(k53*TFPI_Xa_l*TF_VIIa_l - k54*TFPI_Xa_TF_VIIa_l);
  R22: AT_f + IXa_f => IXa_AT_f; compartment*k55*IXa_f*AT_f;
  R23: AT_f + Xa_f => Xa_AT_f; compartment*k56*Xa_f*AT_f;
  R24: AT_f + IIa_f => IIa_AT_f; compartment*k57*IIa_f*AT_f;
  R25: mIIa_l + V_l => V_mIIa_l; compartment*(k58*V_l*mIIa_l - k59*V_mIIa_l);
  R25b: V_mIIa_l => mIIa_l + Va_l; compartment*k60*V_mIIa_l;
  R26: mIIa_l + VIII_l => VIII_mIIa_l; compartment*(k61*VIII_l*mIIa_l - k62*VIII_mIIa_l);
  R26b: VIII_mIIa_l => mIIa_l + VIIIa_l; compartment*k63*VIII_mIIa_l;
  R27: TM_l + IIa_f => IIa_TM_l; compartment*(k64*IIa_f*TM_l - k65*IIa_TM_l);
  R28: PC_l + IIa_TM_l => IIa_TM_PC_l; compartment*(k66*IIa_TM_l*PC_l - k67*IIa_TM_PC_l);
  R28b: IIa_TM_PC_l => APC_l + IIa_TM_l; compartment*k68*IIa_TM_PC_l;
  R29: AT_f + mIIa_f => mIIa_AT_l; compartment*k69*mIIa_f*AT_f;
  R30: PS_l + APC_l => APC_PS_l; compartment*(k70*APC_l*PS_l - k71*APC_PS_l);
  R31: IX_l + XIa_l => XIa_IX_l; compartment*(k72*XIa_l*IX_l - k73*XIa_IX_l);
  R31b: XIa_IX_l => IXa_l + XIa_l; compartment*k74*XIa_IX_l;

  // Unit definitions:
  unit substance = 1e-9 mole; substance is "nano mole";
end
