// SBML level 2 version 4
// This model was downloaded from BioModels Database
// http://www.ebi.ac.uk/biomodels-static/

function KSA(K, S, A)
  K*S*A;
end

function Rate_Law_for_E_damage(v, S, k1, a1, k2, a2, k3, a3)
  v*S*(k1*a1 + k2*a2 + k3*a3);
end

function Rate_Law_for_Th17plas(k1, s, k2, m2, p)
  k1*s - k2*m2*p;
end

function Rate_Law_for_Effector_DC_Production_1(k, S)
  k*S;
end

function Rate_Law_for_eDC(K, S, M1, M2, k2, M3, k1)
  K*S*M1/(k1*M2 + k2*M3);
end

function Rate_Law_for_CD_Lumen_death(K, S, A1, m2, A2, m3, A3)
  K*S*(A1 + m2*A2 - m3*A3);
end

function Rate_Law_for_tDC_Production(K, S, k1, M1, M2, k2, M3, M4)
  K*S*(k1*M1/M2 + k2*M3/(M4 + 100));
end

function Rate_Law_for_M_Activation(K, S, e1, A1, A2, e2, I1)
  K*S*(e1*A1 + A2 - e2*I1);
end

function Rate_Law_for_N_Activation_Migration(v, S, m, k1, A1, k2, A2, k3, I1)
  v*S*(m*(k1*A1 + k2*A2) - k3*I1);
end
Rate_Law_for_N_Activation_Migration is "Rate Law for N Activation/Migration";

function Rate_Law_for_Commensal_Regrowth(k1, S, m1, m2, k2, P)
  k1*S*m1*m2 - k2*P;
end

function Rate_Law_for_Commensal_Harmful_Death_1(K, S, m1, A1, m2, A2)
  K*S*(m1*A1 + m2*A2);
end

model C__difficile_Host_Interactions_Model()
  // Leber2015 - Mucosal immunity and gut microbiome interaction during C. difficile infection
  // This model is described in the article:
  // Systems Modeling of Interactions between Mucosal Immunity and the Gut Microbiome during Clostridium difficile Infection.
  // Leber A, Viladomiu M, Hontecillas R, Abedi V, Philipson C, Hoops S, Howard B, Bassaganya-Riera J.
  // PLoS ONE 2015; 10(7): e0134849
  // Abstract:
  // Clostridium difficile infections are associated with the use of broad-spectrum antibiotics and result in an exuberant inflammatory response, leading to nosocomial diarrhea, colitis and even death. To better understand the dynamics of mucosal immunity during C. difficile infection from initiation through expansion to resolution, we built a computational model of the mucosal immune response to the bacterium. The model was calibrated using data from a mouse model of C. difficile infection. The model demonstrates a crucial role of T helper 17 (Th17) effector responses in the colonic lamina propria and luminal commensal bacteria populations in the clearance of C. difficile and colonic pathology, whereas regulatory T (Treg) cells responses are associated with the recovery phase. In addition, the production of anti-microbial peptides by inflamed epithelial cells and activated neutrophils in response to C. difficile infection inhibit the re-growth of beneficial commensal bacterial species. Computational simulations suggest that the removal of neutrophil and epithelial cell derived anti-microbial inhibitions, separately and together, on commensal bacterial regrowth promote recovery and minimize colonic inflammatory pathology. Simulation results predict a decrease in colonic inflammatory markers, such as neutrophilic influx and Th17 cells in the colonic lamina propria, and length of infection with accelerated commensal bacteria re-growth through altered anti-microbial inhibition. Computational modeling provides novel insights on the therapeutic value of repopulating the colonic microbiome and inducing regulatory mucosal immune responses during C. difficile infection. Thus, modeling mucosal immunity-gut microbiota interactions has the potential to guide the development of targeted fecal transplantation therapies in the context of precision medicine interventions.
  // This model is hosted on BioModels Database and identified by: BIOMD0000000583.
  // To cite BioModels Database, please use: BioModels Database: An enhanced, curated and annotated resource for published quantitative kinetic models.
  // To the extent possible under law, all copyright and related or neighbouring rights to this encoded model have been dedicated to the public domain worldwide. Please refer to CC0 Public Domain Dedication for more information.
  // biomodels.db:MODEL1507200000
  // biomodels.db:BIOMD0000000583
  // isDescribedBy pubmed:26230099
  // isVersionOf GO:0030383 GO:0006955
  // hasTaxon taxonomy:10090 taxonomy:1496
  // hasProperty DOID:0060185

  // Compartments:
  compartment Lumen = 1;  // FMA:14586
  compartment Epithelium = 4;  // isVersionOf BTO:0000416
  compartment LP = 0.07;  // isVersionOf BTO:0002330
  compartment MLN = 1;  // isVersionOf BTO:0000767

  // Species:
  species Cdiff in Lumen = 484;  // taxonomy:1496
  species Commensal_Beneficial in Lumen = 1;  // isVersionOf taxonomy:2
  species Commensal_Dead in Lumen = 5e10;  // isVersionOf taxonomy:2
  species tDC_LP in Lumen = 0;  // isVersionOf BTO:0002042; occursIn BTO:0002330
  species tDC_MLN in Lumen = 0;  // isVersionOf BTO:0002042; occursIn BTO:0000767
  species Commensal_Harmful in Lumen = 1.5e10;  // isVersionOf taxonomy:2
  species N_Lum in Lumen = 0;  // isVersionOf BTO:0000130; occursIn FMA:14586
  species E in Epithelium = 1052500;  // isVersionOf BTO:0000414
  species E_d in Epithelium = 0;  // isVersionOf BTO:0000414
  species $iDC_E in Epithelium = 500000;  // isVersionOf BTO:0002042; occursIn BTO:0000416
  species E_i in Epithelium = 0;  // isVersionOf BTO:0000414
  species M_LP in Epithelium = 3250;  // occursIn BTO:0002330; isVersionOf BTO:0000801
  species eDC_LP in LP = 0;  // isVersionOf BTO:0002042; occursIn BTO:0002330
  species $M0 in LP = 1714286;  // isVersionOf BTO:0000801
  species $N_LP in LP = 714285.7;  // occursIn BTO:0002330; isVersionOf BTO:0000130
  species Th17_LP in LP = 0;  // isVersionOf BTO:0005655; occursIn BTO:0002330
  species Th1_LP in LP = 0;  // isVersionOf BTO:0001678; occursIn BTO:0002330
  species iTreg_LP in LP = 0;  // isVersionOf BTO:0004520; occursIn BTO:0002330
  species eDC_MLN in MLN = 0;  // occursIn BTO:0000767; isVersionOf BTO:0002042
  species iTreg_MLN in MLN = 0;  // occursIn BTO:0000767; isVersionOf BTO:0004520
  species $nT in MLN = 12000000;  // isVersionOf BTO:000782
  species Th17_MLN in MLN = 0;  // occursIn BTO:0000767; isVersionOf BTO:0005655
  species Th1_MLN in MLN = 0;  // occursIn BTO:0000767; isVersionOf BTO:0001678

  // Reactions:
  Treg_Degradation: iTreg_LP => ; LP*Treg_Degradation_k1*iTreg_LP;  // modifiers: Cdiff
    Treg_Degradation_k1 = 0.5069887;
  eDC_Degradation: eDC_MLN => ; MLN*eDC_Degradation_k1*eDC_MLN;  // modifiers: iTreg_MLN
    eDC_Degradation_k1 = 1.724952e-5;
  Th17_Degradation: Th17_LP => ; LP*Th17_Degradation_k1*Th17_LP;  // modifiers: iTreg_LP
    Th17_Degradation_k1 = 2.396651;
  Th1_Degradation: Th1_LP => ; LP*Th1_Degradation_k1*Th1_LP;  // modifiers: iTreg_LP, Commensal_Dead
    Th1_Degradation_k1 = 0.9950569;
  N_Degradation: N_Lum => ; Lumen*KSA(N_Degradation_K, N_Lum, Commensal_Beneficial);  // modifiers: Commensal_Beneficial
    N_Degradation_K = 2.359329e-7;
  E_Damage: E => E_d; Epithelium*Rate_Law_for_E_damage(E_Damage_v, E, E_Damage_k1, N_Lum, E_Damage_k2, Th17_LP, E_Damage_k3, M_LP);  // modifiers: N_Lum, Th17_LP, M_LP
    E_Damage_v = 1.599207e-6; E_Damage_k1 = 1.1e-5; E_Damage_k2 = 2.338128e-6; E_Damage_k3 = 62.59116;
  eDC_Migration: eDC_LP => eDC_MLN; eDC_Migration_k1*eDC_LP;
    eDC_Migration_k1 = 10.5;
  eDC_Production: $iDC_E + Cdiff => eDC_LP; Rate_Law_for_Effector_DC_Production_1(eDC_Production_k, Cdiff);  // modifiers: Commensal_Dead, Commensal_Beneficial
    eDC_Production_k = 0.55;
  Cdiff_Death: Cdiff => ; Lumen*Rate_Law_for_CD_Lumen_death(Cdiff_Death_K, Cdiff, M_LP, m2, N_Lum, m3, Commensal_Harmful);  // modifiers: M_LP, N_Lum, Commensal_Harmful
    Cdiff_Death_K = 6.270923e-10; m2 = 594.8965; m3 = 0.1027025;
  N_Activation_Migration: $N_LP => N_Lum; Rate_Law_for_N_Activation_Migration(N_Activation_Migration_v, N_LP, Cdiff, N_Activation_Migration_k1, E_d, N_Activation_Migration_k2, Th17_LP, N_Activation_Migration_k3, iTreg_LP); N_Activation_Migration is "N Activation/Migration";  // modifiers: Cdiff, E_d, Th17_LP, iTreg_LP
    N_Activation_Migration_v = 5.298279e-5; N_Activation_Migration_k1 = 0.1209353; N_Activation_Migration_k2 = 0.1711907; N_Activation_Migration_k3 = 0.1297173;
  Cdiff_Growth: Cdiff => 2 Cdiff; Lumen*KSA(Cdiff_Growth_K, Cdiff, Commensal_Harmful);  // modifiers: Commensal_Harmful, Commensal_Beneficial
    Cdiff_Growth_K = 5e-11;
  Treg_Migration: iTreg_MLN => iTreg_LP; Treg_Migration_k1*iTreg_MLN;  // modifiers: E_i
    Treg_Migration_k1 = 5.5;
  Th1_Migration: Th1_MLN => Th1_LP; Th1_Migration_k1*Th1_MLN;  // modifiers: E_i
    Th1_Migration_k1 = 1.459;
  Th17_Plasticity: Th17_LP -> iTreg_LP; LP*Rate_Law_for_Th17plas(Th17_Plasticity_k1, Th17_LP, Th17_Plasticity_k2, Cdiff, iTreg_LP);  // modifiers: Cdiff
    Th17_Plasticity_k1 = 1.273932; Th17_Plasticity_k2 = 0.002040146;
  Th17_Migration: Th17_MLN => Th17_LP; Th17_Migration_k1*Th17_MLN;  // modifiers: E_i
    Th17_Migration_k1 = 2.504544;
  E_Inflame: E => E_i; Epithelium*KSA(E_Inflame_K, E, Cdiff);  // modifiers: Cdiff
    E_Inflame_K = 0.0001710798;
  E_i_Damage: E_i => E_d; Epithelium*Rate_Law_for_E_damage(E_i_Damage_v, E_i, E_i_Damage_k1, N_Lum, E_i_Damage_k2, Th17_LP, E_i_Damage_k3, M_LP);  // modifiers: N_Lum, Th17_LP, M_LP
    E_i_Damage_v = 0.065; E_i_Damage_k1 = 0.006; E_i_Damage_k2 = 0.01066983; E_i_Damage_k3 = 1.160135e-6;
  M_Activation: $M0 => M_LP; Rate_Law_for_M_Activation(M_Activation_K, M0, e1, Th17_LP, Cdiff, e2, iTreg_LP);  // modifiers: Th17_LP, Cdiff, iTreg_LP
    M_Activation_K = 4.5e-5; e1 = 2; e2 = 0.09230859;
  M_Death: M_LP => ; Epithelium*M_Death_k1*M_LP;  // modifiers: iTreg_LP
    M_Death_k1 = 20;
  Commensal_Regrowth: Commensal_Beneficial -> Commensal_Dead; Lumen*Rate_Law_for_Commensal_Regrowth(Commensal_Regrowth_k1, Commensal_Beneficial, N_Lum, E_i, Commensal_Regrowth_k2, Commensal_Dead);  // modifiers: N_Lum, E_i
    Commensal_Regrowth_k1 = 4.5e-10; Commensal_Regrowth_k2 = 0.1562874;
  E_Heal: E_d => E; Epithelium*E_Heal_k1*E_d;
    E_Heal_k1 = 4000;
  tDC_Production: $iDC_E + Cdiff => tDC_LP; Rate_Law_for_tDC_Production(tDC_Production_K, Cdiff, tDC_Production_k1, Commensal_Beneficial, Commensal_Dead, tDC_Production_k2, E, E_i);  // modifiers: Commensal_Beneficial, Commensal_Dead, E, E_i
    tDC_Production_K = 0.0002; tDC_Production_k1 = 559.2971; tDC_Production_k2 = 26.87473;
  tDC_Migration: tDC_LP => tDC_MLN; Lumen*tDC_Migration_k1*tDC_LP;
    tDC_Migration_k1 = 3.65;
  tDC_Degradation: tDC_MLN => ; Lumen*Rate_Law_for_Effector_DC_Production_1(tDC_Degradation_k, tDC_MLN);  // modifiers: iTreg_MLN
    tDC_Degradation_k = 0.00095;
  Th17_Differentiation: eDC_MLN => Th17_MLN; MLN*Th17_Differentiation_k1*eDC_MLN;
    Th17_Differentiation_k1 = 2255.805;
  Th1_Differentiation: eDC_MLN => Th1_MLN; MLN*Rate_Law_for_eDC(Th1_Differentiation_K, eDC_MLN, Commensal_Dead, Commensal_Beneficial, Th1_Differentiation_k2, E, Th1_Differentiation_k1);  // modifiers: Commensal_Dead, Commensal_Beneficial, E
    Th1_Differentiation_K = 0.0430096; Th1_Differentiation_k2 = 9.655681e-5; Th1_Differentiation_k1 = 0.06484158;
  Treg_Differentiation: tDC_MLN => iTreg_MLN; Treg_Differentiation_k1*tDC_MLN;
    Treg_Differentiation_k1 = 53.91306;
  Commensal_Harmful_Death: Commensal_Harmful => ; Lumen*Rate_Law_for_Commensal_Harmful_Death_1(Commensal_Harmful_Death_K, Commensal_Harmful, N_LP, A1, E_i, A2);  // modifiers: N_LP, E_i
    Commensal_Harmful_Death_K = 2.33225e-5; A1 = 0.00478; A2 = 0.18;
  Commensal_Death: Commensal_Dead => ; Lumen*Commensal_Death_k1*Commensal_Dead;
    Commensal_Death_k1 = 0.09332775;
  E_i_Natural_Death: E_i => E_d; Epithelium*E_i_Natural_Death_k1*E_i;
    E_i_Natural_Death_k1 = 2.5;

  // Unit definitions:
  unit volume = dimensionless;
  unit time = 86400 second;
  unit substance = item;
end
