// SBML level 2 version 4

model alexander2()

  // Compartments:
  compartment body = 1;

  // Species:
  substanceOnly species A in body = 1;  // isVersionOf CL:0000145
  substanceOnly species $A_im in body = 0;  // isVersionOf CL:0000473
  substanceOnly species E in body = 0;  // isVersionOf CL:0000911
  substanceOnly species G in body = 100000000;  // isVersionOf CHEBI:59132
  substanceOnly species R in body = 0;  // isVersionOf CL:0000903

  // Parameters:
  R0 has dimensionless;
  b1 = 0.25 per_day;
  beta = 200 per_day;
  f = 0.0001 dimensionless;
  gamma = 2000 per_day;
  k = 50000000;
  lambdaE = 1000 per_day;
  mA has per_day;
  mG has per_day;
  muA = 0.25 per_day;
  muE = 0.25 per_day;
  muG = 5 per_day;
  muR = 0.25 per_day;
  pi1 = 0.016 per_day_per_item;
  sigma1 = 3e-6 per_day_per_item;
  v_max = 125000 items_per_day;

  // Assignment rules:
  R0 := f*(v_max/k)*lambdaE*gamma/(mG*mA*muE);
  mG := muG + v_max/k;
  mA := b1 + muA;
  observable_task0_model0_alexander2_E := E;
  observable_task0_model0_alexander2_R := R;
  observable_task0_model0_alexander2_G := G;
  observable_task0_model0_alexander2_A := A;
  observable_task1_model1_alexander2_A := A;
  observable_task1_model1_alexander2_E := E;
  observable_task1_model1_alexander2_R := R;
  observable_task1_model1_alexander2_G := G;

  // Reactions:
  r10: A => ; b1*A; r10 is "r10: A suppression by Tregs of other specificity";
  r11_A_suppression_by_R: A => ; sigma1*A*R; r11_A_suppression_by_R is "r11: A suppression by R";  // modifiers: R
  r1a: G => ; v_max/(k + G)*G; r1a is "r1a: self-antigen uptake";
  r1b: $A_im => A; f*(v_max/(k + G))*G; r1b is "r1b: pAPC maturation";  // modifiers: G
  r2: => G; gamma*E; r2 is "r2: self-antigen release triggered by E";  // modifiers: E
  r3_R_activation_by_A: => R; beta*A; r3_R_activation_by_A is "r3: R activation by A";  // modifiers: A
  r4_R_activation_by_A_and_E: => R; pi1*E*A; r4_R_activation_by_A_and_E is "r4: R activation by A and E";  // modifiers: A, E
  r5_E_generation_by_A: => E; lambdaE*A; r5_E_generation_by_A is "r5: E generation by A";  // modifiers: A
  r6_A_death: A => ; muA*A; r6_A_death is "r6: A death";
  r7_R_death: R => ; muR*R; r7_R_death is "r7: R death";
  r8_E_death: E => ; muE*E; r8_E_death is "r8: E death";
  r9_G_clearance: G => ; muG*G; r9_G_clearance is "r9: G clearance";

  // Unit definitions:
  unit number = item;
  unit days = 86400 second;
  unit per_day = 1 / (86400 second);
  unit per_day_per_item = 1 / (86400 second * item);
  unit items_per_day = item / (86400 second);
end
