// SBML level 3 version 1

model alsheihk1()

  // Compartments:
  compartment default = 1;

  // Species:
  species A in default = 1800; A is "AIDS";
  species $EXT in default = 1;
  species I1 in default = 5400; I1 is "Unaware infected";
  species I2 in default = 4500; I2 is "Aware infected";
  species S in default = 15300; S is "Susceptible";

  // Parameters:
  Beta_1 = 0.0009;
  Beta_2 = 0.00027;
  Delta = 0.3;
  Mu = 0.04;
  Q_0 = 3000;
  Theta = 0.02;
  d = 1;

  // Assignment rules:
  observable_task0_model0_alsheihk1_I1 := I1;
  observable_plot1_I1_datagen1 := task1_model1_alsheihk1_I1;
  observable_plot2_I1_datagen1 := task2_model2_alsheihk1_I1;

  // Reactions:
  v_1: $EXT -> S; Q_0;
  v_10: A -> $EXT; d*A;
  v_2: S -> I1; (Beta_1*I1 + Beta_2*I2)*S;  // modifiers: I2
  v_3: S -> $EXT; Mu*S;
  v_4: I1 -> I2; Theta*I1;
  v_5: I1 -> $EXT; Mu*I1;
  v_6: I1 -> A; Delta*I1;
  v_7: I2 -> $EXT; Mu*I2;
  v_8: I2 -> A; Delta*I2;
  v_9: A -> $EXT; Mu*A;
end
