// SBML level 3 version 1

model bachar1()

  // Compartments:
  compartment default = 1;

  // Species:
  species $EXT in default = 1;
  species I1 in default = 50; I1 is "Infectious stage 1";
  species I2 in default = 0; I2 is "Infectious stage 2";
  species S in default = 4950; S is "Susceptible";

  // Parameters:
  Alpha = 0.2;
  Beta = 0.5;
  a = 0.6;
  b = 0.001;
  c = 0.3;
  d = 0.0006;
  k1 = 0.019;
  k2 = 0.0159;

  // Assignment rules:
  N := S + I1 + I2;
  observable_task0_model0_bachar1_I1 := I1;
  observable_task0_model0_bachar1_I2 := I2;
  observable_task0_model0_bachar1_N := N;

  // Reactions:
  v_1: $EXT -> S; b*(S + I1 + I2);  // modifiers: I1, I2
  v_2: S -> I1; c*Beta*(I1 + a*I2)*S/(S + I1 + I2);  // modifiers: I2
  v_3: S -> $EXT; d*S;
  v_4: I1 -> $EXT; d*I1;
  v_5: I1 -> I2; k1*I1;
  v_6: I2 -> I1; Alpha*I2;
  v_7: I2 -> $EXT; d*I2;
  v_8: I2 -> $EXT; k2*I2;
end
