// SBML level 2 version 4

model balagadde1()
  // balaggade1

  // Compartments:
  compartment environment = 1;  // GO:0005576

  // Species:
  // 3OC12HSL
  species A1 in environment = 0.1;  // CHEBI:56080
  // 3OC6HSL
  species A2 in environment = 0.1;  // CHEBI:55474 kegg.compound:C18049
  // predator cells (MG1655) (per 103 cells per microlitre)
  species C1 in environment = 20;  // isVersionOf taxonomy:562
  // prey cells (Top10F) (per 103 cells per microlitre)
  species C2 in environment = 20;  // isVersionOf taxonomy:562
  // IPTG default 5 nM
  species IPTG in environment = 5;  // CHEBI:61448 pubchem.compound:656894
  species $sink in environment = 0;
  species $source in environment = 0;

  // Parameters:
  // Cell carrying capacity
  Cm = 100;
  // Dilution rate
  D = 0.1125;
  // A2 (3OC6HSL) concentration for half-maximal inhibition of PluxI promoter
  K1 = 10;
  // A1 (3OC12HSL) concentration for half-maximal activation of PluxI promoter
  K2 = 10;
  // prey cell death rate constant
  d2 = 0.3;
  // cellular A1 (3OC12HSL) decay rate constant
  dAA1 = 0.017;
  // cellular A2 (3OC6HSL) decay rate constant
  dAA2 = 0.11;
  // predator cell A1 (3OC12HSL) synthesis rate costant
  kA1 = 0.1;
  // predator cell growth rate constant
  kc1 = 0.8;
  // prey cell growth rate constant
  kc2 = 0.4;

  // Assignment rules:
  kA2 := 0.02 + 0.03*(IPTG^2/(5^2 + IPTG^2));
  d1 := 0.5 + IPTG^2/(5^2 + IPTG^2);
  observable_task0_model0_balagadde1_C1 := C1;
  observable_task0_model0_balagadde1_C2 := C2;
  observable_task2_model2_balagadde1_C1 := C1;
  observable_task2_model2_balagadde1_C2 := C2;
  observable_task1_model1_balagadde1_C1 := C1;
  observable_task1_model1_balagadde1_C2 := C2;

  // Reactions:
  J0: $source => C1; environment*kc1*C1*(1 - (C1 + C2)/Cm); J0 is "predator growth";  // modifiers: C2; isVersionOf GO:0008283
  J1: C1 => $sink; environment*(D + d1*K1/(K1 + A2^2))*C1; J1 is "predator death";  // modifiers: A2; isVersionOf GO:0008219
  J2: $source => C2; environment*kc2*C2*(1 - (C1 + C2)/Cm); J2 is "prey growth";  // modifiers: C1; GO:0008283
  J3: C2 => $sink; environment*(D + d2*A1^2/(K2 + A1^2))*C2; J3 is "prey death";  // modifiers: A1; isVersionOf GO:0008219
  J4: $source => A1; environment*kA1*C1; J4 is "3OC12HSL synthesis";  // modifiers: C1; hasVersion ec-code:2.3.1.184 GO:0009058
  J5: A1 => $sink; environment*(dAA1 + D)*A1; J5 is "3OC12HSL removal";  // isVersionOf GO:0009056
  J6: $source => A2; environment*kA2*C2; J6 is "3OC6HSL synthesis";  // modifiers: C2; GO:0009058 ec-code:2.3.1.184
  J7: A2 => $sink; environment*(dAA2 + D)*A2; J7 is "3OC6HSL removal";  // isVersionOf GO:0009056

  // Unit definitions:
  unit nanomole = 1e-9 mole;
  unit hours = 3600 second;
end
