// SBML level 2 version 4

model becker1()

  // Compartments:
  compartment cell = 1;  // isVersionOf GO:0005623
  compartment cellsurface = 1;  // isVersionOf GO:0009986
  compartment medium = 1;  // isVersionOf BTO:0000316

  // Species:
  species Epo in medium = 2030.19;  // isEncodedBy ensembl:ENSMUSG00000029711 uniprot:P07321 kegg.orthology:K05437
  species EpoR in cellsurface = 516;  // isEncodedBy ensembl:ENSMUSG00000006235 uniprot:P14753 kegg.orthology:K05079
  species Epo_EpoR in cellsurface = 0;  // hasPart uniprot:P14753 uniprot:P07321 kegg.orthology:K05079 kegg.orthology:K05437
  species Epo_EpoRi in cell = 0;  // hasPart uniprot:P14753 uniprot:P07321 kegg.orthology:K05079 kegg.orthology:K05437
  species dEpoe in medium = 0;
  species dEpoi in cell = 0;

  // Parameters:
  Bmax = 516 pM;
  kde = 0.0164042 per_minute;
  kdi = 0.00317871 per_minute;
  ke = 0.0748267 per_minute;
  kex = 0.00993805 per_minute;
  koff = 0.0172135 per_minute;
  kon = 0.00010496 per_minute_per_pM;
  kt = 0.0329366 per_minute;

  // Assignment rules:
  Epo_cells := Epo_EpoRi + dEpoi;
  Epo_medium := Epo + dEpoe;
  observable_task0_model0_becker1_Epo_medium := Epo_medium;
  observable_task0_model0_becker1_Epo_EpoR := Epo_EpoR;
  observable_task0_model0_becker1_Epo_cells := Epo_cells;

  // Reactions:
  reaction_1: => EpoR; kt*Bmax*cell;  // isVersionOf GO:0032800
  reaction_2: EpoR => ; kt*EpoR*cell;  // isVersionOf GO:0032801
  reaction_3: Epo + EpoR => Epo_EpoR; kon*Epo*EpoR*cell;  // isVersionOf GO:0005128 GO:0005102
  reaction_4: Epo_EpoR => Epo + EpoR; koff*Epo_EpoR*cell;  // isVersionOf GO:0043241
  reaction_5: Epo_EpoR => Epo_EpoRi; ke*Epo_EpoR*cell;  // isVersionOf GO:0015031
  reaction_6: Epo_EpoRi => Epo + EpoR; kex*Epo_EpoRi*cell;  // isVersionOf GO:0043241
  reaction_7: Epo_EpoRi => dEpoi; kdi*Epo_EpoRi*cell;  // isVersionOf GO:0030163
  reaction_8: Epo_EpoRi => dEpoe; kde*Epo_EpoRi*cell;  // isVersionOf GO:0030163

  // Unit definitions:
  unit minute = 60 second;
  unit per_minute = 1 / (60 second);
  unit picomole = 1e-12 mole;
  unit pM = 1e-12 mole / litre;
  unit per_minute_per_pM = litre / (60 second * 1e-12 mole);
end
