// SBML level 2 version 4

model becker2()

  // Compartments:
  compartment cell = 1;  // isVersionOf GO:0005623
  compartment cellsurface = 1;  // isVersionOf GO:0009986
  compartment medium = 1;  // isVersionOf BTO:0000316

  // Species:
  species EpoR in cellsurface = 76;  // isVersionOf uniprot:P14753 kegg.orthology:K05079
  species SAv in medium = 999.293;  // isVersionOf uniprot:P22629
  species SAv_EpoR in cellsurface = 0;  // hasPart uniprot:P14753 uniprot:P22629
  species SAv_EpoRi in cell = 0;  // hasPart uniprot:P14753 uniprot:P22629
  species dSAve in medium = 0;
  species dSAvi in cell = 0;

  // Parameters:
  Bmax_SAv = 76 pM;
  kde = 0.0164042 per_minute;
  kdi = 0.00317871 per_minute;
  kex_SAv = 0.01101 per_minute;
  koff_SAv = 0.00679946 per_minute;
  kon_SAv = 2.29402e-6 per_minute_per_pM;
  kt = 0.0329366 per_minute;

  // Assignment rules:
  SAv_cells := SAv_EpoRi + dSAvi;
  SAv_medium := SAv + dSAve;
  observable_task0_model0_becker2_SAv_EpoR := SAv_EpoR;
  observable_task0_model0_becker2_SAv_cells := SAv_cells;
  observable_task0_model0_becker2_SAv_medium := SAv_medium;

  // Reactions:
  reaction_1: => EpoR; kt*Bmax_SAv*cell;  // isVersionOf GO:0032800
  reaction_2: EpoR => ; kt*EpoR*cell;  // isVersionOf GO:0032801
  reaction_3: SAv + EpoR => SAv_EpoR; kon_SAv*SAv*EpoR*cell;  // isVersionOf GO:0005102 GO:0005128
  reaction_4: SAv_EpoR => SAv + EpoR; koff_SAv*SAv_EpoR*cell;  // isVersionOf GO:0043241
  reaction_5: SAv_EpoR => SAv_EpoRi; kt*SAv_EpoR*cell;  // isVersionOf GO:0015031
  reaction_6: SAv_EpoRi => SAv; kex_SAv*SAv_EpoRi*cell;  // isVersionOf GO:0043241
  reaction_7: SAv_EpoRi => dSAvi; kdi*SAv_EpoRi*cell;  // isVersionOf GO:0030163
  reaction_8: SAv_EpoRi => dSAve; kde*SAv_EpoRi*cell;  // isVersionOf GO:0030163

  // Unit definitions:
  unit minute = 60 second;
  unit picomole = 1e-12 mole;
  unit per_minute = 1 / (60 second);
  unit pM = 1e-12 mole / litre;
  unit per_minute_per_pM = litre / (60 second * 1e-12 mole);
end
