// SBML level 2 version 4

function TNFa_transcription_initiation(kbasal, vA, A, kA)
  kbasal + vA*A/(A + kA);
end

function activated_Transcription__1(k1, k2, Modifier, k3, Modifier2, Modifier3, k4)
  k1 + k2*Modifier + k3*Modifier2 + k4*Modifier3;
end
activated_Transcription__1 is "activated Transcription [1]";

function Catalytic_activation__irrev(substrate, Activator, Kms, V, Ka)
  V*substrate*Activator/((Kms + substrate)*(Ka + Activator));
end
Catalytic_activation__irrev is "Catalytic activation (irrev)";

function Henri_Michaelis_Menten__irreversible(substrate, Km, V)
  V*substrate/(Km + substrate);
end
Henri_Michaelis_Menten__irreversible is "Henri-Michaelis-Menten (irreversible)";

model beuke7()

  // Compartments:
  compartment EL = 2.59e-6;
  compartment LSEC = 4.7e-7;
  compartment MC = 3.5e-7;
  compartment nucleus = 8e-7;
  compartment default = 1.3e-5; default is "cytoplasm";

  // Species:
  species IkBa_cytoplasm in default = 0.4028452;
  species IkBa_mRNA_cytoplasm in default = 6.286329;
  species IkBa_mRNA_nucleus in nucleus = 0.0001571662;
  species IkBa_pre_mRNA_1 in nucleus = 7.181403;
  species IkBa_pre_mRNA_2 in nucleus = 7.181403;
  species JNK in default = 0.9804662;
  species JNK_P in default = 0.0195338;
  species LPS in EL = 5;
  species MSK1 in nucleus = 14.99993;
  species MSK1_P in nucleus = 6.93269e-5;
  species TNFR1_EL in EL = 0.001228346;
  species TNFR1_cytoplasm in default = 5.527559e-5;
  species TNFa_TNFR1_EL in EL = 0; TNFa_TNFR1_EL is "TNFa:TNFR1";
  species TNFa_TNFR1_cytoplasm in default = 0; TNFa_TNFR1_cytoplasm is "TNFa:TNFR1";
  species TNFa_mRNA_LSEC in LSEC = 0;
  species TNFa_mRNA_MC in MC = 0;
  species TNFa_pre_mRNA_LSEC in LSEC = 0;
  species TNFa_pre_mRNA_MC in MC = 0;
  species p38 in default = 0.9296507;
  species p38_P in default = 0.07034926;
  species p65_2P in nucleus = 2.189218e-7;
  species p65_IkBa_nucleus in nucleus = 0.9956521; p65_IkBa_nucleus is "p65-IkBa";
  species p65_cytoplasm in default = 0.0008222262;
  species $p65_mRNA in default = 1;
  species p65_nucleus in nucleus = 0.04110301;
  species IkBa in nucleus = 0.8056902;
  species IKKb in default = 0.2999899;
  species IKKb_p in default = 1.013073e-5;
  species TNFa in EL = 0;
  species p65_IkBa in default = 0.04978469; p65_IkBa is "p65-IkBa";
  species p65_P_default in default = 0.003768856;
  species IkBa_p in default = 0.05667779;
  species p65_P_nucleus in nucleus = 0.1884146;

  // Parameters:
  IKKb_active_phosphorylation_kA = 0.2431463;
  IKKb_active_phosphorylation_kM = 5;
  IKKb_active_phosphorylation_vmax = 277.1039;
  IKKb_basal_phosphoylation_k = 1.023447e-7;
  IKKb_dephopshorylation_k = 0.003030616;
  IkBa_deg_complex_cyt_k = 1e-5;
  IkBa_deg_complex_nuc_k = 1e-5;
  IkBa_deg_cyt_k = 5e-5;
  IkBa_deg_nuc_k = 1e-5;
  IkBa_mRNA_deg_cyt_k = 0.0001923174;
  IkBa_mRNA_deg_nuc_k = 5e-5;
  IkBa_mRNA_transport_k = 0.0001;
  IkBa_nuclear_import_k = 0.005;
  IkBa_p65_association_k = 0.01538897; IkBa_p65_association_k is "IkBa:p65_association_k";
  var IkBa_p65_dissociation_k; IkBa_p65_dissociation_k is "IkBa:p65_dissociation_k";
  IkBa_p65_nuclear_export_k = 0.0001000045; IkBa_p65_nuclear_export_k is "IkBa:p65_nuclear_export_k";
  IkBa_p65_nuclear_import_k = 0.002; IkBa_p65_nuclear_import_k is "IkBa:p65_nuclear_import_k";
  IkBa_p65_phosphorylation_kM = 0.3722921; IkBa_p65_phosphorylation_kM is "IkBa:p65_phosphorylation_kM";
  IkBa_p65_phosphorylation_kcat = 24.05598; IkBa_p65_phosphorylation_kcat is "IkBa:p65_phosphorylation_kcat";
  var IkBa_p65_phosphorylation_vmax; IkBa_p65_phosphorylation_vmax is "IkBa:p65_phosphorylation_vmax";
  IkBa_p_active_degradation_k = 0.003951592;
  IkBa_phosphorylation_kM = 0.1000449;
  IkBa_transcription_elongation_kbasal = 0.002735647;
  IkBa_transcription_initiation_kbasal = 1e-6;
  IkBa_transcription_kA2_p65_P = 0.0001;
  IkBa_transcription_kA3_p65_2P = 0.0001003929;
  IkBa_transcription_kA_p65 = 0.4774818;
  IkBa_translation_Km = 10;
  IkBa_translation_vmax = 0.0006365899;
  JNK_active_phoshorylation_Km = 5.536313;
  JNK_active_phosphorylation_kcat = 42478.02;
  JNK_basal_phosphorylation_k = 1.40201e-5;
  JNK_dephosphorylation_k = 0.0007037154;
  LPS_LSEC_degradation_k = 0.0002813754;
  LPS_MC_degradation_k = 0.000133176;
  MSK1_activation_kM = 0.332175;
  MSK1_dephosphorylation_k = 0.01;
  MSK1_phosphorylation_kcat = 1.007291e-5;
  TNFa_LSEC_transcription_elongation_k = 1e-6;
  TNFa_LSEC_transcription_initiation_kA_LPS = 1.024382;
  TNFa_LSEC_transcription_initiation_kbasal = 0;
  TNFa_LSEC_transcription_initiation_vA_LPS = 1.194383e-5;
  TNFa_LSEC_translation_k = 2.120907e-5;
  TNFa_MC_transcription_elongation_k = 1e-6;
  TNFa_MC_transcription_initiation_kA_LPS = 0.7778474;
  TNFa_MC_transcription_initiation_kbasal = 0;
  TNFa_MC_transcription_initiation_vA_LPS = 5.607063e-6;
  TNFa_MC_translation_k = 2.054553e-6;
  TNFa_degradation_k = 0.0001252637;
  TNFa_mRNA_LSEC_degradation_k = 0.6056947;
  TNFa_mRNA_MC_degradation_k = 0.0541021;
  k_IkBa = 159472;
  k_IkBa_P = 666711.1;
  k_IkBa_mRNA = 4459.194;
  k_JNK_P = 2685090;
  k_MSK_P = 1.174411e10;
  k_TNFR1_outer_membrane2vessicle_shuttle = 1.8e-5;
  k_TNFR1_vessicle2outer_membrane_shuttle = 0.0004;
  k_TNFa_TNFR1_association = 16.833; k_TNFa_TNFR1_association is "k_TNFa:TNFR1_association";
  var k_TNFa_TNFR1_dissociation; k_TNFa_TNFR1_dissociation is "k_TNFa:TNFR1_dissociation";
  k_TNFa_TNFR1_internalisation = 0.00077; k_TNFa_TNFR1_internalisation is "k_TNFa:TNFR1_internalisation";
  k_TNFa_internal_degradation = 6.900762e-5;
  k_p38_P = 899937.8;
  k_p65 = 0.1023721;
  k_p65_P = 2803254;
  p38_active_phoshorylation_Km = 9.996013;
  p38_active_phosphorylation_kcat = 284561.3;
  p38_basal_phosphorylation_k = 8.040345e-5;
  p38_dephosphorylation_k = 0.001062515;
  p65_MSK1_phosphorylation_kM = 0.005503757;
  p65_MSK1_phosphrylation_kcat = 3.187593e-6;
  p65_P_dephosphorylation_k = 0.001857716;
  p65_degradation_k = 1.328912e-5;
  p65_nuclear_import_k = 0.0005;
  p65_translation_k = 1.68e-6;

  // Assignment rules:
  IkBa_p65_phosphorylation_vmax := IkBa_p65_phosphorylation_kcat*IKKb_p;
  p65_2P_dephosphorylation := p65_P_dephosphorylation_k*1;
  IkBa_p65_dissociation_k := IkBa_p65_association_k*0.003;
  scaled_IkBa_mRNA := k_IkBa_mRNA*unscaled_IkBa_mRNA;
  IkBa_nuclear_export_k := IkBa_nuclear_import_k*0.5;
  unscaled_p38_P := default*p38_P;
  k_TNFa_TNFR1_dissociation := k_TNFa_TNFR1_association*1.9e-5;
  unscaled_JNK_P := default*JNK_P;
  p65_P_MSK1_phosphrylation_kcat := p65_MSK1_phosphrylation_kcat*1;
  IkBa_phosphorylation_kcat := IkBa_p65_phosphorylation_kcat;
  IkBa_phosphorylation_vmax := IkBa_phosphorylation_kcat*IKKb_p;
  scaled_IkBa := k_IkBa*unscaled_IkBa;
  unscaled_IkBa_P := IkBa_p*default;
  scaled_IkBa_P := k_IkBa_P*unscaled_IkBa_P;
  scaled_p65 := k_p65*unscaled_p65;
  unscaled_p65_P := nucleus*p65_P_nucleus + default*p65_P_default;
  unscaled_MSK_P := nucleus*MSK1_P;
  p65_MSK1_phosphrylation_vmax := p65_MSK1_phosphrylation_kcat*MSK1_P;
  p65_P_MSK1_phosphrylation_vmax := p65_P_MSK1_phosphrylation_kcat*MSK1_P;
  scaled_p38_P := k_p38_P*unscaled_p38_P;
  p65_P_MSK1_phosphrylation_kM := p65_MSK1_phosphorylation_kM*1;
  scaled_MSK_P := k_MSK_P*unscaled_MSK_P;
  scaled_p65_P := k_p65_P*unscaled_p65_P;
  unscaled_p65 := (p65_P_default + p65_IkBa + p65_cytoplasm)*default + nucleus*(p65_P_nucleus + p65_IkBa_nucleus + p65_nucleus + p65_2P);
  unscaled_IkBa := (IkBa + p65_IkBa_nucleus)*nucleus + (IkBa_p + p65_IkBa + IkBa_cytoplasm)*default;
  p65_nuclear_export_k := p65_nuclear_import_k*0.02;
  scaled_JNK_P := k_JNK_P*unscaled_JNK_P;
  JNK_active_phosphorylation_vmax := JNK_active_phosphorylation_kcat*TNFa_TNFR1_EL;
  p38_active_phosphorylation_vmax := p38_active_phosphorylation_kcat*TNFa_TNFR1_EL;
  unscaled_IkBa_mRNA := IkBa_mRNA_cytoplasm*default + nucleus*IkBa_mRNA_nucleus;
  MSK1_activation_vmax := MSK1_phosphorylation_kcat*p38_P;
  observable_dg_fix_343 := task29_model29_beuke30_scaled_IkBa;
  observable_dg_fix_345 := task29_model29_beuke30_scaled_IkBa_P;
  observable_dg_fix_347 := task29_model29_beuke30_scaled_IkBa_mRNA;
  observable_dg_fix_349 := task29_model29_beuke30_s16;
  observable_dg_fix_351 := task29_model29_beuke30_scaled_p65_P;
  observable_task0_model0_beuke1_scaled_p65_P := scaled_p65_P;
  observable_dg_fix_5 := task0_model0_beuke1_scaled_IkBa_P;
  observable_dg_fix_80 := task0_model0_beuke1_scaled_IkBa;
  observable_dg_fix_86 := task0_model0_beuke1_s16;
  observable_dg_fix_96 := task0_model0_beuke1_scaled_IkBa_mRNA;
  observable_dg_fix_1 := task1_model1_beuke2_scaled_p65_P;
  observable_dg_fix_7 := task1_model1_beuke2_scaled_IkBa_P;
  observable_task1_model1_beuke2_scaled_IkBa := scaled_IkBa;
  observable_dg_fix_82 := task1_model1_beuke2_s16;
  observable_dg_fix_94 := task1_model1_beuke2_scaled_IkBa_mRNA;
  observable_task2_model2_beuke3_s16 := TNFa;
  observable_dg_fix_9 := task2_model2_beuke3_scaled_IkBa_P;
  observable_dg_fix_92 := task2_model2_beuke3_scaled_IkBa_mRNA;
  observable_dg_fix_3 := task2_model2_beuke3_scaled_IkBa;
  observable_dg_fix_88 := task2_model2_beuke3_scaled_p65_P;
  observable_task3_model3_beuke4_scaled_IkBa_mRNA := scaled_IkBa_mRNA;
  observable_dg_fix_11 := task3_model3_beuke4_scaled_IkBa_P;
  observable_dg_fix_15 := task3_model3_beuke4_scaled_IkBa;
  observable_dg_fix_19 := task3_model3_beuke4_scaled_p65_P;
  observable_dg_fix_98 := task3_model3_beuke4_s16;
  observable_dg_fix_17 := task4_model4_beuke5_scaled_IkBa;
  observable_dg_fix_21 := task4_model4_beuke5_scaled_p65_P;
  observable_dg_fix_90 := task4_model4_beuke5_scaled_IkBa_mRNA;
  observable_task4_model4_beuke5_scaled_IkBa_P := scaled_IkBa_P;
  observable_dg_fix_100 := task4_model4_beuke5_s16;
  observable_dg_fix_101 := task5_model5_beuke6_scaled_IkBa;
  observable_dg_fix_103 := task5_model5_beuke6_scaled_IkBa_P;
  observable_dg_fix_105 := task5_model5_beuke6_scaled_IkBa_mRNA;
  observable_dg_fix_107 := task5_model5_beuke6_s16;
  observable_dg_fix_109 := task5_model5_beuke6_scaled_p65_P;
  observable_dg_fix_111 := task6_model6_beuke7_scaled_IkBa;
  observable_dg_fix_113 := task6_model6_beuke7_scaled_IkBa_P;
  observable_dg_fix_117 := task6_model6_beuke7_s16;
  observable_dg_fix_119 := task6_model6_beuke7_scaled_p65_P;
  observable_dg_fix_115 := task6_model6_beuke7_scaled_IkBa_mRNA;
  observable_dg_fix_121 := task7_model7_beuke8_scaled_IkBa;
  observable_dg_fix_123 := task7_model7_beuke8_scaled_IkBa_P;
  observable_dg_fix_127 := task7_model7_beuke8_s16;
  observable_dg_fix_129 := task7_model7_beuke8_scaled_p65_P;
  observable_dg_fix_125 := task7_model7_beuke8_scaled_IkBa_mRNA;
  observable_dg_fix_131 := task8_model8_beuke9_scaled_IkBa;
  observable_dg_fix_133 := task8_model8_beuke9_scaled_IkBa_P;
  observable_dg_fix_137 := task8_model8_beuke9_s16;
  observable_dg_fix_139 := task8_model8_beuke9_scaled_p65_P;
  observable_dg_fix_135 := task8_model8_beuke9_scaled_IkBa_mRNA;
  observable_dg_fix_141 := task9_model9_beuke10_scaled_IkBa;
  observable_dg_fix_143 := task9_model9_beuke10_scaled_IkBa_P;
  observable_dg_fix_145 := task9_model9_beuke10_scaled_IkBa_mRNA;
  observable_dg_fix_147 := task9_model9_beuke10_s16;
  observable_dg_fix_149 := task9_model9_beuke10_scaled_p65_P;
  observable_dg_fix_151 := task10_model10_beuke11_scaled_IkBa;
  observable_dg_fix_153 := task10_model10_beuke11_scaled_IkBa_P;
  observable_dg_fix_155 := task10_model10_beuke11_scaled_IkBa_mRNA;
  observable_dg_fix_157 := task10_model10_beuke11_s16;
  observable_dg_fix_159 := task10_model10_beuke11_scaled_p65_P;
  observable_dg_fix_161 := task11_model11_beuke12_scaled_IkBa;
  observable_dg_fix_163 := task11_model11_beuke12_scaled_IkBa_P;
  observable_dg_fix_165 := task11_model11_beuke12_scaled_IkBa_mRNA;
  observable_dg_fix_169 := task11_model11_beuke12_scaled_p65_P;
  observable_dg_fix_167 := task11_model11_beuke12_s16;
  observable_dg_fix_171 := task12_model12_beuke13_scaled_IkBa;
  observable_dg_fix_173 := task12_model12_beuke13_scaled_IkBa_P;
  observable_dg_fix_179 := task12_model12_beuke13_s16;
  observable_dg_fix_181 := task12_model12_beuke13_scaled_p65_P;
  observable_dg_fix_175 := task12_model12_beuke13_scaled_IkBa_mRNA;
  observable_dg_fix_183 := task13_model13_beuke14_scaled_IkBa;
  observable_dg_fix_185 := task13_model13_beuke14_scaled_IkBa_P;
  observable_dg_fix_187 := task13_model13_beuke14_scaled_IkBa_mRNA;
  observable_dg_fix_189 := task13_model13_beuke14_s16;
  observable_dg_fix_191 := task13_model13_beuke14_scaled_p65_P;
  observable_dg_fix_193 := task14_model14_beuke15_scaled_IkBa;
  observable_dg_fix_197 := task14_model14_beuke15_scaled_IkBa_mRNA;
  observable_dg_fix_199 := task14_model14_beuke15_s16;
  observable_dg_fix_201 := task14_model14_beuke15_scaled_p65_P;
  observable_dg_fix_195 := task14_model14_beuke15_scaled_IkBa_P;
  observable_dg_fix_203 := task15_model15_beuke16_scaled_IkBa;
  observable_dg_fix_205 := task15_model15_beuke16_scaled_IkBa_P;
  observable_dg_fix_207 := task15_model15_beuke16_scaled_IkBa_mRNA;
  observable_dg_fix_209 := task15_model15_beuke16_s16;
  observable_dg_fix_211 := task15_model15_beuke16_scaled_p65_P;
  observable_dg_fix_215 := task16_model16_beuke17_scaled_IkBa_P;
  observable_dg_fix_217 := task16_model16_beuke17_scaled_IkBa_mRNA;
  observable_dg_fix_219 := task16_model16_beuke17_s16;
  observable_dg_fix_213 := task16_model16_beuke17_scaled_IkBa;
  observable_dg_fix_221 := task16_model16_beuke17_scaled_p65_P;
  observable_dg_fix_223 := task17_model17_beuke18_scaled_IkBa;
  observable_dg_fix_225 := task17_model17_beuke18_scaled_IkBa_P;
  observable_dg_fix_227 := task17_model17_beuke18_scaled_IkBa_mRNA;
  observable_dg_fix_229 := task17_model17_beuke18_s16;
  observable_dg_fix_231 := task17_model17_beuke18_scaled_p65_P;
  observable_dg_fix_233 := task18_model18_beuke19_scaled_IkBa;
  observable_dg_fix_235 := task18_model18_beuke19_scaled_IkBa_P;
  observable_dg_fix_237 := task18_model18_beuke19_scaled_IkBa_mRNA;
  observable_dg_fix_239 := task18_model18_beuke19_s16;
  observable_dg_fix_241 := task18_model18_beuke19_scaled_p65_P;
  observable_dg_fix_243 := task19_model19_beuke20_scaled_IkBa;
  observable_dg_fix_245 := task19_model19_beuke20_scaled_IkBa_P;
  observable_dg_fix_247 := task19_model19_beuke20_scaled_IkBa_mRNA;
  observable_dg_fix_251 := task19_model19_beuke20_scaled_p65_P;
  observable_dg_fix_249 := task19_model19_beuke20_s16;
  observable_dg_fix_255 := task20_model20_beuke21_scaled_IkBa_P;
  observable_dg_fix_257 := task20_model20_beuke21_scaled_IkBa_mRNA;
  observable_dg_fix_259 := task20_model20_beuke21_s16;
  observable_dg_fix_261 := task20_model20_beuke21_scaled_p65_P;
  observable_dg_fix_253 := task20_model20_beuke21_scaled_IkBa;
  observable_dg_fix_265 := task21_model21_beuke22_scaled_IkBa_P;
  observable_dg_fix_267 := task21_model21_beuke22_scaled_IkBa_mRNA;
  observable_dg_fix_269 := task21_model21_beuke22_s16;
  observable_dg_fix_263 := task21_model21_beuke22_scaled_IkBa;
  observable_dg_fix_271 := task21_model21_beuke22_scaled_p65_P;
  observable_dg_fix_273 := task22_model22_beuke23_scaled_IkBa;
  observable_dg_fix_275 := task22_model22_beuke23_scaled_IkBa_P;
  observable_dg_fix_277 := task22_model22_beuke23_scaled_IkBa_mRNA;
  observable_dg_fix_279 := task22_model22_beuke23_s16;
  observable_dg_fix_281 := task22_model22_beuke23_scaled_p65_P;
  observable_dg_fix_283 := task23_model23_beuke24_scaled_IkBa;
  observable_dg_fix_285 := task23_model23_beuke24_scaled_IkBa_P;
  observable_dg_fix_287 := task23_model23_beuke24_scaled_IkBa_mRNA;
  observable_dg_fix_289 := task23_model23_beuke24_s16;
  observable_dg_fix_291 := task23_model23_beuke24_scaled_p65_P;
  observable_dg_fix_293 := task24_model24_beuke25_scaled_IkBa;
  observable_dg_fix_295 := task24_model24_beuke25_scaled_IkBa_P;
  observable_dg_fix_297 := task24_model24_beuke25_scaled_IkBa_mRNA;
  observable_dg_fix_301 := task24_model24_beuke25_scaled_p65_P;
  observable_dg_fix_299 := task24_model24_beuke25_s16;
  observable_dg_fix_303 := task25_model25_beuke26_scaled_IkBa;
  observable_dg_fix_305 := task25_model25_beuke26_scaled_IkBa_P;
  observable_dg_fix_309 := task25_model25_beuke26_s16;
  observable_dg_fix_311 := task25_model25_beuke26_scaled_p65_P;
  observable_dg_fix_307 := task25_model25_beuke26_scaled_IkBa_mRNA;
  observable_dg_fix_313 := task26_model26_beuke27_scaled_IkBa;
  observable_dg_fix_315 := task26_model26_beuke27_scaled_IkBa_P;
  observable_dg_fix_317 := task26_model26_beuke27_scaled_IkBa_mRNA;
  observable_dg_fix_319 := task26_model26_beuke27_s16;
  observable_dg_fix_321 := task26_model26_beuke27_scaled_p65_P;
  observable_dg_fix_323 := task27_model27_beuke28_scaled_IkBa;
  observable_dg_fix_325 := task27_model27_beuke28_scaled_IkBa_P;
  observable_dg_fix_327 := task27_model27_beuke28_scaled_IkBa_mRNA;
  observable_dg_fix_329 := task27_model27_beuke28_s16;
  observable_dg_fix_331 := task27_model27_beuke28_scaled_p65_P;
  observable_dg_fix_333 := task28_model28_beuke29_scaled_IkBa;
  observable_dg_fix_335 := task28_model28_beuke29_scaled_IkBa_P;
  observable_dg_fix_337 := task28_model28_beuke29_scaled_IkBa_mRNA;
  observable_dg_fix_339 := task28_model28_beuke29_s16;
  observable_dg_fix_341 := task28_model28_beuke29_scaled_p65_P;

  // Reactions:
  Complex_association_c: p65_cytoplasm + IkBa_cytoplasm -> p65_IkBa; default*(IkBa_p65_association_k*IkBa_cytoplasm*p65_cytoplasm - IkBa_p65_dissociation_k*p65_IkBa);
  Complex_degradation_IkBa_c: p65_IkBa => p65_cytoplasm; default*IkBa_deg_complex_cyt_k*p65_IkBa;
  Complex_degradation_IkBa_n: p65_IkBa_nucleus => p65_nucleus; nucleus*IkBa_deg_complex_nuc_k*p65_IkBa_nucleus;
  Complex_degradation_p65_c: p65_IkBa => IkBa_cytoplasm; default*p65_degradation_k*p65_IkBa;
  Complex_degradation_p65_n: p65_IkBa_nucleus => IkBa; nucleus*p65_degradation_k*p65_IkBa_nucleus;
  Complex_nuclear_shuttle: p65_IkBa_nucleus -> p65_IkBa; IkBa_p65_nuclear_export_k*p65_IkBa_nucleus - IkBa_p65_nuclear_import_k*p65_IkBa;
  IKK_phosphorylation: IKKb => IKKb_p; default*Catalytic_activation__irrev(IKKb, TNFa_TNFR1_EL, IKKb_active_phosphorylation_kM, IKKb_active_phosphorylation_vmax, IKKb_active_phosphorylation_kA);  // modifiers: TNFa, TNFa_TNFR1_EL
  IkBa_degradation_c: IkBa_cytoplasm => ; default*IkBa_deg_cyt_k*IkBa_cytoplasm;
  IkBa_degradation_n: IkBa => ; nucleus*IkBa_deg_nuc_k*IkBa;
  IkBa_mRNA_degradation_c: IkBa_mRNA_cytoplasm => ; default*IkBa_mRNA_deg_cyt_k*IkBa_mRNA_cytoplasm;
  IkBa_mRNA_degradation_n: IkBa_mRNA_nucleus => ; nucleus*IkBa_mRNA_deg_nuc_k*IkBa_mRNA_nucleus;
  IkBa_mRNA_transport: IkBa_mRNA_nucleus => IkBa_mRNA_cytoplasm; IkBa_mRNA_transport_k*IkBa_mRNA_nucleus;
  IkBa_nuclear_shuttle: IkBa_cytoplasm -> IkBa; IkBa_nuclear_import_k*IkBa_cytoplasm - IkBa_nuclear_export_k*IkBa;
  IkBa_phosphorylation: IkBa_cytoplasm => IkBa_p; default*Henri_Michaelis_Menten__irreversible(IkBa_cytoplasm, IkBa_phosphorylation_kM, IkBa_phosphorylation_vmax);
  IkBa_transcription_elongation_1: IkBa_pre_mRNA_1 => IkBa_pre_mRNA_2; nucleus*IkBa_transcription_elongation_kbasal*IkBa_pre_mRNA_1;
  IkBa_transcription_elongation_2: IkBa_pre_mRNA_2 => IkBa_mRNA_nucleus; nucleus*IkBa_transcription_elongation_kbasal*IkBa_pre_mRNA_2;
  IkBa_translation: IkBa_mRNA_cytoplasm => IkBa_mRNA_cytoplasm + IkBa_cytoplasm; default*Henri_Michaelis_Menten__irreversible(IkBa_mRNA_cytoplasm, IkBa_translation_Km, IkBa_translation_vmax);
  JNK_active_phosphorylation: JNK => JNK_P; default*Henri_Michaelis_Menten__irreversible(JNK, JNK_active_phoshorylation_Km, JNK_active_phosphorylation_vmax);
  JNK_basal_phosphorylation: JNK => JNK_P; default*JNK_basal_phosphorylation_k*JNK;
  JNK_dephosphorylation: JNK_P => JNK; default*JNK_dephosphorylation_k*JNK_P;
  LPS_LSEC_degradation: LPS => ; EL*LPS_LSEC_degradation_k*LPS;
  LPS_MC_degradation: LPS => ; EL*LPS_MC_degradation_k*LPS;
  MSK1_activation: MSK1 => MSK1_P; nucleus*Henri_Michaelis_Menten__irreversible(MSK1, MSK1_activation_kM, MSK1_activation_vmax);
  MSK1_deactivation: MSK1_P => MSK1; nucleus*MSK1_dephosphorylation_k*MSK1_P;
  TNFR1_shuttle: TNFR1_cytoplasm -> TNFR1_EL; k_TNFR1_vessicle2outer_membrane_shuttle*TNFR1_cytoplasm - k_TNFR1_outer_membrane2vessicle_shuttle*TNFR1_EL;
  TNFa_LSEC_transcription_elongation: TNFa_pre_mRNA_LSEC => TNFa_mRNA_LSEC; LSEC*TNFa_LSEC_transcription_elongation_k*TNFa_pre_mRNA_LSEC;
  TNFa_LSEC_transcription_initiation: => 2 TNFa_pre_mRNA_LSEC; LSEC*TNFa_transcription_initiation(TNFa_LSEC_transcription_initiation_kbasal, TNFa_LSEC_transcription_initiation_vA_LPS, LPS, TNFa_LSEC_transcription_initiation_kA_LPS);  // modifiers: LPS
  TNFa_LSEC_translation: TNFa_mRNA_LSEC => TNFa_mRNA_LSEC + TNFa; TNFa_LSEC_translation_k*TNFa_mRNA_LSEC;
  TNFa_MC_transcription_elongation: TNFa_pre_mRNA_MC => TNFa_mRNA_MC; MC*TNFa_MC_transcription_elongation_k*TNFa_pre_mRNA_MC;
  TNFa_MC_transcription_initiation: => 2 TNFa_pre_mRNA_MC; MC*TNFa_transcription_initiation(TNFa_MC_transcription_initiation_kbasal, TNFa_MC_transcription_initiation_vA_LPS, LPS, TNFa_MC_transcription_initiation_kA_LPS);  // modifiers: LPS
  TNFa_MC_translation: TNFa_mRNA_MC => TNFa_mRNA_MC + TNFa; TNFa_MC_translation_k*TNFa_mRNA_MC;
  TNFa_TNFR1_association: TNFR1_EL + TNFa -> TNFa_TNFR1_EL; EL*(k_TNFa_TNFR1_association*TNFR1_EL*TNFa - k_TNFa_TNFR1_dissociation*TNFa_TNFR1_EL); TNFa_TNFR1_association is "TNFa:TNFR1_association";
  TNFa_TNFR1_internalisation: TNFa_TNFR1_EL => TNFa_TNFR1_cytoplasm; k_TNFa_TNFR1_internalisation*TNFa_TNFR1_EL; TNFa_TNFR1_internalisation is "TNFa:TNFR1_internalisation";
  TNFa_degradation: TNFa => ; EL*TNFa_degradation_k*TNFa;
  TNFa_internal_degradation: TNFa_TNFR1_cytoplasm => TNFR1_cytoplasm; default*k_TNFa_internal_degradation*TNFa_TNFR1_cytoplasm;
  TNFa_mRNA_LSEC_degradation: TNFa_mRNA_LSEC => ; LSEC*TNFa_mRNA_LSEC_degradation_k*TNFa_mRNA_LSEC;
  TNFa_mRNA_MC_degradation: TNFa_mRNA_MC => ; MC*TNFa_mRNA_MC_degradation_k*TNFa_mRNA_MC;
  basal_IKKb_phosphorylation: IKKb => IKKb_p; default*IKKb_basal_phosphoylation_k*IKKb;
  p38_active_phosphorylation: p38 => p38_P; default*Henri_Michaelis_Menten__irreversible(p38, p38_active_phoshorylation_Km, p38_active_phosphorylation_vmax);
  p38_basal_phosphorylation: p38 => p38_P; default*p38_basal_phosphorylation_k*p38;
  p38_dephosphorylation: p38_P => p38; default*p38_dephosphorylation_k*p38_P;
  p65_2P_degradation: p65_2P => ; nucleus*p65_degradation_k*p65_2P;
  p65_2P_dephosphorylation_0: p65_2P => p65_nucleus; nucleus*p65_2P_dephosphorylation*p65_2P;
  p65_P_degradation_c: p65_P_default => ; default*p65_degradation_k*p65_P_default;
  p65_P_degradation_n: p65_P_nucleus => ; nucleus*p65_degradation_k*p65_P_nucleus;
  p65_P_dephosphorylation_c: p65_P_nucleus => p65_nucleus; nucleus*p65_P_dephosphorylation_k*p65_P_nucleus;
  p65_P_dephosphorylation_n: p65_P_default => p65_cytoplasm; default*p65_P_dephosphorylation_k*p65_P_default;
  p65_P_phosphorylation_MSK1: p65_P_nucleus => p65_2P; nucleus*Henri_Michaelis_Menten__irreversible(p65_P_nucleus, p65_P_MSK1_phosphrylation_kM, p65_P_MSK1_phosphrylation_vmax);  // modifiers: MSK1_P
  p65_nuclear_shuttle: p65_cytoplasm -> p65_nucleus; p65_nuclear_import_k*p65_cytoplasm - p65_nuclear_export_k*p65_nucleus;
  p65_phosphorylation_MSK1: p65_nucleus => p65_2P; nucleus*Henri_Michaelis_Menten__irreversible(p65_nucleus, p65_MSK1_phosphorylation_kM, p65_MSK1_phosphrylation_vmax);  // modifiers: MSK1_P
  p65_translation: $p65_mRNA => $p65_mRNA + p65_cytoplasm; default*p65_translation_k*p65_mRNA;
  IkBa_transcription_initiation: => IkBa_pre_mRNA_1; nucleus*activated_Transcription__1(IkBa_transcription_initiation_kbasal, IkBa_transcription_kA2_p65_P, p65_P_nucleus, IkBa_transcription_kA_p65, p65_nucleus, p65_2P, IkBa_transcription_kA3_p65_2P);  // modifiers: p65_P_nucleus, p65_nucleus, p65_2P
  IkBa_p_active_degradation: IkBa_p => ; default*IkBa_p_active_degradation_k*IkBa_p;
  Complex_phosphorylation: p65_IkBa => p65_P_default + IkBa_p; default*Henri_Michaelis_Menten__irreversible(p65_IkBa, IkBa_p65_phosphorylation_kM, IkBa_p65_phosphorylation_vmax);
  dephosphorylation_IKK: IKKb_p => IKKb; default*IKKb_dephopshorylation_k*IKKb_p;
  Complex_association_n: p65_nucleus + IkBa -> p65_IkBa_nucleus; nucleus*(IkBa_p65_association_k*p65_nucleus*IkBa - IkBa_p65_dissociation_k*p65_IkBa_nucleus);
  p65_P_nuclear_shuttle: p65_P_default -> p65_P_nucleus; p65_nuclear_import_k*p65_P_default - p65_nuclear_export_k*p65_P_nucleus;

  // Unit definitions:
  unit volume = 1e-6 litre;
  unit substance = 1e-12 mole;
end
