// SBML level 2 version 1

model borghans3()

  // Compartments:
  compartment cytosol = 1;  // isVersionOf GO:0005829
  compartment extracellular = 1;  // isVersionOf GO:0005615
  compartment intravesicular1 = 1;  // isVersionOf GO:0005790
  compartment intravesicular2 = 1;

  // Species:
  species EC in extracellular = 0;  // CHEBI:29108 kegg.compound:C00076
  species X in intravesicular1 = 0.5;  // CHEBI:29108 kegg.compound:C00076
  species Y in intravesicular2 = 0;  // CHEBI:29108 kegg.compound:C00076
  species Z in cytosol = 0;  // CHEBI:29108 kegg.compound:C00076

  // Parameters:
  beta = 1;

  // Assignment rules:
  observable_task0_model0_borghans3_X := X;
  observable_task0_model0_borghans3_Y := Y;
  observable_task0_model0_borghans3_Z := Z;

  // Reactions:
  v2i: Z => Y; intravesicular2*Vm2i*Z^2/(K2i^2 + Z^2);  // isVersionOf GO:0051481 GO:0006816
    Vm2i = 3.1; K2i = 0.005;
  v2s: Z => X; intravesicular1*Vm2s*Z^2/(K2s^2 + Z^2);  // isVersionOf GO:0006816 GO:0051481
    Vm2s = 1.5; K2s = 0.0265;
  v3i: Y => Z; cytosol*Vm3i*Y^2*Z^2/((K3y^2 + Y^2)*(K3z^2 + Z^2));  // isVersionOf GO:0005219 GO:0006816 GO:0007204
    Vm3i = 25; K3y = 0.065; K3z = 0.022;
  v3s: X => Z; cytosol*beta*Vm3s*X^2/(K3s^2 + X^2);  // isVersionOf GO:0006816 GO:0051482
    Vm3s = 0.169; K3s = 0.1;
  v4: Y => Z; cytosol*v4_Kf*Y;  // isVersionOf GO:0006816 GO:0007204
    v4_Kf = 0.5;
  v5: Z => EC; extracellular*K*Z;  // isVersionOf GO:0051481 GO:0006816
    K = 1;
  v6: X => Z; cytosol*v6_Kf*X;  // isVersionOf GO:0006816 GO:0007204
    v6_Kf = 0.5;
  vin: EC => Z; cytosol*(v0 + v1*beta);  // isVersionOf GO:0006816 GO:0007204
    v0 = 0.015; v1 = 0.012;

  // Unit definitions:
  unit micromole_default = 1e-6 mole; micromole_default is "micromole (default)";
  unit minute_default = 60 second; minute_default is "minute (default)";
end
