// SBML level 2 version 1

model borghans1()

  // Compartments:
  compartment cytosol = 1;  // isVersionOf GO:0005829
  compartment extracellular = 1;  // isVersionOf GO:0005615
  compartment intravesicular = 1;  // isVersionOf GO:0005790

  // Species:
  species EC in extracellular = 0;  // CHEBI:29108 kegg.compound:C00076
  species Fraction_Inactive_Channels in cytosol = 0;  // isVersionOf interpro:IPR000493 pirsf:PIRSF002433
  species Rho in cytosol = 0;  // isVersionOf interpro:IPR016093 interpro:IPR000493
  species Y in intravesicular = 0.36;  // CHEBI:29108 kegg.compound:C00076
  species Z in cytosol = 0;  // CHEBI:29108 kegg.compound:C00076

  // Parameters:
  a = 40000;
  beta = 1;
  d = 100;

  // Assignment rules:
  observable_task0_model0_borghans1_Rho := Rho;
  observable_task0_model0_borghans1_Y := Y;
  observable_task0_model0_borghans1_Z := Z;

  // Reactions:
  v2: Z => Y; intravesicular*(Vm2*Z^2/(K2^2 + Z^2));  // isVersionOf GO:0051481
    Vm2 = 6.5; K2 = 0.1;
  v3: Y => Z; cytosol*(beta*(Rho*(a/d)*Z^4/(1 + a/d*Z^4))*Vm3*Y^2/(Ky^2 + Y^2));  // modifiers: Rho; isVersionOf GO:0007204
    Vm3 = 50; Ky = 0.2;
  v4: Y => Z; cytosol*Kf*Y;  // isVersionOf GO:0007204
    Kf = 1;
  v5: Z => EC; extracellular*K*Z;  // isVersionOf GO:0051481
    K = 10;
  v6: Rho => Fraction_Inactive_Channels; cytosol*Kd*Z^4*Rho;  // modifiers: Z; isVersionOf GO:0005220
    Kd = 5000;
  v7: Fraction_Inactive_Channels => Rho; cytosol*Kr*(1 - Rho);  // isVersionOf GO:0005220
    Kr = 5;
  vin: EC => Z; cytosol*(v0 + v1*beta);  // isVersionOf GO:0006816 GO:0007204
    v0 = 1; v1 = 1;

  // Unit definitions:
  unit micromole_default = 1e-6 mole; micromole_default is "micromole (default)";
  unit minute_default = 60 second; minute_default is "minute (default)";
end
