// SBML level 2 version 1

model brands1()

  // Compartments:
  compartment compartment = 1;

  // Species:
  species AMP in compartment = 0;
  species Acetic_acid in compartment = 0;  // CHEBI:15366 kegg.compound:C00033
  species Amadori in compartment = 0;
  species C5 in compartment = 0;
  species Cn in compartment = 0;
  species Formic_acid in compartment = 0;  // CHEBI:30751 kegg.compound:C00058
  species Fru in compartment = 0;  // CHEBI:28757 kegg.compound:C01496
  species Glu in compartment = 160;  // CHEBI:17234 kegg.compound:C00293
  species Melanoidin in compartment = 0;
  species Triose in compartment = 0;
  species lys_R in compartment = 15;  // CHEBI:32568

  // Assignment rules:
  observable_task0_model0_brands1_Fru := Fru;
  observable_task0_model0_brands1_Glu := Glu;
  observable_task0_model0_brands1_Acetic_acid := Acetic_acid;
  observable_task0_model0_brands1_Formic_acid := Formic_acid;
  observable_task0_model0_brands1_Amadori := Amadori;
  observable_task0_model0_brands1_lys_R := lys_R;
  observable_task0_model0_brands1_Melanoidin := Melanoidin;

  // Reactions:
  _J1: Glu => Fru; K1*Glu;
    K1 = 0.01;
  _J10: lys_R + Fru => AMP; K10*Fru*lys_R;
    K10 = 0.00015;
  _J11: AMP => Melanoidin; K11*AMP;
    K11 = 0.12514;
  _J2: Fru => Glu; K2*Fru;
    K2 = 0.00509;
  _J3: Glu => C5 + Formic_acid; K3*Glu;
    K3 = 0.00047;
  _J4: Fru => C5 + Formic_acid; K4*Fru;
    K4 = 0.0011;
  _J5: Fru => 2 Triose; K5*Fru;
    K5 = 0.00712;
  _J6: Triose => Cn + Acetic_acid; K6*Triose;
    K6 = 0.00439;
  _J7: lys_R + Glu => Amadori; K7*Glu*lys_R;
    K7 = 0.00018;
  _J8: Amadori => Acetic_acid + lys_R; K8*Amadori;
    K8 = 0.11134;
  _J9: Amadori => AMP; K9*Amadori;
    K9 = 0.14359;

  // Unit definitions:
  unit millimole_default = 1e-3 mole; millimole_default is "millimole (default)";
  unit minute_default = 60 second; minute_default is "minute (default)";
end
