// SBML level 3 version 1

model essunger3()
  // model units - substance: concentration_per_microlitre, time: day, volume: microlitre

  // Compartments:
  compartment default = 1;

  // Species:
  species Ta in default = 10;
  species Tastarstar in default = 0;
  species Tm in default = 540;
  species Tmstarstar in default = 0;
  species Ttot in default = 1000;
  species Tv in default = 450;
  species V in default = 5e-5;

  // Parameters:
  N0 = 600;
  Tc = 15000;
  Tmax = 1500;
  gamma = 130;
  kA = 0.00495;
  kB = 0.0055;
  kI = 0.0007;
  muA = 0.02;
  muAA = 0.5;
  muM = 0.013;
  muV = 0.013;
  muVV = 0.75;
  phi = 1;
  r = 1.5;
  rStar = 0;
  s0 = 8.076;
  s1 = 2;

  // Assignment rules:
  observable_task0_model0_essunger3_V := V;
  observable_task0_model0_essunger3_Ttot := Ttot;
  observable_task0_model0_essunger3_Ta := Ta;
  observable_task0_model0_essunger3_Tv := Tv;
  observable_task0_model0_essunger3_Tm := Tm;
  observable_task0_model0_essunger3_Tmstarstar := Tmstarstar;
  observable_task0_model0_essunger3_Tastarstar := Tastarstar;

  // Reactions:
  CD4TproductionV: -> V; muAA*N0*(1 + gamma*time^2/(time^2 + Tc^2))*Tastarstar; CD4TproductionV is "v10a";  // modifiers: Tastarstar
  VinfectionCD4T: Ta + V -> Tastarstar; kI*Ta*V; VinfectionCD4T is "v8";
  activationCD4TrestingMemoryInfected: Tmstarstar -> Tastarstar; kB*Tmstarstar; activationCD4TrestingMemoryInfected is "v11";
  activationCD4TrestingMemoryPlain: Tm -> Ta; kB*Tm; activationCD4TrestingMemoryPlain is "v7";
  activationCD4TrestingNaivePlain: Tv -> Ta; kA*Tv; activationCD4TrestingNaivePlain is "v3";
  clearanceV: V -> ; muVV*V; clearanceV is "v13";
  deathCD4TactiveInfected: Ttot + Tastarstar -> ; muAA*Tastarstar; deathCD4TactiveInfected is "v10";
  deathCD4TactivePlain: Ta + Ttot -> ; muA*Ta; deathCD4TactivePlain is "v4";
  deathCD4TrestingMemoryInfected: Tmstarstar + Ttot -> ; muM*Tmstarstar; deathCD4TrestingMemoryInfected is "v12";
  deathCD4TrestingMemoryPlain: Ttot + Tm -> ; muM*Tm; deathCD4TrestingMemoryPlain is "v6";
  deathCD4TrestingNaivePlain: Ttot + Tv -> ; muV*Tv; deathCD4TrestingNaivePlain is "v2";
  fractionVinfectionCD4T: Tastarstar -> Tmstarstar; kI*phi*Ta*V; fractionVinfectionCD4T is "v14";  // modifiers: V, Ta
  growthCD4T: Ta -> Ttot; r*Ta*(1 - Ttot/Tmax); growthCD4T is "v5";
  sourceCD4T: -> Ttot + Tv; s0*s1/(s1 + V^(1/3)); sourceCD4T is "v1";  // modifiers: V
  v15: -> Tm; 2*r*Ta*(1 - Ttot/Tmax);  // modifiers: Ttot, Ta
  v16: -> Tmstarstar; 2*rStar*Tastarstar*(1 - Ttot/Tmax);  // modifiers: Tastarstar, Ttot
  v9: Tastarstar -> Ttot; rStar*Tastarstar*(1 - Ttot/Tmax);

  // Unit definitions:
  unit concentration_per_microlitre = 1;
  unit day = 1;
  unit microlitre = 1;
end
