// SBML level 3 version 1

model fuentes1()

  // Compartments:
  compartment default_compartment = 1;

  // Species:
  species e in default_compartment = 0;
  species ez in default_compartment = 0;
  species w in default_compartment = 0;
  species z in default_compartment = 2.4e-5;

  // Parameters:
  k1 = 0.004;
  k21 = 1000;
  k22 = 0.00021;
  k3 = 0.00054;

  // Assignment rules:
  observable_task0_model0_fuentes1_e := e;
  observable_task0_model0_fuentes1_ez := ez;
  observable_task0_model0_fuentes1_w := w;
  observable_task0_model0_fuentes1_z := z;

  // Reactions:
  v_1: z -> e + w; k1*z;
  v_2: e + z -> ez; k21*e*z - k22*ez;
  v_3: ez -> 2 e + w; k3*ez;
end
