// SBML level 2 version 4

function function_4(P, V3, R, k3)
  P*V3*(1 - R)/(k3 + (1 - R));
end

function function_0(a, Q)
  a*Q;
end

function function_1(V, substrate, Km)
  V*substrate/(Km + substrate);
end

function function_2(V1, Q, K1)
  V1*(1 - Q)/(K1 + (1 - Q));
end

function function_3(V2, R, Q, K2)
  V2*R*Q/(K2 + Q);
end

model goldbeter6()

  // Compartments:
  compartment body = 1;

  // Species:
  // body weight
  substanceOnly species P in body = 0;
  // dietary intake
  substanceOnly species Q in body = 0;
  // degree of resolution measuring cognitive restraint
  substanceOnly species R in body = 0;

  // Assignment rules:
  observable_task0_model0_goldbeter6_P := P;
  observable_task0_model0_goldbeter6_Q := Q;
  observable_task0_model0_goldbeter6_R := R;

  // Reactions:
  Increase_of_P: => P; body*function_0(a, Q);  // modifiers: Q; isVersionOf GO:0040018 GO:0035264
    a = 0.1;
  Decrease_of_P: P => ; function_1(Decrease_of_P_V, P, Decrease_of_P_Km);  // isVersionOf GO:0040015
    Decrease_of_P_V = 0.1; Decrease_of_P_Km = 0.2;
  Increase_of_Q: => Q; function_2(V1, Q, K1);  // isVersionOf GO:0007631
    V1 = 1; K1 = 0.01;
  Decrease_of_Q: Q => ; function_3(V2, R, Q, K2);  // modifiers: R; isVersionOf GO:0002023
    V2 = 1.5; K2 = 0.01;
  Increase_of_R: => R; function_4(P, V3, R, k3);  // modifiers: P; isVersionOf GO:0048520
    V3 = 6; k3 = 0.01;
  Decrease_of_R: R => ; function_1(Decrease_of_R_V, R, Decrease_of_R_Km);  // isVersionOf GO:0048521
    Decrease_of_R_Km = 0.01; Decrease_of_R_V = 2.5;

  // Unit definitions:
  unit weeks = 604800 second;
end
