// SBML level 2 version 1

model gorlich1()

  // Compartments:
  compartment cytoplasm = 1.8e-11;  // GO:0005737
  compartment nucleus = 1.2e-11;  // GO:0005634

  // Species:
  species $GDP in nucleus = 1.6;  // CHEBI:17552 kegg.compound:C00035
  species $GTP in nucleus = 500;  // CHEBI:15996 kegg.compound:C00044
  species RCC1 in nucleus = 0.7;  // isEncodedBy ensembl:ENSG00000180198 uniprot:P18754
  species RCC1_Ran in nucleus = 0;  // hasPart uniprot:P18754 uniprot:P62826
  species RCC1_RanGDP in nucleus = 0;  // hasPart CHEBI:17552 uniprot:P18754 uniprot:P62826 kegg.compound:C00035
  species RCC1_RanGTP in nucleus = 0;  // hasPart CHEBI:15996 uniprot:P62826 uniprot:P18754 kegg.compound:C00044
  species RanBP1 in cytoplasm = 2;  // isVersionOf interpro:IPR000156 uniprot:P43487
  species RanGAP in cytoplasm = 0.7;  // isVersionOf interpro:IPR000331 uniprot:P46060
  species RanGDP_cy in cytoplasm = 5;  // hasPart uniprot:P62826 kegg.compound:C00035
  species RanGDP_nuc in nucleus = 0;  // hasPart uniprot:P62826 kegg.compound:C00035
  species RanGTP_RanBP1 in cytoplasm = 0;  // hasPart uniprot:P62826 uniprot:P43487 kegg.compound:C00044
  species RanGTP_cy in cytoplasm = 0;  // hasPart uniprot:P62826 kegg.compound:C00044
  species RanGTP_nuc in nucleus = 0;  // hasPart uniprot:P62826 kegg.compound:C00044

  // Assignment rules:
  observable_task0_model0_gorlich1_RanGTP_cy := RanGTP_cy;
  observable_task0_model0_gorlich1_RanGTP_nuc := RanGTP_nuc;

  // Reactions:
  Cytoplasmic_transfer: RanGTP_nuc -> RanGTP_cy; kpermRanGTP*nucleus*(RanGTP_nuc - RanGTP_cy);  // isVersionOf GO:0006913
    kpermRanGTP = 0.03 psec;
  GDP_dissociation: RCC1_RanGDP -> RCC1_Ran + $GDP; nucleus*(r2*RCC1_RanGDP - r7*RCC1_Ran*GDP);  // isVersionOf GO:0005087
    r2 = 21 psec; r7 = 11 pmicroMpsec;
  GTP_binding: RCC1_Ran + $GTP -> RCC1_RanGTP; nucleus*(r3*RCC1_Ran*GTP - r6*RCC1_RanGTP);  // isVersionOf GO:0005525
    r3 = 0.6 pmicroMpsec; r6 = 19 psec;
  Nucleoplasmic_transfer: RanGDP_nuc -> RanGDP_cy; kpermRanGDP*nucleus*(RanGDP_nuc - RanGDP_cy);  // isVersionOf GO:0006913
    kpermRanGDP = 0.12 psec;
  RCC1_binding: RanGDP_nuc + RCC1 -> RCC1_RanGDP; nucleus*(r1*RanGDP_nuc*RCC1 - r8*RCC1_RanGDP);  // isVersionOf GO:0006461
    r1 = 74 pmicroMpsec; r8 = 55 psec;
  RanBP1_RanGDP: RanGTP_RanBP1 -> RanGDP_cy + RanBP1; cytoplasm*kcat*RanGTP_RanBP1*RanGAP/(RanGTP_RanBP1 + Km);  // modifiers: RanGAP; isVersionOf GO:0043241
    kcat = 10.8 psec; Km = 0.1 microM;
  RanGAP_RanGDP: RanGTP_cy -> RanGDP_cy; cytoplasm*kcat_GAP*RanGTP_cy*RanGAP/(Km_GAP + RanGTP_cy);  // modifiers: RanGAP; isVersionOf GO:0032860
    kcat_GAP = 10.6 psec; Km_GAP = 0.7 microM;
  RanGTP_binding: RanGTP_cy + RanBP1 -> RanGTP_RanBP1; (kon*RanGTP_cy*RanBP1 - koff*RanGTP_RanBP1)*cytoplasm;  // isVersionOf GO:0006461
    kon = 0.3 pmicroMpsec; koff = 0.0004 psec;
  RanGTP_release: RCC1_RanGTP -> RanGTP_nuc + RCC1; nucleus*(r4*RCC1_RanGTP - r5*RanGTP_nuc*RCC1);  // isVersionOf GO:0043241
    r4 = 55 psec; r5 = 100 pmicroMpsec;

  // Unit definitions:
  unit substance = 1e-6 mole;
  unit microMpsec = 1e-6 mole / (second * litre);
  unit pmicroMpsec = litre / (1e-6 mole * second);
  unit psec = 1 / second;
  unit microM = 1e-6 mole / litre;
end
