// SBML level 3 version 1

model hernandezvargas1()
  // hernandez-vargas1

  // Compartments:
  compartment default = 1;

  // Species:
  species M in default = 150;
  species MStar in default = 0;
  species T in default = 1000;
  species TStar in default = 0;
  species V in default = 10;

  // Parameters:
  CM = 220;
  CT = 300;
  deltaM = 0.001;
  deltaMStar = 0.001;
  deltaT = 0.01;
  deltaTStar = 0.4;
  deltaV = 2.4;
  kM = 4.33e-8;
  kT = 4.57e-5;
  pM = 35;
  pT = 38;
  rhoM = 0.003;
  rhoT = 0.01;
  sM = 0.15;
  sT = 10;

  // Assignment rules:
  viruscopiesperml := V*1000;
  CD4plusTcells := T + TStar;
  observable_task0_model0_esteban2013_CD4plusTcells_0 := task0_model0_esteban2013_CD4plusTcells;
  observable_task0_model0_esteban2013_viruscopiesperml := viruscopiesperml;
  observable_task0_model0_esteban2013_TStar := TStar;
  observable_task0_model0_esteban2013_M := M;
  observable_task0_model0_esteban2013_MStar := MStar;

  // Reactions:
  v1: -> T; sT;
  v10: MStar -> ; deltaMStar*MStar;
  v11: -> V; pT*TStar;  // modifiers: TStar
  v12: -> V; pM*MStar;  // modifiers: MStar
  v13: V -> ; deltaV*V;
  v2: -> T; rhoT*T*V/(CT + V);  // modifiers: V
  v3: T -> TStar; kT*T*V;  // modifiers: V
  v4: T -> ; deltaT*T;
  v5: TStar -> ; deltaTStar*TStar;
  v6: -> M; sM;
  v7: -> M; rhoM*M*V/(CM + V);  // modifiers: V
  v8: M -> MStar; kM*M*V;  // modifiers: V
  v9: M -> ; deltaM*M;
end
