// SBML level 3 version 1

model kofahl1()

  // Compartments:
  compartment default_compartment = 1;

  // Species:
  species Bar1 in default_compartment = 200;
  species Bar1a in default_compartment = 0;
  species Bar1aex in default_compartment = 0;
  species Cdc28 in default_compartment = 300;
  species Far1 in default_compartment = 500;
  species Far1PP in default_compartment = 0;
  species Far1U in default_compartment = 0;
  species Fus3 in default_compartment = 686.3997;
  species Fus3PP in default_compartment = 0;
  species GaGDP in default_compartment = 0;
  species GaGTP in default_compartment = 0;
  species Gabc in default_compartment = 1666.667;
  species Gbc in default_compartment = 0;
  species Sst2 in default_compartment = 0;
  species Ste11 in default_compartment = 158.3318;
  species Ste12 in default_compartment = 200;
  species Ste12a in default_compartment = 0;
  species Ste2 in default_compartment = 1666.667;
  species Ste20 in default_compartment = 1000;
  species Ste2a in default_compartment = 0;
  species Ste5 in default_compartment = 158.3318;
  species Ste7 in default_compartment = 36.3997;
  species alpha in default_compartment = 100;
  species complexA in default_compartment = 105.9433;
  species complexB in default_compartment = 77.87536;
  species complexC in default_compartment = 235.7249;
  species complexD in default_compartment = 0;
  species complexE in default_compartment = 0;
  species complexF in default_compartment = 0;
  species complexG in default_compartment = 0;
  species complexH in default_compartment = 0;
  species complexI in default_compartment = 0;
  species complexK in default_compartment = 0;
  species complexL in default_compartment = 0;
  species complexM in default_compartment = 0;
  species complexN in default_compartment = 0;
  species $p in default_compartment = 0;

  // Parameters:
  k1 = 0.03;
  k10 = 0.1;
  k11 = 5;
  k12 = 1;
  k13 = 3;
  k14 = 1;
  k15 = 3;
  k16 = 3;
  k17 = 100;
  k18 = 5;
  k19 = 1;
  k2 = 0.0012;
  k20 = 10;
  k21 = 5;
  k22 = 47;
  k23 = 5;
  k24 = 345;
  k25 = 5;
  k26 = 50;
  k27 = 5;
  k28 = 140;
  k29 = 10;
  k3 = 0.6;
  k30 = 1;
  k31 = 250;
  k32 = 5;
  k33 = 50;
  k34 = 18;
  k35 = 10;
  k36 = 0.1;
  k37 = 0.1;
  k38 = 0.01;
  k39 = 18;
  k4 = 0.24;
  k40 = 1;
  k41 = 0.02;
  k42 = 0.1;
  k43 = 0.01;
  k44 = 0.01;
  k45 = 0.1;
  k46 = 200;
  k47 = 1;
  k5 = 0.024;
  k6 = 0.0036;
  k7 = 0.24;
  k8 = 0.033;
  k9 = 2000;

  // Assignment rules:
  observable_task0_model0_kofahl_Gabc := Gabc;
  observable_task0_model0_kofahl_GaGDP := GaGDP;
  observable_task0_model0_kofahl_Gbc := Gbc;

  // Reactions:
  v_1: alpha -> $p; alpha*Bar1aex*k1;  // modifiers: Bar1aex
  v_10: Gbc + complexC -> complexD; Gbc*complexC*k10;
  v_11: complexD -> Gbc + complexC; complexD*k11;
  v_12: Ste5 + Ste11 -> complexA; Ste5*Ste11*k12;
  v_13: complexA -> Ste5 + Ste11; complexA*k13;
  v_14: Ste7 + Fus3 -> complexB; Ste7*Fus3*k14;
  v_15: complexB -> Ste7 + Fus3; complexB*k15;
  v_16: complexA + complexB -> complexC; complexA*complexB*k16;
  v_17: complexC -> Ste11 + Ste5 + Ste7 + Fus3; complexC*k17;
  v_18: complexD + Ste20 -> complexE; complexD*Ste20*k18;
  v_19: complexE -> complexD + Ste20; complexE*k19;
  v_2: Ste2 -> Ste2a; Ste2*alpha*k2;  // modifiers: alpha
  v_20: complexE -> complexF; complexE*k20;
  v_21: complexE -> Gbc + Ste5 + Ste11 + Ste7 + Fus3 + Ste20; complexE*k21;
  v_22: complexF -> complexG; complexF*k22;
  v_23: complexF -> Gbc + Ste5 + Ste11 + Ste7 + Fus3 + Ste20; complexF*k23;
  v_24: complexG -> complexH; complexG*k24;
  v_25: complexG -> Gbc + Ste5 + Ste11 + Ste7 + Fus3 + Ste20; complexG*k25;
  v_26: complexH -> complexI; complexH*k26;
  v_27: complexH -> Gbc + Ste5 + Ste11 + Ste7 + Fus3 + Ste20; complexH*k27;
  v_28: complexI -> complexL + Fus3PP; complexI*k28;
  v_29: complexL + Fus3 -> complexK; complexL*Fus3*k29;
  v_3: Ste2a -> Ste2; Ste2a*k3;
  v_30: complexK -> Fus3 + complexL; complexK*k30;
  v_31: complexK -> complexI; complexK*k31;
  v_32: complexL -> Gbc + Ste5 + Ste11 + Ste7 + Ste20; complexL*k32;
  v_33: Fus3PP -> Fus3; Fus3PP*k33;
  v_34: Ste12 + Fus3PP -> Ste12a; Ste12*Fus3PP*k34;
  v_35: Ste12a -> Ste12 + Fus3PP; Ste12a*k35;
  v_36: Bar1 -> Bar1a; Ste12a*Bar1*k36;  // modifiers: Ste12a
  v_37: Bar1a -> Bar1; Bar1a*k37;
  v_38: Bar1a -> Bar1aex; Bar1a*k38;
  v_39: Far1 -> Far1PP; Far1*Fus3PP*Fus3PP/(100*100 + Fus3PP*Fus3PP)*k39;  // modifiers: Fus3PP
  v_4: Ste2a -> $p; Ste2a*k4;
  v_40: Far1PP -> Far1; Far1PP*k40;
  v_41: Far1 -> Far1U; Far1*Cdc28*k41;  // modifiers: Cdc28
  v_42: Far1PP + Gbc -> complexM; Gbc*Far1PP*k42;
  v_43: complexM -> Gbc + Far1PP; complexM*k43;
  v_44: complexN -> Cdc28 + Far1PP; complexN*k44;
  v_45: Cdc28 + Far1PP -> complexN; Far1PP*Cdc28*k45;
  v_46: $p -> Sst2; Fus3PP^2/(4^2 + Fus3PP^2)*k46;  // modifiers: Fus3PP
  v_47: Sst2 -> $p; Sst2*k47;
  v_5: Ste2 -> $p; Ste2*k5;
  v_6: Gabc -> GaGTP + Gbc; Ste2a*Gabc*k6;  // modifiers: Ste2a
  v_7: GaGTP -> GaGDP; GaGTP*k7;
  v_8: GaGTP -> GaGDP; GaGTP*Sst2*k8;  // modifiers: Sst2
  v_9: GaGDP + Gbc -> Gabc; GaGDP*Gbc*k9;
end
