// SBML level 3 version 1

model kouril4()

  // Compartments:
  compartment default = 1;  // 0-D

  // Species:
  species ADP in default = 0;  // CHEBI:16761 kegg.compound:C00008
  species ATP in default = 10;  // CHEBI:15422 kegg.compound:C00002
  species BPG in default = 0;  // CHEBI:16001 kegg.compound:C00236
  species P3G in default = 4;
  species pep in default = 5;
  species pyr in default = 0;

  // Parameters:
  KeqPGK = 3200;
  KmPGKADP = 0.2;
  KmPGKATP = 0.3;
  KmPGKBPG = 0.003;
  KmPGKP3G = 0.53;
  VmPGK = 4.61;
  kPK = 50;

  // Assignment rules:
  observable_task0_model0_kouril4_P3G := P3G;
  observable_task0_model0_kouril4_BPG := BPG;
  observable_task0_model0_kouril4_pyr := pyr;
  observable_plot0_BPGnr_datagen1 := BPG;
  observable_plot0_P3G_datagen1 := P3G;

  // Reactions:
  v1: ATP + P3G -> ADP + BPG; -(VmPGK*(KeqPGK*BPG*ADP - ATP*P3G))/(KmPGKATP*KmPGKP3G*(1 + ADP/KmPGKADP + ATP/KmPGKATP)*(1 + BPG/KmPGKBPG + P3G/KmPGKP3G));  // ec-code:2.7.2.3
  v2: ADP + pep -> ATP + pyr; kPK*ADP*pep;  // ec-code:2.7.1.40
end
