// SBML level 3 version 1

model kouril5()

  // Compartments:
  compartment default = 1;  // 0-D

  // Species:
  species BPG in default = 1.49199;
  species P3G in default = 1.89227;

  // Parameters:
  kd = 0.736416;
  noiseParameter1_mM_BPG = 1;
  noiseParameter1_stdev = 1;
  noiseParameter1_mM_3PG = 1;
  noiseParameter1_stdev_1 = 1;

  // Assignment rules:
  sigma_mM_BPG := noiseParameter1_mM_BPG;
  observable_mM_BPG := BPG;
  sigma_stdev := noiseParameter1_stdev;
  observable_stdev := BPG;
  sigma_mM_3PG := noiseParameter1_mM_3PG;
  observable_mM_3PG := P3G;
  sigma_stdev_1 := noiseParameter1_stdev_1;
  observable_stdev_1 := P3G;

  // Reactions:
  v1: BPG -> P3G; kd*BPG;
end
