// SBML level 3 version 1

model kouril6()

  // Compartments:
  compartment default = 1;  // 0-D

  // Species:
  species ADP in default = 0;
  species ATP in default = 10;
  species BPG in default = 0;
  species P3G in default = 4.5;
  species pep in default = 5;
  species phos in default = 0;
  species pyr in default = 0.1;

  // Parameters:
  KiADP = 1.016612;
  KpgkADP = 0.3746839;
  KpgkATP = 9.3094;
  KpgkBPG = 0.008243467;
  KpgkP3G = 0.5678007;
  VmfPGK = 17.21256;
  VmrPGK = 37.96026;
  kPK = 10;
  kd = 0.736416;
  protPGK = 0.0034;
  noiseParameter1_P3G = 1;
  noiseParameter1_SD = 1;
  noiseParameter1_PYR = 1;
  noiseParameter1_SD_1 = 1;
  noiseParameter1_BPG = 1;
  noiseParameter1_SD_2 = 1;

  // Assignment rules:
  sigma_P3G := noiseParameter1_P3G;
  observable_P3G := P3G;
  sigma_SD := noiseParameter1_SD;
  observable_SD := P3G;
  sigma_PYR := noiseParameter1_PYR;
  observable_PYR := pyr;
  sigma_SD_1 := noiseParameter1_SD_1;
  observable_SD_1 := pyr;
  sigma_BPG := noiseParameter1_BPG;
  observable_BPG := BPG;
  sigma_SD_2 := noiseParameter1_SD_2;
  observable_SD_2 := BPG;

  // Reactions:
  v1: ATP + P3G -> ADP + BPG; protPGK*(-VmrPGK*ADP*BPG/(KpgkADP*KpgkBPG) + VmfPGK*ATP*P3G/(KpgkATP*KpgkP3G))/((1 + ADP/KiADP)*(1 + P3G/KpgkP3G*(1 + ATP/KpgkATP) + BPG/KpgkBPG*(1 + ADP/KpgkADP)));
  v2: ADP + pep -> ATP + pyr; kPK*ADP*pep;  // ec-code:2.7.1.40
  v3: BPG -> phos + P3G; kd*BPG;
end
