// SBML level 3 version 1

model kouril7()

  // Compartments:
  compartment default = 1;  // 0-D

  // Species:
  species ADP in default = 0;
  species ATP in default = 10;
  species BPG in default = 0;
  species $GA in default = 0;
  species Glc in default = 10;
  species NAD in default = 0;
  species NADH in default = 0.2;
  species P3G in default = 3;
  species gap in default = 0.365;
  species pep in default = 10;
  species pyr in default = 0.15;

  // Parameters:
  KeqPGK = 3200;
  KmGAPDHBPG = 0.0098;
  KmGAPDHGAP = 0.21;
  KmGAPDHNAD = 0.09;
  KmGAPDHNADH = 0.06;
  KmPGKADP = 0.2;
  KmPGKATP = 0.3;
  KmPGKBPG = 0.003;
  KmPGKP3G = 0.53;
  VmGAPDHf = 0.188086;
  VmGAPDHr = 1.04;
  VmPGK = 0.038;
  kGDH = 10;
  kPK = 10;
  noiseParameter1_3PG = 1;
  noiseParameter1_PYR = 1;
  noiseParameter1_GAP = 1;

  // Assignment rules:
  sigma_3PG := noiseParameter1_3PG;
  observable_3PG := P3G;
  sigma_PYR := noiseParameter1_PYR;
  observable_PYR := pyr;
  sigma_GAP := noiseParameter1_GAP;
  observable_GAP := gap;

  // Reactions:
  v1: ATP + P3G -> ADP + BPG; -(VmPGK*(KeqPGK*BPG*ADP - ATP*P3G))/(KmPGKATP*KmPGKP3G*(1 + ADP/KmPGKADP + ATP/KmPGKATP)*(1 + BPG/KmPGKBPG + P3G/KmPGKP3G));
  v2: ADP + pep -> ATP + pyr; kPK*ADP*pep;
  v4: NADH + BPG -> NAD + gap; -(-(VmGAPDHr*BPG*NADH/(KmGAPDHBPG*KmGAPDHNADH)) + VmGAPDHf*NAD*gap/(KmGAPDHGAP*KmGAPDHNAD))/((1 + NAD/KmGAPDHNAD + NADH/KmGAPDHNADH)*(1 + BPG/KmGAPDHBPG + gap/KmGAPDHGAP));
  v5: NAD + Glc -> NADH + $GA; kGDH*Glc*NAD;
end
