// SBML level 3 version 1

model kouril8()

  // Compartments:
  compartment default = 1;  // 0-D

  // Species:
  species ADP in default = 0;
  species ATP in default = 10;
  species BPG in default = 0;
  species $GA in default = 0;
  species P3G in default = 3;
  species gap in default = 0;
  species glc in default = 10;
  species nadp in default = 0;
  species nadph in default = 0.2;
  species pep in default = 5;
  species $pi in default = 0;
  species pyr in default = 0.4;
  species $sink in default = 0;

  // Parameters:
  KBPG = 0.08959973;
  Kgap = 3.09006;
  KiADP = 1.016612;
  Knadp = 0.204381;
  Knadph = 0.092444;
  KpgkADP = 0.3746839;
  KpgkATP = 9.3094;
  KpgkBPG = 0.008243467;
  KpgkP3G = 0.5678007;
  Kpi = 112.39;
  Vmarev = 35.871;
  VmfPGK = 17.21256;
  Vmfor = 23.3991;
  VmrPGK = 37.96026;
  kGDH = 10;
  kPK = 50;
  kdbpg = 0.736416;
  kdgap = 0.0559;
  protGAPdh = 0.0421;
  protPGK = 0.0045;
  sink2 = 0;
  noiseParameter1_3PG = 1;
  noiseParameter1_PYR = 1;
  noiseParameter1_GAP = 1;

  // Assignment rules:
  sigma_3PG := noiseParameter1_3PG;
  observable_3PG := P3G;
  sigma_PYR := noiseParameter1_PYR;
  observable_PYR := pyr;
  sigma_GAP := noiseParameter1_GAP;
  observable_GAP := gap;

  // Reactions:
  v1: ATP + P3G -> ADP + BPG; protPGK*(-VmrPGK*ADP*BPG/(KpgkADP*KpgkBPG) + VmfPGK*ATP*P3G/(KpgkATP*KpgkP3G))/((1 + ADP/KiADP)*(1 + P3G/KpgkP3G*(1 + ATP/KpgkATP) + BPG/KpgkBPG*(1 + ADP/KpgkADP)));
  v2: ADP + pep -> ATP + pyr; kPK*ADP*pep;
  v3: BPG -> $pi + P3G; kdbpg*BPG;
  v4: nadph + BPG -> $pi + nadp + gap; protGAPdh*((-Vmarev*(gap*nadp/(Kgap*Knadp))*(pi/Kpi) + Vmfor*BPG*nadph/(KBPG*Knadph))/((1 + nadp/Knadp + nadph/Knadph)*((1 + gap/Kgap)*(1 + pi/Kpi) + BPG/KBPG)));
  v5: nadp + glc -> nadph + $GA; kGDH*glc*nadp;
  v6: gap -> $sink; kdgap*gap;
end
