// SBML level 2 version 4

function CK_2S_2P_irrev(S1, KmS1, S2, KmS2, P1, KmP1, P2, KmP2, Vmax)
  Vmax*(S1/KmS1)*(S2/KmS2)/((1 + S1/KmS1)*(1 + S2/KmS2) + (1 + P1/KmP1)*(1 + P2/KmP2) - 1);
end

function CK_1S_2P_1A_irrev(S, KmS, P1, KmP1, P2, KmP2, A, KmA, Vmax)
  A/(KmA + A)*(Vmax*(S/KmS)/(S/KmS + (1 + P1/KmP1)*(1 + P2/KmP2)));
end

function Hill_Cooperativity(substrate, Shalve, V, h)
  V*substrate^h/(Shalve^h + substrate^h);
end

function CK_1S_1P_irrev(Vmax, S, KmS, P, KmP)
  Vmax*(S/KmS)/(1 + S/KmS + P/KmP);
end

function diffusion(k, S, P)
  k*(S - P);
end

function CK_1S_1P_1I_irrev(KmI, Ivar, Vmax, S, KmS, P, KmP)
  KmI/(KmI + Ivar)*(Vmax*(S/KmS)/(1 + S/KmS + P/KmP));
end

function CK_1S_2P_1A_1I_irrev(KmI, Ivar, A, KmA, Vmax, S, KmS, P1, KmP1, P2, KmP2)
  KmI/(KmI + Ivar)*(A/(KmA + A))*(Vmax*(S/KmS)/(S/KmS + (1 + P1/KmP1)*(1 + P2/KmP2)));
end

function CK_2S_2P_double_irrev(Vmax, S1, KmS1, S2, KmS2, P1, KmP1, P2, KmP2)
  Vmax*(S1/KmS1)*(S2/KmS2)/((1 + S1/KmS1)*(1 + S2/KmS2) + (1 + P1/KmP1)*(1 + P2/KmP2 + (P2/KmP2)^2) - 1);
end
CK_2S_2P_double_irrev is "CK 2S 2P (double) irrev";

function PiT_mod2(KmI, Ivar, A, KmA, Vmax, S, P, KmS, KmP)
  KmI/(KmI + Ivar)*(A/(KmA + A))*(Vmax*(S - P)/(1 + S/KmS + P/KmP));
end
PiT_mod2 is "PiT.mod2";

function CK_2S_2P_ENO(Vmax, S1, KmS1, S2, KmS2, Keq, KmP1, KmP2, P1, P2)
  (Vmax*(S1/KmS1)*(S2/KmS2) - Vmax/Keq*(KmP1*KmP2/(KmS1*KmS2))*(P1/KmP1)*(P2/KmP2))/((1 + S1/KmS1)*(1 + S2/KmS2) + (1 + P1/KmP1)*(1 + P2/KmP2) - 1);
end

function CK_1S_2P_double_FBA(Vmax, S1, KmS1, Keq, KmP1, P1, P2)
  (Vmax*(S1/KmS1) - Vmax/Keq*(KmP1*KmP1/KmS1)*(P1/KmP1)*(P2/KmP1))/(1 + S1/KmS1 + P1/KmP1 + (P1/KmP1)^2);
end
CK_1S_2P_double_FBA is "CK 1S 2P (double) FBA";

function CK_2S_2P_1I_PFL(KmI, Ivar, Vmax, S1, KmS1, S2, KmS2, Keq, KmP1, KmP2, P1, P2)
  KmI/(Ivar + KmI)*((Vmax*(S1/KmS1)*(S2/KmS2) - Vmax/Keq*(KmP1*KmP2/(KmS1*KmS2))*(P1/KmP1)*(P2/KmP2))/((1 + S1/KmS1)*(1 + S2/KmS2) + (1 + P1/KmP1)*(1 + P2/KmP2) - 1));
end

function CK_2S_2P_1A_1I_PYK(KmI, Ivar, A, KmA, Vmax, S1, KmS1, S2, KmS2, Keq, KmP1, KmP2, P1, P2)
  KmI/(KmI + Ivar)*(A/(KmA + A))*((Vmax*(S1/KmS1)*(S2/KmS2) - Vmax/Keq*(KmP1*KmP2/(KmS1*KmS2))*(P1/KmP1)*(P2/KmP2))/((1 + S1/KmS1)*(1 + S2/KmS2) + (1 + P1/KmP1)*(1 + P2/KmP2) - 1));
end

function CK_2S_2P_1A_1I_irrev(S1, KmS1, S2, KmS2, P1, KmP1, P2, KmP2, KmI, Ivar, A, KmA, Vmax)
  KmI/(KmI + Ivar)*(A/(KmA + A))*(Vmax*(S1/KmS1)*(S2/KmS2)/((1 + S1/KmS1)*(1 + S2/KmS2) + (1 + P1/KmP1)*(1 + P2/KmP2) - 1));
end

function CK_2S_2P_2I_irrev(KmI1, I1, KmI2, I2, Vmax, S1, KmS1, S2, KmS2, P1, KmP1, P2, KmP2)
  KmI1/(KmI1 + I1)*(KmI2/(KmI2 + I2))*(Vmax*(S1/KmS1)*(S2/KmS2)/((1 + S1/KmS1)*(1 + S2/KmS2) + (1 + P1/KmP1)*(1 + P2/KmP2) - 1));
end

function CK_3S_2P_1I_GAPDH(KmI, Ivar, Vmax, S1, KmS1, S2, KmS2, S3, KmS3, Keq, KmP1, KmP2, P1, P2)
  KmI/(KmI + Ivar)*((Vmax*(S1/KmS1)*(S2/KmS2)*(S3/KmS3) - Vmax/Keq*(KmP1*KmP2/(KmS1*KmS2*KmS3))*(P1/KmP1)*(P2/KmP2))/((1 + S1/KmS1)*(1 + S2/KmS2)*(1 + S3/KmS3) + (1 + P1/KmP1)*(1 + P2/KmP2) - 1));
end

function CK_2S_2P_2A_1I_LDH(A1, KmA1, A2, KmA2, KmI, Ivar, Vmax, S1, KmS1, S2, KmS2, Keq, KmP1, KmP2, P1, P2)
  A1/(KmA1 + A1)*(A2/(KmA2 + A2))*(KmI/(KmI + Ivar)*(Vmax*(S1/KmS1)*(S2/KmS2) - Vmax/Keq*(KmP1*KmP2/(KmS1*KmS2))*(P1/KmP1)*(P2/KmP2))/((1 + S1/KmS1)*(1 + S2/KmS2) + (1 + P1/KmP1)*(1 + P2/KmP2) - 1));
end

function CK_3S_3P_irrev(Vmax, S1, KmS1, S2, KmS2, S3, KmS3, P1, KmP1, P2, KmP2, P3, KmP3)
  Vmax*(S1/KmS1)*(S2/KmS2)*(S3/KmS3)/((1 + S1/KmS1)*(1 + S2/KmS2)*(1 + S3/KmS3) + (1 + P1/KmP1)*(1 + P2/KmP2)*(1 + P3/KmP3) - 1);
end

function CK_2S_double_3P_double_1I_irrev(KmI, Ivar, Vmax, S1, KmS1, S2, KmS2, S3, P1, KmP1, P2, KmP2, P4, KmP4)
  KmI/(KmI + Ivar)*(Vmax*(S1/KmS1)*(S2/KmS2)*(S3/KmS2)/((1 + S1/KmS1)*(1 + S2/KmS2 + (S2/KmS2)^2) + (1 + P1/KmP1)*(1 + P2/KmP2 + (P2/KmP2)^2)*(1 + P4/KmP4) - 1));
end
CK_2S_double_3P_double_1I_irrev is "CK 2S (double) 3P (double) 1I irrev";

function CK_3S_3P_1I_irrev(KmI, Ivar, Vmax, S1, KmS1, S2, KmS2, S3, KmS3, P1, KmP1, P2, KmP2, P3, kmP3)
  KmI/(KmI + Ivar)*(Vmax*(S1/KmS1)*(S2/KmS2)*(S3/KmS3)/((1 + S1/KmS1)*(1 + S2/KmS2)*(1 + S3/KmS3) + (1 + P1/KmP1)*(1 + P2/KmP2)*(1 + P3/kmP3) - 1));
end

model levering2()

  // Compartments:
  compartment Intracellular = 0.0348;
  compartment Extracellular = 1;

  // Species:
  species G6P in Intracellular = 0.07188817;  // obo.chebi:21008
  species ATP in Intracellular = species10init;  // obo.chebi:15422
  species NAD in Intracellular = 9.99996;  // obo.chebi:15846
  species NADH in Intracellular = 0;  // obo.chebi:16908
  species CoA in Intracellular = 1.00002;  // obo.chebi:15346
  species lactate in Intracellular = 0;  // obo.chebi:24996
  species glucose in Intracellular = 0;
  species HPr_ser_P in Intracellular = 0; HPr_ser_P is "HPr-ser-P";
  species HPr in Intracellular = 0.16;
  species nadp in Intracellular = 4.551436;
  species nadph in Intracellular = 0;
  species FBP in Intracellular = 0.246;  // obo.chebi:28013
  species glucose_extra in Extracellular = 8.191963;
  species lactate_ex in Extracellular = 2.34;  // obo.chebi:24996
  species Pi_extra in Extracellular = 50;  // obo.chebi:18367
  species formate in Extracellular = 0;  // obo.chebi:30751
  species ethanol in Extracellular = 0;  // obo.chebi:16236
  species acetate in Extracellular = 1;
  species triose_P in Intracellular = 2.654928; triose_P is "triose-P";  // hasPart obo.chebi:29052 obo.chebi:16108
  species BPG in Intracellular = 0;  // obo.chebi:16001
  species PEP_pool in Intracellular = 3.106222;
  species pyruvate in Intracellular = 8.929664;  // obo.chebi:15361
  species acetyl_CoA in Intracellular = 0; acetyl_CoA is "acetyl-CoA";  // obo.chebi:15351
  species Pi_intra in Intracellular = 4.137917;
  species ADP in Intracellular = ATP_ADP_sum - species10init;  // obo.chebi:16761

  // Parameters:
  ATP_ADP_sum = 5;
  species10init = 0.172;

  // Assignment rules:
  observable_task0_model0_levering2_species_20 := glucose_extra;
  observable_task0_model0_levering2_species_1 := G6P;
  observable_task0_model0_levering2_species_2 := FBP;
  observable_task0_model0_levering2_species_3 := triose_P;
  observable_task0_model0_levering2_species_10 := ATP;
  observable_task0_model0_levering2_species_21 := lactate_ex;
  observable_plot3_species_1_datagen1 := task1_model1_levering2_species_1;
  observable_plot1_species_20_datagen1 := task1_model1_levering2_species_20;
  observable_plot2_species_20_datagen1 := task2_model2_levering2_species_20;
  observable_plot2_species_1_datagen1 := task3_model3_levering2_species_1;

  // Reactions:
  pts: glucose_extra + PEP_pool + HPr => G6P + pyruvate + HPr; CK_3S_3P_irrev(pts_Vmax, HPr, pts_KmS1, PEP_pool, pts_KmS2, glucose_extra, pts_KmS3, HPr, pts_KmP1, pyruvate, pts_KmP2, G6P, KmP3);
    pts_Vmax = 48.5535; pts_KmS1 = 69.6334; pts_KmS2 = 0.593492; pts_KmS3 = 0.000711129; pts_KmP1 = 0.0103466; pts_KmP2 = 82.4459; KmP3 = 0.01;
  ack: ADP + Pi_intra + acetyl_CoA => ATP + CoA + acetate; CK_3S_3P_1I_irrev(ack_KmI, FBP, ack_Vmax, acetyl_CoA, ack_KmS1, Pi_intra, ack_KmS2, ADP, ack_KmS3, acetate, ack_KmP1, CoA, ack_KmP2, ATP, kmP3);  // modifiers: FBP; hasPart kegg.genes:K04072
    ack_KmI = 95.9885; ack_Vmax = 23.6651; ack_KmS1 = 0.55578; ack_KmS2 = 0.717283; ack_KmS3 = 0.863311; ack_KmP1 = 0.800708; ack_KmP2 = 0.0436744; kmP3 = 21.8726;
  adh: 2 NADH + acetyl_CoA => CoA + 2 NAD + ethanol; CK_2S_double_3P_double_1I_irrev(adh_KmI, ATP, adh_Vmax, acetyl_CoA, adh_KmS1, NADH, adh_KmS2, NADH, ethanol, adh_KmP1, NAD, adh_KmP2, CoA, KmP4);  // modifiers: ATP; hasPart kegg.genes:K00001
    adh_KmI = 99.9461; adh_Vmax = 58.8517; adh_KmS1 = 0.000745245; adh_KmS2 = 0.0202223; adh_KmP1 = 3.31391; adh_KmP2 = 0.0114074; KmP4 = 0.0795358;
  atpase: ATP => Pi_intra + ADP; Intracellular*Hill_Cooperativity(ATP, Shalve, V, h);
    Shalve = 8.15371; V = 60.5877; h = 3;
  Pi_transport: Pi_extra -> Pi_intra; PiT_mod2(Pi_transport_KmI, ATP, Pi_extra, Pi_transport_KmA, Pi_transport_Vmax, Pi_extra, Pi_intra, Pi_transport_KmS, Pi_transport_KmP);  // modifiers: ATP
    Pi_transport_KmI = 16.289; Pi_transport_KmA = 80.4333; Pi_transport_Vmax = 0.252356; Pi_transport_KmS = 6.84057; Pi_transport_KmP = 0.500353;
  gk: ATP + glucose => ADP + G6P; Intracellular*CK_2S_2P_2I_irrev(KmI1, G6P, KmI2, ADP, gk_Vmax, glucose, gk_KmS1, ATP, gk_KmS2, G6P, gk_KmP1, ADP, gk_KmP2);  // kegg.genes:K00845
    KmI1 = 96.5655; KmI2 = 29.2956; gk_Vmax = 42.6111; gk_KmS1 = 6.09834; gk_KmS2 = 1.97174; gk_KmP1 = 0.0100032; gk_KmP2 = 0.01;
  lac_transporter: lactate => lactate_ex; CK_1S_1P_1I_irrev(lac_transporter_KmI, pyruvate, lac_transporter_Vmax, lactate, lac_transporter_KmS, lactate_ex, lac_transporter_KmP);  // modifiers: pyruvate
    lac_transporter_KmI = 3.7222; lac_transporter_Vmax = 957.681; lac_transporter_KmS = 6.1841; lac_transporter_KmP = 1.84584;
  glc_permease: glucose_extra -> glucose; diffusion(k, glucose_extra, glucose);
    k = 0.00013213;
  HPr_kinase: ATP + HPr => ADP + HPr_ser_P; Intracellular*CK_2S_2P_1A_1I_irrev(HPr, HPr_kinase_KmS1, ATP, HPr_kinase_KmS2, HPr_ser_P, HPr_kinase_KmP1, ADP, HPr_kinase_KmP2, HPr_kinase_KmI, Pi_intra, FBP, HPr_kinase_KmA, HPr_kinase_Vmax);  // modifiers: FBP, Pi_intra
    HPr_kinase_KmS1 = 0.198387; HPr_kinase_KmS2 = 0.320338; HPr_kinase_KmP1 = 16.205; HPr_kinase_KmP2 = 0.765287; HPr_kinase_KmI = 2.79646; HPr_kinase_KmA = 12.1241; HPr_kinase_Vmax = 75.6;
  HPr_phosphatase: HPr_ser_P => Pi_intra + HPr; Intracellular*CK_1S_2P_1A_1I_irrev(HPr_phosphatase_KmI, ATP, Pi_intra, HPr_phosphatase_KmA, HPr_phosphatase_Vmax, HPr_ser_P, HPr_phosphatase_KmS, HPr, HPr_phosphatase_KmP1, Pi_intra, HPr_phosphatase_KmP2);  // modifiers: ATP
    HPr_phosphatase_KmI = 5.86785; HPr_phosphatase_KmA = 0.13512; HPr_phosphatase_Vmax = 121.581; HPr_phosphatase_KmS = 8.06926; HPr_phosphatase_KmP1 = 17.3915; HPr_phosphatase_KmP2 = 9.5632;
  gapn: nadp + triose_P => nadph + PEP_pool; Intracellular*CK_2S_2P_irrev(triose_P, gapn_KmS1, nadp, gapn_KmS2, PEP_pool, gapn_KmP1, nadph, gapn_KmP2, gapn_Vmax);
    gapn_KmS1 = 4.27491; gapn_KmS2 = 0.039067; gapn_KmP1 = 4.92954; gapn_KmP2 = 98.9729; gapn_Vmax = 2.42483;
  pfk: ATP + G6P => ADP + FBP; Intracellular*CK_2S_2P_irrev(G6P, pfk_KmS1, ATP, pfk_KmS2, FBP, pfk_KmP1, ADP, pfk_KmP2, pfk_Vmax);  // kegg.genes:K00850
    pfk_KmS1 = 4.75723; pfk_KmS2 = 0.299797; pfk_KmP1 = 21.3025; pfk_KmP2 = 0.429715; pfk_Vmax = 8.45855;
  nadph_ox: nadph => nadp; Intracellular*CK_1S_1P_irrev(nadph_ox_Vmax, nadph, nadph_ox_KmS, nadp, nadph_ox_KmP);
    nadph_ox_Vmax = 78.9633; nadph_ox_KmS = 5.1477; nadph_ox_KmP = 13.0127;
  PiT_active: ATP + Pi_extra => ADP + 2 Pi_intra; CK_2S_2P_double_irrev(PiT_active_Vmax, Pi_extra, PiT_active_KmS1, ATP, PiT_active_KmS2, ADP, PiT_active_KmP1, Pi_intra, PiT_active_KmP2);
    PiT_active_Vmax = 0.0871855; PiT_active_KmS1 = 98.4058; PiT_active_KmS2 = 89.2498; PiT_active_KmP1 = 99.6366; PiT_active_KmP2 = 0.360617;
  fba: FBP -> 2 triose_P; Intracellular*CK_1S_2P_double_FBA(fba_Vmax, FBP, fba_KmS1, fba_Keq, fba_KmP1, triose_P, triose_P);  // kegg.genes:K01624
    fba_Vmax = 627.32; fba_KmS1 = 10.9855; fba_Keq = 0.056; fba_KmP1 = 17.99;
  PaseII: G6P => Pi_intra + glucose; Intracellular*CK_1S_2P_1A_irrev(G6P, PaseII_KmS, glucose, PaseII_KmP1, Pi_intra, PaseII_KmP2, HPr_ser_P, PaseII_KmA, PaseII_Vmax);  // modifiers: HPr_ser_P
    PaseII_KmS = 1.52417; PaseII_KmP1 = 9.51281; PaseII_KmP2 = 96.2342; PaseII_KmA = 0.0254012; PaseII_Vmax = 0.948695;
  gapdh: Pi_intra + NAD + triose_P -> NADH + BPG; Intracellular*CK_3S_2P_1I_GAPDH(gapdh_KmI, NADH, gapdh_Vmax, triose_P, gapdh_KmS1, NAD, gapdh_KmS2, Pi_intra, gapdh_KmS3, gapdh_Keq, gapdh_KmP1, gapdh_KmP2, BPG, NADH);  // kegg.genes:K00134
    gapdh_KmI = 59.7128; gapdh_Vmax = 17.9567; gapdh_KmS1 = 4.00345; gapdh_KmS2 = 1.56582; gapdh_KmS3 = 0.438029; gapdh_Keq = 0.0007; gapdh_KmP1 = 0.279505; gapdh_KmP2 = 0.133646;
  eno: ADP + BPG -> ATP + PEP_pool; Intracellular*CK_2S_2P_ENO(eno_Vmax, BPG, eno_KmS1, ADP, eno_KmS2, eno_Keq, eno_KmP1, eno_KmP2, PEP_pool, ATP);  // kegg.genes:K01689
    eno_Vmax = 21.7206; eno_KmS1 = 0.670465; eno_KmS2 = 0.0332309; eno_Keq = 27.55; eno_KmP1 = 5.11386; eno_KmP2 = 2.81202;
  pyk: ADP + PEP_pool -> ATP + pyruvate; Intracellular*CK_2S_2P_1A_1I_PYK(pyk_KmI, Pi_intra, G6P, pyk_KmA, pyk_Vmax, PEP_pool, pyk_KmS1, ADP, pyk_KmS2, pyk_Keq, pyk_KmP1, pyk_KmP2, pyruvate, ATP);  // modifiers: G6P, Pi_intra; kegg.genes:K00873
    pyk_KmI = 58.7337; pyk_KmA = 8.58968; pyk_Vmax = 49.3587; pyk_KmS1 = 6.72317; pyk_KmS2 = 2.28978; pyk_Keq = 6500; pyk_KmP1 = 6.56443; pyk_KmP2 = 33.5038;
  ldh: NADH + pyruvate -> NAD + lactate; Intracellular*CK_2S_2P_2A_1I_LDH(FBP, KmA1, Pi_intra, KmA2, ldh_KmI, NAD, ldh_Vmax, pyruvate, ldh_KmS1, NADH, ldh_KmS2, ldh_Keq, ldh_KmP1, ldh_KmP2, lactate, NAD);  // modifiers: Pi_intra, FBP; hasPart kegg.genes:K00016 kegg.genes:K003778
    KmA1 = 2.08854; KmA2 = 0.0622563; ldh_KmI = 5.2236; ldh_Vmax = 23.9471; ldh_KmS1 = 0.132532; ldh_KmS2 = 0.00621337; ldh_Keq = 360000; ldh_KmP1 = 15.4053; ldh_KmP2 = 1.47089;
  pfl: CoA + pyruvate -> formate + acetyl_CoA; CK_2S_2P_1I_PFL(pfl_KmI, triose_P, pfl_Vmax, pyruvate, pfl_KmS1, CoA, pfl_KmS2, pfl_Keq, pfl_KmP1, pfl_KmP2, acetyl_CoA, formate);  // modifiers: triose_P; kegg.genes:K00656
    pfl_KmI = 2.66561; pfl_Vmax = 28.1293; pfl_KmS1 = 25.653; pfl_KmS2 = 0.00391879; pfl_Keq = 650; pfl_KmP1 = 0.484717; pfl_KmP2 = 73.6319;

  // Unit definitions:
  unit substance = 1e-3 mole;
end
