// SBML level 2 version 1

model marwan1()

  // Compartments:
  compartment compartment = 1;

  // Species:
  species $Gluc in compartment = 0;  // CHEBI:17234 kegg.compound:C00293
  species Pfr in compartment = 10;  // hasVersion CHEBI:35799 interpro:IPR001294
  species Pi in compartment = 0;
  species Pr in compartment = 0;  // hasVersion CHEBI:35799 interpro:IPR001294
  species S in compartment = 0;
  species V in compartment = 30;
  species Xa in compartment = 0;
  species Xi in compartment = 6;
  species Ya in compartment = 0.9;
  species Yi in compartment = 0;
  species preS in compartment = 0;
  species prepreS in compartment = 200;

  // Assignment rules:
  observable_task0_model0_BIOMD0000000037_S := S;

  // Reactions:
  Glucose_sensor_inactivation: Ya + $Gluc => Yi; kG*Ya*Gluc*compartment;
    kG = 0.1;
  Photoreceptor_activation: Pfr => Pr; compartment*Pfr*IfrSfrPfr;  // isVersionOf GO:0031516
    IfrSfrPfr = 0.1;
  Photoreceptor_decay: Pr => Pi; compartment*kd*Pr;
    kd = 0.1;
  Photoreceptor_inactivation: Pr => Pfr; IrSrPr*Pr*compartment;  // isVersionOf GO:0031517
    IrSrPr = 0;
  S_degradation: S => ; kd_s*S*compartment;  // isVersionOf GO:0006402
    kd_s = 1;
  S_formation: => S; compartment*(alpha1/(1 + V^3));  // modifiers: V; isVersionOf GO:0009299 GO:0006412
    alpha1 = 30;
  S_generation: preS => S; preS*ky*Ya*compartment;  // modifiers: Ya
    ky = 1;
  Transducer_activation: Xi => Xa; Xi*kia*Pr*compartment;  // modifiers: Pr
    kia = 0.1;
  Transducer_inactivation: Xa => Xi; kai*Xa*compartment;
    kai = 0.8;
  V_degradation: V => ; compartment*V*kd_v;  // isVersionOf GO:0006402
    kd_v = 1;
  V_formation: => V; compartment*(alpha2/(1 + S^3));  // modifiers: S; isVersionOf GO:0009299 GO:0006412
    alpha2 = 50;
  preS_formation: prepreS => preS; prepreS*kx*Xa*compartment;  // modifiers: Xa
    kx = 0.2;

  // Unit definitions:
  unit hour = 3600 second;
end
