// SBML level 2 version 4

function function_1(ICSmax, IC, ICt, IS)
  ICSmax/(1 + (IC/ICt)^IS);
end
function_1 is "Rate Law for Intestinal Cholesterol Synthesis";

function Rate_Law_for_Bile_Salt_Synthesis(k5, HFC, HBS)
  k5*HFC/HBS;
end

function function_3(k6, IC, IBS)
  k6*IC*IBS;
end
function_3 is "Rate Law for Cholesterol Absorption";

function function_7(HCSmax, HFC, HCSt, HS)
  HCSmax/(1 + (HFC/HCSt)^HS);
end
function_7 is "Rate Law for Hepatic Cholesterol Synthesis";

function function_9(k10, CEH, HCE)
  k10*CEH*HCE;
end
function_9 is "Rate Law for Release of Stored Cholesterol";

function function_23(k29, HDLC, SRB1)
  k29*HDLC*SRB1;
end
function_23 is "Rate Law for Reverse Cholesterol Transport";

function function_22(k28, HDLC, CETP)
  k28*HDLC*CETP;
end
function_22 is "Rate Law for CETP Mediated TransferTo LDL";

function function_21(k27, HDLC, CETP)
  k27*HDLC*CETP;
end
function_21 is "Rate Law for CETP Mediated Transfer To VLDL";

function function_20(PCSmax, PFC, PPCt, PCSS)
  PCSmax/(1 + (PFC/PPCt)^PCSS);
end
function_20 is "Rate Law for Peripheral Cholesterol Synthesis";

function function_19(k26, PFC, NHDL, LCAT)
  k26*PFC*NHDL*LCAT;
end
function_19 is "Rate Law for HDL Cholesterol Formation";

function function_18(k24, CEH, PCE)
  k24*CEH*PCE;
end
function_18 is "Rate Law for Release of Stored Peripheral Cholesterol";

function function_17(k23, ACAT, PFC)
  k23*ACAT*PFC;
end
function_17 is "Rate Law for Peripheral Cholesterol Storage";

function function_16(kprs, PLDLRsS, PFC)
  kprs*PLDLRsS/PFC;
end
function_16 is "Rate Law for Peripheral LDLR Synthesis";

function function_15(k20, PLDLRs, LDLC)
  k20*PLDLRs*LDLC;
end
function_15 is "Rate Law for Receptor Dependent Peripheral Uptake";

function function_14(k18, LDLC, HLDLRs)
  k18*LDLC*HLDLRs;
end
function_14 is "Rate Law for Receptor Dependent Hepatic Uptake";

function function_13(k17, IDLC, HSL)
  k17*IDLC*HSL;
end
function_13 is "Rate Law for LDL Cholesterol Formation";

function function_12(k15, VLDLC, LPL)
  k15*VLDLC*LPL;
end
function_12 is "Rate Law for IDL Cholesterol Formation";

function function_11(khrs, HLDLRsS, HFC)
  khrs*HLDLRsS/HFC;
end
function_11 is "Rate Law for Hepatic LDLR Synthesis";

function function_10(k11, PFC)
  k11*PFC;
end
function_10 is "Rate Law for Hepatic Nascent HDL Synthesis";

function function_8(k9, ACAT, HFC)
  k9*ACAT*HFC;
end
function_8 is "Rate Law for Hepatic Cholesterol Storage_1";

function function_6(BCRmax, BCRt, HFC, BS)
  BCRmax/(1 + (BCRt/HFC)^BS);
end
function_6 is "Rate Law for Billary Cholesterol Release";

function function_5(k8, PFC)
  k8*PFC;
end
function_5 is "Rate Law for Intestinal Nascent HDL Synthesis";

function function_4(k7, IC, IBS)
  k7*IC*IBS;
end
function_4 is "Rate Law for Cholesterol Excretion";

model mcauley1()

  // Compartments:
  compartment Excreted = 1 volume;
  compartment HepaticTissue = 1 volume;  // isVersionOf FMA:15815
  compartment Intake = 1 volume;
  compartment Intestine = 1 volume;  // isVersionOf BTO:0000648
  compartment PeripheralTissue = 1 volume;  // isVersionOf FMA:9637
  compartment Plasma = 1 volume;  // isVersionOf BTO:0000131

  // Species:
  species $DC in Intake = 304;  // isVersionOf CHEBI:16113
  species NHDL in Plasma = 100;  // isVersionOf uniprot:Q00341
  species PFC in PeripheralTissue = 57516;  // isVersionOf CHEBI:16113
  species $HCS in HepaticTissue = 0;
  species HCE in HepaticTissue = 10000;  // isVersionOf CHEBI:17002
  species ACAT in HepaticTissue = 100;  // hasPart uniprot:P04180 CHEBI:17984
  species CEH in HepaticTissue = 100;  // isVersionOf uniprot:Q6PIU2
  species $HNHDLS in HepaticTissue = 0;
  species VLDLC in Plasma = 20;  // isVersionOf uniprot:P98155
  species HLDLRs in HepaticTissue = 100;  // isVersionOf uniprot:P01130
  species $HLDLRsS in HepaticTissue = 600;
  species IC in Intestine = 3150;  // isVersionOf CHEBI:16113
  species HLDLRD in HepaticTissue = 0;
  species IDLC in Plasma = 20;  // isVersionOf uniprot:P01130
  species LPL in Plasma = 100;  // isVersionOf uniprot:P06858
  species LDLC in Plasma = 100;  // isVersionOf uniprot:P01130
  species HSL in Plasma = 100;  // isVersionOf uniprot:Q05469
  species PLDLRs in PeripheralTissue = 100;  // isVersionOf uniprot:P01130
  species $PLDLRsS in PeripheralTissue = 575.16;
  species PLDLRD in PeripheralTissue = 0;
  species PCE in PeripheralTissue = 9363;  // isVersionOf CHEBI:17002
  species PSS in PeripheralTissue = 0;
  species $ICS in Intestine = 0;
  species HDLC in Plasma = 45;  // isVersionOf uniprot:Q00341
  species LCAT in Plasma = 100;  // hasPart uniprot:P04180 CHEBI:61995
  species $PCS in PeripheralTissue = 0;
  species CETP in Plasma = 100;  // isVersionOf uniprot:P11597
  species SRB1 in HepaticTissue = 100;  // isVersionOf uniprot:Q8WTV0
  species HBS in HepaticTissue = 400;  // isVersionOf CHEBI:22868
  species IBS in Intestine = 467;  // isVersionOf CHEBI:22868
  species EBS in Excreted = 0;  // isVersionOf CHEBI:22868
  species HFC in HepaticTissue = 60000;  // isVersionOf CHEBI:16113
  species EC in Excreted = 0;  // isVersionOf CHEBI:16113
  species $INHDLS in Plasma = 0;

  // Parameters:
  multiplier = 1;

  // Assignment rules:
  observable_plot5_species_23_datagen1 := task5_model5_mcauley1_species_23;
  observable_plot4_species_23_datagen1 := task4_model4_mcauley1_species_23;
  observable_plot3_species_23_datagen1 := task3_model3_mcauley1_species_23;
  observable_plot2_species_23_datagen1 := task2_model2_mcauley1_species_23;
  observable_plot1_species_23_datagen1 := task1_model1_mcauley1_species_23;
  observable_task0_model0_mcauley1_species_23 := LDLC;

  // Reactions:
  Ingestion: $DC => IC; Ingestion_k1*DC*multiplier;  // isVersionOf GO:0070508
    Ingestion_k1 = 1;
  Billary_Cholesterol_Release: HFC => IC; function_6(BCRmax, BCRt, HFC, BS);
    BS = 5; BCRt = 55326; BCRmax = 2000;
  Hepatic_Cholesterol_Synthesis: $HCS => HFC; function_7(HCSmax, HFC, HCSt, HS);
    HS = 5; HCSt = 93925; HCSmax = 500;
  Hepatic_Cholesterol_Storage: HFC => HCE; function_8(k9, ACAT, HFC);  // modifiers: ACAT
    k9 = 1;
  Release_of_Stored_Cholesterol: HCE => HFC; function_9(k10, CEH, HCE);  // modifiers: CEH
    k10 = 5.998;
  Hepatic_Nascent_HDL_Synthesis: $HNHDLS => NHDL; function_10(k11, PFC);  // modifiers: PFC; isVersionOf GO:0042158
    k11 = 0.005;
  VLDL_Cholesterol_Formation: HFC => VLDLC; VLDL_Cholesterol_Formation_k1*HFC;
    VLDL_Cholesterol_Formation_k1 = 0.016;
  Hepatic_LDLR_Synthesis: $HLDLRsS => HLDLRs; function_11(khrs, HLDLRsS, HFC);  // modifiers: HFC
    khrs = 100;
  Hepatic_LDL_Receptor_Degradation: HLDLRs => HLDLRD; Hepatic_LDL_Receptor_Degradation_k1*HLDLRs;
    Hepatic_LDL_Receptor_Degradation_k1 = 0.01;
  VLDL_Cholesterol_ReUptake: VLDLC => HFC; VLDL_Cholesterol_ReUptake_k1*VLDLC;
    VLDL_Cholesterol_ReUptake_k1 = 0.0496;
  IDL_Cholesterol_Formation: VLDLC => IDLC; function_12(k15, VLDLC, LPL);  // modifiers: LPL
    k15 = 0.43;
  Intestinal_Cholesterol_Synthesis: $ICS => IC; function_1(ICSmax, IC, ICt, IS);  // isVersionOf GO:0006695
    IS = 5; ICt = 3120; ICSmax = 100;
  IDL_Cholesterol_ReUptake: IDLC => HFC; IDL_Cholesterol_ReUptake_k1*IDLC;
    IDL_Cholesterol_ReUptake_k1 = 0.054;
  LDL_Cholesterol_Formation: IDLC => LDLC; function_13(k17, IDLC, HSL);  // modifiers: HSL
    k17 = 0.38;
  reaction_22: LDLC => HFC; function_14(k18, LDLC, HLDLRs); reaction_22 is "Receptor Dependent Hepatic Uptake";  // modifiers: HLDLRs
    k18 = 0.068;
  reaction_23: LDLC => HFC; reaction_23_k1*LDLC; reaction_23 is "Receptor Independent Hepatic Uptake";
    reaction_23_k1 = 0.005;
  reaction_24: LDLC => PFC; function_15(k20, PLDLRs, LDLC); reaction_24 is "Receptor Dependent Peripheral Uptake";  // modifiers: PLDLRs
    k20 = 0.00675;
  reaction_25: LDLC => PFC; reaction_25_k1*LDLC; reaction_25 is "Receptor Independent Peripheral Uptake";
    reaction_25_k1 = 5e-6;
  Peripheral_LDLR_Synthesis: $PLDLRsS => PLDLRs; function_16(kprs, PLDLRsS, PFC);  // modifiers: PFC
    kprs = 100;
  reaction_27: PLDLRs => PLDLRD; reaction_27_k1*PLDLRs; reaction_27 is "Peripheral LDL Receptor Degradation";
    reaction_27_k1 = 0.01;
  Peripheral_Cholesterol_Storage: PFC => PCE; function_17(k23, ACAT, PFC);  // modifiers: ACAT
    k23 = 0.017386;
  reaction_29: PCE => PFC; function_18(k24, CEH, PCE); reaction_29 is "Release of Stored Peripheral Cholesterol";  // modifiers: CEH
    k24 = 0.1068;
  Bile_Salt_Release: HBS => IBS; Bile_Salt_Release_k1*HBS;  // isVersionOf GO:0015721
    Bile_Salt_Release_k1 = 6;
  Peripheral_Steroid_Production: PFC => PSS; Peripheral_Steroid_Production_k1*PFC;
    Peripheral_Steroid_Production_k1 = 0.0005;
  HDL_Cholesterol_Formation: NHDL + PFC => HDLC; function_19(k26, PFC, NHDL, LCAT);  // modifiers: LCAT
    k26 = 1.5e-5;
  Peripheral_Cholesterol_Synthesis: $PCS => PFC; function_20(PCSmax, PFC, PPCt, PCSS);
    PCSS = 5; PPCt = 80342; PCSmax = 500;
  CETP_Mediated_Transfer_To_VLDL: HDLC => VLDLC; function_21(k27, HDLC, CETP);  // modifiers: CETP; isVersionOf GO:0030301
    k27 = 0.01;
  CETP_Mediated_TransferTo_LDL: HDLC => LDLC; function_22(k28, HDLC, CETP);  // modifiers: CETP; isVersionOf GO:0030301
    k28 = 0.001;
  Reverse_Cholesterol_Transport: HDLC => HFC; function_23(k29, HDLC, SRB1);  // modifiers: SRB1; isVersionOf GO:0043691
    k29 = 0.05;
  Bile_Salt_Return: IBS => HBS; Bile_Salt_Return_k1*IBS;  // isVersionOf GO:0015721
    Bile_Salt_Return_k1 = 4.29;
  Bile_Salt_Excretion: IBS => EBS; Bile_Salt_Excretion_k1*IBS;  // isVersionOf GO:0015721
    Bile_Salt_Excretion_k1 = 0.856;
  Bile_Salt_Synthesis: HFC => HBS; Rate_Law_for_Bile_Salt_Synthesis(k5, HFC, HBS);  // isVersionOf GO:0006699
    k5 = 2.66;
  Cholesterol_Absorption: IC => HFC; function_3(k6, IC, IBS);  // modifiers: IBS; hasVersion GO:0030299
    k6 = 0.0005286;
  Cholesterol_Excretion: IC => EC; function_4(k7, IC, IBS);  // modifiers: IBS; isVersionOf GO:0033344
    k7 = 0.0005286;
  Intestinal_Nascent_HDL_Synthesis: $INHDLS => NHDL; function_5(k8, PFC);  // modifiers: PFC; isVersionOf GO:0042158
    k8 = 0.0005;

  // Unit definitions:
  unit substance = dimensionless;
  unit time = 86400 second;
  unit volume = dimensionless;
end
