// SBML level 2 version 4

model moriya1()

  // Compartments:
  compartment default = 1 volume;  // isVersionOf GO:0005623

  // Species:
  species s130 in default = 0; s130 is "Vdc18";  // isVersionOf uniprot:P41411
  species Cdc13p_Rum1 in default = 0; Cdc13p_Rum1 is "Cdc13p-Rum1";  // hasPart uniprot:P40380 uniprot:P10815
  species Cig2_Rum1 in default = 0; Cig2_Rum1 is "Cig2-Rum1";  // hasPart uniprot:P40380 uniprot:P36630
  species Cig2p_Rum1 in default = 0; Cig2p_Rum1 is "Cig2p-Rum1";  // hasPart uniprot:P36630 uniprot:P40380
  species $s157 in default = 0; s157 is "UDNA";  // isVersionOf CHEBI:16991
  species Cdc13_Rum1 in default = 0; Cdc13_Rum1 is "Cdc13-Rum1";  // hasPart uniprot:P10815 uniprot:P40380
  species Rum1 in default = 0;  // isVersionOf uniprot:P40380
  species $s4 in default = 0; s4 is "Vdrum";  // isVersionOf uniprot:P40380
  species $sa4_degraded in default = 0;
  species Srw1 in default = 0;  // isVersionOf uniprot:O13286
  species Slp1A in default = 0;  // isVersionOf uniprot:P78972
  species s49 in default = 0; s49 is "Puc1";  // isVersionOf uniprot:P25009
  species IE in default = 0;
  species $iIE in default = 0;
  species $rum1 in default = 0; rum1 is "rum1+";  // isVersionOf uniprot:P40380
  species $cig2 in default = 0; cig2 is "cig2+";  // isVersionOf uniprot:P36630
  species Cdc13 in default = 0;  // isVersionOf uniprot:P10815
  species $cdc13 in default = 0; cdc13 is "cdc13+";  // isVersionOf uniprot:P10815
  species pCdc13 in default = 0;  // isVersionOf kegg.compound:C00562 uniprot:P10815
  species $sa161_degraded in default = 0;
  species Cig2p in default = 0;  // isVersionOf kegg.compound:C00562 uniprot:P36630
  species Pyp3 in default = 0;  // isVersionOf uniprot:P32587
  species $iSrw1 in default = 0;  // isVersionOf uniprot:O13286
  species $iSlp1 in default = 0;  // isVersionOf uniprot:P78972
  species Cig2 in default = 0;  // isVersionOf uniprot:P36630
  substanceOnly species $iCdc10 in default = 0;  // isVersionOf uniprot:P01129
  species Cdc10 in default = 0;  // isVersionOf uniprot:P01129
  species Mik1 in default = 0;  // isVersionOf uniprot:P30290
  species $mik1 in default = 0; mik1 is "mik1+";  // isVersionOf uniprot:P30290
  species $sa347_degraded in default = 0;
  species Cig1 in default = 0;  // isVersionOf uniprot:P24865
  species $cig1 in default = 0; cig1 is "cig1+";  // isVersionOf uniprot:P24865
  species $sa353_degraded in default = 0;
  species $s78 in default = 0; s78 is "Clp1+";  // isVersionOf uniprot:Q10299
  species $iWee1 in default = 0;  // isVersionOf uniprot:P07527
  species Wee1 in default = 0;  // isVersionOf uniprot:P07527
  species s81 in default = 0; s81 is "Clp1";  // isVersionOf uniprot:Q10299
  species $iCdc25 in default = 0;  // isVersionOf uniprot:P06652
  species Cdc25 in default = 0;  // isVersionOf uniprot:P06652
  species Cdc18T in default = 0;  // isVersionOf uniprot:P41411
  species $cdc18 in default = 0; cdc18 is "cdc18+";  // isVersionOf uniprot:P41411
  species $sa386_degraded in default = 0;
  species $s89 in default = 0; s89 is "preRC";  // isVersionOf GO:0005656
  species $s9 in default = 0; s9 is "Vdcyc";  // isVersionOf uniprot:P25009
  species postRC in default = 0;  // isVersionOf GO:0000808
  species repldna in default = 0;  // isVersionOf CHEBI:16991
  species $irepldna in default = 0;  // isVersionOf CHEBI:16991
  species $sa370_degraded in default = 0;
  species $sa44_degraded in default = 0;

  // Parameters:
  Cdc10T = 1;
  Cdc25T = 1;
  Ja25 = 0.03;
  Jac10 = 0.01;
  Jaie = 0.01;
  Jaslp = 0.01;
  Jasrw = 0.01;
  Jawee = 0.04;
  Ji25 = 0.03;
  Jic10 = 0.01;
  Jiie = 0.01;
  Jipre = 0.01;
  Jislp = 0.01;
  Jisrw = 0.01;
  Jiwee = 0.03;
  Puc1 = 1;
  Rad3 = 1;
  Slp1T = 1;
  Srw1T = 1;
  Va25_dash2 = 1; Va25_dash2 is "Va25''";
  Vamik = 0.25;
  Vamik_dash = 0.75; Vamik_dash is "Vamik'";
  Vawee_dash = 0.24; Vawee_dash is "Vawee'";
  Vawee_dash2 = 1; Vawee_dash2 is "Vawee''";
  Vi25 = 0.3;
  Vi25_dash = 0.24; Vi25_dash is "Vi25'";
  Vi25_dash2 = 1; Vi25_dash2 is "Vi25''";
  Vimik = 0.75;
  Vimik_dash = 10; Vimik_dash is "Vimik'";
  Vimik_dash2 = 10; Vimik_dash2 is "Vimik''";
  Vimik_dash3 = 0.25; Vimik_dash3 is "Vimik'''";
  Viwee_dash = 0; Viwee_dash is "Viwee'";
  Viwee_dash2 = 1; Viwee_dash2 is "Viwee''";
  Wee1T = 1;
  beta = 10;
  k = 0.1;
  k255 = 0.1;
  k25_dash = 0.01; k25_dash is "k25'";
  k25_dash2 = 1; k25_dash2 is "k25''";
  k_dash = 10; k_dash is "k'";
  kac10 = 0.125;
  kaie = 0.0975;
  kaie_dash = 0.05; kaie_dash is "kaie'";
  kaslp = 1;
  kasrw = 1.25;
  kasrw_dash = 30; kasrw_dash is "kasrw'";
  kdc18 = 0.001;
  kdc18c13 = 0.45;
  kdc18cig = 1;
  kdc18cig_dash = 0; kdc18cig_dash is "kdc18cig'";
  kdci1 = 0.1;
  kdci1_dash = 5; kdci1_dash is "kdci1'";
  kdci1_dash2 = 0.2; kdci1_dash2 is "kdci1''";
  kdcig = 0.02;
  kdcig_dash = 1; kdcig_dash is "kdcig'";
  kdcyc = 0.018;
  kdcycslp = 1;
  kdcycslp_dash = 0.0003; kdcycslp_dash is "kdcycslp'";
  kdcycsrw = 1;
  kdcycsrw_dash = 0.0001; kdcycsrw_dash is "kdcycsrw'";
  kdflp = 0.1;
  kdrum = 0.4;
  kdrumc13 = 50;
  kdrumc13_dash = 5; kdrumc13_dash is "kdrumc13'";
  kdrumci1 = 1;
  kdrumcig = 15;
  kdrumcig_dash = 10;
  kdrumpuc = 0.1;
  kic10 = 0.01;
  kic10_dash = 3; kic10_dash is "kic10'";
  kiie = 0.04;
  kini_dash = 10;
  kini_dash2 = 10; kini_dash2 is "kini''";
  kini_dash3 = 0; kini_dash3 is "kini'''";
  kipre = 1;
  kipre_dash = 1; kipre_dash is "kipre'";
  kislp = 0.2;
  kisrw = 1.5;
  kisrw_dash = 40; kisrw_dash is "kisrw'";
  kisrw_dash2 = 1; kisrw_dash2 is "kisrw''";
  kisrw_dash3 = 4; kisrw_dash3 is "kisrw'''";
  kisrw_dash4 = 4; kisrw_dash4 is "kisrw''''";
  kmik = 0;
  kmik_dash = 0.01; kmik_dash is "kmik'";
  kmik_dash2 = 4; kmik_dash2 is "kmik''";
  ko18 = 100;
  ko18r = 1;
  kori = 125;
  kpyp = 0.6;
  kpyp2 = 0.01;
  krepl = 2;
  ksc18 = 0.005;
  ksc18_dash = 0.075; ksc18_dash is "ksc18'";
  ksci1 = 0.0015;
  kscig = 0.002;
  kscig_dash = 0.04; kscig_dash is "kscig'";
  kscyc = 0.03;
  ksflp = 0.0015;
  ksflp_dash = 0.015; ksflp_dash is "ksflp'";
  ksrum = 1;
  kwee_dash = 0.01; kwee_dash is "kwee'";
  kwee_dash2 = 0.5; kwee_dash2 is "kwee''";
  lcm = 1;
  lcp = 3;
  lm = 100;
  lp = 500;
  n = 4;
  oriT = 1;

  // Assignment rules:
  UDNA := Rad3*(k*Cdc18T + k_dash*postRC*Cdc18/((ko18r + Vdc18)/ko18 + Cdc18));
  Cdc18 := Cdc18T - chrom;
  preRC := (oriT - postRC - repldna)*Cdc18/((ko18r + Vdc18)/ko18 + Cdc18);
  chrom := 2*oriT*Cdc18T/(BB + sqrt(BB^2 - 4*oriT*Cdc18T));
  k25 := k25_dash*Cdc25T + (k25_dash2 - k25_dash)*Cdc25;
  Vdc18 := kdc18 + kdc18c13*Cdc13 + kdc18cig*Cig2 + kdc18cig_dash*Cig2p;
  Vdcyc := kdcyc + kdcycsrw*Srw1 + kdcycsrw_dash*Srw1T + kdcycslp*Slp1A + kdcycslp_dash*Slp1T;
  Vdrum := kdrum + kdrumpuc*Puc1 + kdrumci1*Cig1 + kdrumcig*Cig2 + kdrumcig_dash*Cig2p + kdrumc13*Cdc13 + kdrumc13_dash*pCdc13;
  kwee := kwee_dash*Wee1T + (kwee_dash2 - kwee_dash)*Wee1;
  BB := oriT + Cdc18T + (ko18r + Vdc18)/ko18;
  observable_task0_model0_moriya1_s84 := Cdc18T;
  observable_task0_model0_moriya1_s67 := Cig2;
  observable_task0_model0_moriya1_s56 := Cdc13;
  observable_task0_model0_moriya1_s166 := Rum1;

  // Reactions:
  re12: $cdc13 => Cdc13; kscyc; re12 is "Cdc13_Synthesis";
  re14: Cdc13p_Rum1 => $sa161_degraded + pCdc13; Vdrum*Cdc13p_Rum1; re14 is "Trim_Dissociation_Rum1degradation";  // modifiers: s4
  re15: Cdc13_Rum1 => $sa4_degraded + Rum1; Vdcyc*Cdc13_Rum1;  // modifiers: s9
  re16: Cdc13_Rum1 => $sa161_degraded + Cdc13; Vdrum*Cdc13_Rum1; re16 is "Trim_Dissociation_Rum1degradation";  // modifiers: s4
  re17: Cdc13p_Rum1 => $sa4_degraded + Rum1; Vdcyc*Cdc13p_Rum1;  // modifiers: s9
  re18: Cdc13p_Rum1 => Cdc13_Rum1; (kpyp2 + k25)*Cdc13p_Rum1; re18 is "Cdc13_Dephosphorylation";  // modifiers: Cdc25, Pyp3
  re19: $cig2 => Cig2; kscig*Cdc10T + kscig_dash*Cdc10; re19 is "Cdc13_Synthesis";  // modifiers: Cdc10
  Cdc13_Phosphorylation: Cig2 => Cig2p; kmik_dash2*Mik1*Cig2;  // modifiers: Mik1
  re21: Cig2p => Cig2; k25*k255*Cig2p + kpyp*Cig2p/(1 + beta*UDNA); re21 is "Cdc13_Dephosphorylation";  // modifiers: s157, Cdc25, Pyp3
  re22: Cig2 + Rum1 -> Cig2_Rum1; lcp*Cig2*Rum1 - lcm*Cig2_Rum1; re22 is "Rum1+Cdc13_association";
  re23: Cig2_Rum1 => $sa44_degraded + Rum1; (kdcig + kdcig_dash*Slp1A)*Cig2_Rum1;  // modifiers: Slp1A
  re24: Cig2p + Rum1 -> Cig2p_Rum1; lcp*Cig2p*Rum1 - lcm*Cig2p_Rum1; re24 is "Rum1+Cdc13_association";
  re25: Cig2p_Rum1 => $sa44_degraded + Rum1; (kdcig + kdcig_dash*Slp1A)*Cig2p_Rum1;  // modifiers: Slp1A
  re27: Cig2p_Rum1 => Cig2_Rum1; k25*k255*Cig2p_Rum1 + kpyp*Cig2p_Rum1/(1 + beta*UDNA); re27 is "Cdc13_Dephosphorylation";  // modifiers: Cdc25, Pyp3
  re28: Cig2 => $sa44_degraded; (kdcig + kdcig_dash*Slp1A)*Cig2;  // modifiers: Slp1A
  re29: Cig2p_Rum1 => Cig2p; Vdrum*Cig2p_Rum1;  // modifiers: s4
  re3: $iSrw1 => Srw1; (kasrw + kasrw_dash*Slp1A)*(Srw1T - Srw1)/(Jasrw + (Srw1T - Srw1));  // modifiers: Slp1A
  re30: Cig2_Rum1 => $sa161_degraded + Cig2; Vdrum*Cig2_Rum1;  // modifiers: s4
  re31: Cig2p => $sa44_degraded; (kdcig + kdcig_dash*Slp1A)*Cig2p;  // modifiers: Slp1A
  re32: Cdc10 => $iCdc10; (kic10 + kic10_dash*Cig2)*Cdc10/(Jic10 + Cdc10);  // modifiers: Cig2
  re33: $iCdc10 => Cdc10; kac10*(Cdc10T - Cdc10)/(Jac10 + (Cdc10T - Cdc10));
  re34: $mik1 => Mik1; Vamik*Cdc10T + Vamik_dash*Cdc10;  // modifiers: Cdc10
  re35: Mik1 => $sa347_degraded; (Vimik + Vimik_dash*Cig2 + Vimik_dash2*Cdc13 + Vimik_dash3*pCdc13)*Mik1;  // modifiers: pCdc13, Cdc13, Cig2
  re36: $cig1 => Cig1; ksci1;
  re37: Cig1 => $sa353_degraded; (kdci1 + kdci1_dash*Slp1A + kdci1_dash2*Srw1)*Cig1;  // modifiers: Srw1, Slp1A
  re38: $s78 => s81; ksflp + ksflp_dash*Slp1A;  // modifiers: Slp1A
  re39: $iWee1 => Wee1; (Vawee_dash + Vawee_dash2*s81)*(Wee1T - Wee1)/(Jawee + (Wee1T - Wee1));  // modifiers: s81
  re4: Srw1 => $iSrw1; (kisrw + kisrw_dash*Cig2 + kisrw_dash2*Cdc13 + kisrw_dash3*Puc1 + kisrw_dash4*Cig1)*Srw1/(Jisrw + Srw1);  // modifiers: Cig2, Cig1, s49, Cdc13
  re40: Wee1 => $iWee1; (Viwee_dash + Viwee_dash2*Cdc13)*Wee1/(Jiwee + Wee1);  // modifiers: Cdc13
  re41: pCdc13 => $sa4_degraded; Vdcyc*pCdc13;  // modifiers: s9
  re42: Cdc13 => $sa4_degraded; Vdcyc*Cdc13;  // modifiers: s9
  re43: Cdc13_Rum1 => Cdc13p_Rum1; (kmik_dash*Mik1 + kwee)*Cdc13_Rum1;  // modifiers: Mik1, Wee1
  re44: Cig2_Rum1 => Cig2p_Rum1; kmik_dash2*Mik1*Cig2_Rum1;  // modifiers: Mik1
  re45: $iCdc25 => Cdc25; Va25_dash2*Cdc13*(Cdc25T - Cdc25)/(Ja25 + (Cdc25T - Cdc25));  // modifiers: Cdc13
  re46: Cdc25 => $iCdc25; (Vi25_dash + Vi25_dash2*s81 + Vi25*UDNA)*Cdc25/(Ji25 + Cdc25);  // modifiers: s157, s81
  re47: $cdc18 => Cdc18T; ksc18*(Cdc10T - Cdc10 + Cdc10) + ksc18_dash*Cdc10;  // modifiers: Cdc10
  re48: Cdc18T => $sa386_degraded; Vdc18*Cdc18T;  // modifiers: s130
  re5: $iIE => IE; (kaie*Cdc13 + kaie_dash*Cig1)*(1 - IE)/(Jaie + (1 - IE));  // modifiers: Cdc13, Cig1
  re53: s81 => $sa370_degraded; kdflp*s81;
  re54: Rum1 + Cdc13 -> Cdc13_Rum1; lp*Cdc13*Rum1 - lm*Cdc13_Rum1;
  re56: pCdc13 => Cdc13; (kpyp2 + k25)*pCdc13;  // modifiers: Pyp3, Cdc25
  re57: Cdc13 => pCdc13; (kmik_dash*Mik1 + kwee)*Cdc13;  // modifiers: Mik1, Wee1
  re58: pCdc13 + Rum1 -> Cdc13p_Rum1; lp*pCdc13*Rum1 - lm*Cdc13p_Rum1;
  re6: IE => $iIE; kiie*IE/(Jiie + IE);
  re60: Rum1 => $sa161_degraded; Vdrum*Rum1;  // modifiers: s4
  re62: $rum1 => Rum1; ksrum;
  re66: $s89 => postRC; (kini_dash*Cdc13 + kini_dash2*Cig2 + kini_dash3*Cig2p)*preRC;  // modifiers: Cig2p, Cdc13, Cig2
  re67: repldna => $irepldna; kori/(1 + ((kipre*Cdc13 + kipre_dash*Cig2)/Jipre)^n)*repldna;  // modifiers: Cig2p, Cdc13, Cig2
  re68: postRC => repldna; krepl*postRC;
  re7: $iSlp1 => Slp1A; kaslp*IE*(Slp1T - Slp1A)/(Jaslp + (Slp1T - Slp1A));  // modifiers: IE
  re8: Slp1A => $iSlp1; kislp*Slp1A/(Jislp + Slp1A);

  // Unit definitions:
  unit time = second;
  unit length = metre;
  unit area = metre^2;
  unit volume = litre;
  unit substance = mole;
end
