// SBML level 2 version 1

model morris1()

  // Compartments:
  compartment geometry = 1e-12;

  // Species:
  species CDK2cycA in geometry = 0;  // hasPart uniprot:P00546 interpro:IPR015453
  species CDK2cycA_star_ in geometry = 0;  // hasPart uniprot:P00546 interpro:IPR015453
  species Cdk2 in geometry = 1e-7;  // uniprot:P00546
  species CyclinA in geometry = 4e-7;  // isVersionOf interpro:IPR015453

  // Parameters:
  basal_fluorescence = 1.212106;

  // Assignment rules:
  total_fluorescence := CDK2cycA*599990*1e6/43200 + CDK2cycA_star_*599990*1e6/43200 + basal_fluorescence;
  observable_task0_model0_Morris2002_CellCycle_CDK2Cyclin_total_fluorescence := total_fluorescence;

  // Reactions:
  // Morris et al 2002 JBC 277(26): 23847--23853 kf and kb values not published kobs2 = 2.5 +- 0.1 /sec kf=0.813/sec and kb=0.557/sec used simulation
  Activation: CDK2cycA -> CDK2cycA_star_; Activation_kf*CDK2cycA*geometry - Activation_kb*CDK2cycA_star_*geometry;  // isVersionOf GO:0004693
    Activation_kf = 0.813; Activation_kb = 0.557;
  // kf = 19/sec/uM and kb = 25/sec Morris et al 2002 JBC 277(26): 23847--23853 Table pp.23849
  Binding: Cdk2 + CyclinA -> CDK2cycA; Binding_kf*Cdk2*CyclinA*geometry - Binding_kb*CDK2cycA*geometry;  // isVersionOf GO:0006461 GO:0030332
    Binding_kf = 19000000; Binding_kb = 25;
end
