// SBML level 2 version 4

model nyman3()

  // Compartments:
  compartment default = 1;  // isVersionOf GO:0005623

  // Species:
  species IR in default = 8.940676;  // hasPart uniprot:P15208
  species IRS in default = 9.439982;  // isVersionOf uniprot:P35569
  species IRSiP in default = 0.5600181;  // isVersionOf kegg.compound:C00562 uniprot:P35569
  species IRi in default = 4.838639e-6;  // isVersionOf uniprot:P15208
  species IRiP in default = 0.4240766;  // isVersionOf kegg.compound:C00562 uniprot:P15208
  species IRins in default = 0.59689;  // hasPart uniprot:P01325 uniprot:P15208
  species IRp in default = 0.03835259;  // isVersionOf kegg.compound:C00562 uniprot:P15208
  species X in default = 9.996359;  // isVersionOf FMA:74531
  species Xp in default = 0.003641136;  // isVersionOf FMA:74531 kegg.compound:C00562

  // Parameters:
  ins = 100;
  k1a = 0.153418;
  k1aBasic = 0.0383389;
  k1b = 3.4699e-6;
  k1c = 0.574266;
  k1d = 4.78844;
  k1e = 5.25027e-5;
  k1f = 119.353;
  k1g = 4.14899;
  k1r = 37954.7;
  k21 = 538004;
  k22 = 1.7252e-6;
  k3 = 8.62917e-5;
  km2 = 262759;
  km23 = 88.9096;
  km3 = 0.132671;

  // Assignment rules:
  IRmem := (IRp + IRins + IR)*10;
  measIRp := (IRp + IRiP)*31.8;
  measIRS1 := IRSiP*21.2;
  observable_task0_model0_nyman3_IRmem := task0_model0_nyman3_IRmem;
  observable_task0_model0_nyman3_measIRS1 := task0_model0_nyman3_measIRS1;
  observable_task0_model0_nyman3_measIRp := task0_model0_nyman3_measIRp;

  // Reactions:
  v1a: IR => IRins; k1a*ins*IR + k1aBasic*IR;
  v1b: IRins => IR; k1b*IRins;
  v1c: IRins => IRp; k1c*IRins;
  v1d: IRp => IRiP; k1d*IRp;
  v1e: IRiP => IRi; IRiP*(k1e + k1f*Xp/(1 + Xp));  // modifiers: Xp
  v1g: IRp => IR; k1g*IRp;
  v1r: IRi => IR; k1r*IRi;
  v2: IRS => IRSiP; k21*IRS*(IRp + k22*IRiP)/(1 + km23*Xp);  // modifiers: Xp, IRp, IRiP
  v3: X => Xp; k3*X*IRSiP;  // modifiers: IRSiP
  vm2: IRSiP => IRS; km2*IRSiP;
  vm3: Xp => X; km3*Xp;
end
