// SBML level 2 version 4

function HenriMichaelisMenten_irreversible_kcat(kcat, enzyme, substrate, Km)
  kcat*enzyme*substrate/(Km + substrate);
end
HenriMichaelisMenten_irreversible_kcat is "Henri-Michaelis-Menten (irreversible) kcat";

model orfao1()

  // Compartments:
  compartment compartment_1 = 1;

  // Species:
  species II in compartment_1 = 1.4;  // uniprot:P00734
  species IIa in compartment_1 = 0;  // uniprot:P00734
  species IIa_ATIII in compartment_1 = 0;  // hasPart uniprot:P01008 uniprot:P00734
  species IIa_alpha2M in compartment_1 = 0;  // hasPart uniprot:P01023 uniprot:P00734
  species PL in compartment_1 = 0.04999999;
  species PT in compartment_1 = 0;
  species RVV in compartment_1 = 0.03;
  species V in compartment_1 = 0.02999999;  // uniprot:P12259
  species Va in compartment_1 = 0;  // uniprot:P12259
  species X in compartment_1 = 0.1999999;  // uniprot:P00742
  species Xa in compartment_1 = 0;  // uniprot:P00742
  species Xa_ATIII in compartment_1 = 0;  // hasPart uniprot:P01008 uniprot:P00742

  // Parameters:
  k_PL = 801.4;
  k_PT = 122.9;
  kcat_2 = 12.4;
  kcat_II = 43.87;
  kcat_V = 7.844;
  kcat_X = 239.1;
  ki_IIaATIII = 0.7859;
  ki_IIaAlpha2M = 0.1762;
  ki_Xa = 4.531;
  km_2 = 0.06148;
  km_II = 62.25;
  km_V = 149.7;
  km_X = 23.65;

  // Assignment rules:
  AmAct := IIa + 0.556*IIa_alpha2M;
  observable_plot2_IIa_datagen1 := task2_model2_orfao1_IIa;
  observable_plot1_IIa_datagen1 := task1_model1_orfao1_IIa;
  observable_task0_model0_orfao1_IIa := IIa;

  // Reactions:
  R1: X => Xa; compartment_1*HenriMichaelisMenten_irreversible_kcat(kcat_X, RVV, X, km_X);  // modifiers: RVV
  R2: Xa => Xa_ATIII; compartment_1*ki_Xa*Xa;
  R3: PL + Xa + Va -> PT; compartment_1*(k_PT*Va*Xa*PL - k_PL*PT);
  R4: V => Va; compartment_1*HenriMichaelisMenten_irreversible_kcat(kcat_V, IIa, V, km_V);  // modifiers: IIa
  R5: II => IIa; compartment_1*HenriMichaelisMenten_irreversible_kcat(kcat_II, PT, II, km_II);  // modifiers: PT
  R6: II => IIa; compartment_1*HenriMichaelisMenten_irreversible_kcat(kcat_2, Xa, II, km_2);  // modifiers: Xa
  R7: IIa => IIa_alpha2M; compartment_1*ki_IIaAlpha2M*IIa;
  R8: IIa => IIa_ATIII; compartment_1*ki_IIaATIII*IIa;

  // Unit definitions:
  unit substance = 1e-6 mole;
  unit time = 60 second;
end
