// SBML level 3 version 1

model ouattara1()

  // Compartments:
  compartment default = 1;

  // Species:
  species T in default = 1000;
  species TStar in default = 50;
  species V in default = 100;

  // Parameters:
  beta = 1e-7;
  c = 0.3;
  delta = 0.01;
  k = 1000;
  mu = 0.09;
  s = 10;

  // Assignment rules:
  TplusTStar := T + TStar;
  observable_task0_model0_ouattara1_V := V;
  observable_task0_model0_ouattara1_T := T;
  observable_task0_model0_ouattara1_TStar := TStar;
  observable_task0_model0_ouattara1_TplusTStar_0 := task0_model0_ouattara1_TplusTStar;

  // Reactions:
  v1: -> T; s;
  v2: T -> ; delta*T;
  v3: T -> TStar; beta*T*V;  // modifiers: V
  v5: TStar -> ; mu*TStar;
  v6: -> V; k*TStar;  // modifiers: TStar
  v7: V -> ; c*V;
end
