// SBML level 3 version 1

model ribeiro1()

  // Compartments:
  compartment default = 1;

  // Species:
  species NN in default = 10;
  species Nplus in default = 0;

  // Parameters:
  alpha = 0.125;
  dN = 0.001;
  p = 0.00092;
  sigma = 0.032;

  // Assignment rules:
  ratio := Nplus/NN;
  observable_task0_model0_ribeiro1_ratio := task0_model0_ribeiro1_ratio;
  observable_task0_model0_ribeiro1_NN := NN;
  observable_task1_model1_ribeiro1_ratio := ratio;
  observable_plot1_ratio_datagen1 := task1_model1_ribeiro1_ratio;
  observable_task1_model1_ribeiro1_NN := NN;
  observable_plot2_NN_datagen1 := task1_model1_ribeiro1_NN;
  observable_task2_model2_ribeiro1_ratio := ratio;
  observable_plot2_ratio_datagen1 := task2_model2_ribeiro1_ratio;
  observable_task2_model2_ribeiro1_NN := NN;
  observable_plot3_NN_datagen1 := task2_model2_ribeiro1_NN;

  // Reactions:
  v1: -> Nplus; alpha*sigma;
  v2: Nplus -> ; dN*Nplus;
  v3: -> NN; sigma;
  v4: -> NN; p*NN;
  v5: NN -> ; dN*NN;
end
