// SBML level 2 version 4

model sarma1()

  // Compartments:
  compartment compartment_1 = 1;  // isVersionOf GO:0005623

  // Species:
  species MK in compartment_1 = 1200;  // isVersionOf uniprot:P27361
  species MKK_P in compartment_1 = 0; MKK_P is "MKK-P";  // isVersionOf kegg.compound:C00562 uniprot:Q02750
  species MKK_P_MKKK_P in compartment_1 = 0; MKK_P_MKKK_P is "MKK-P_MKKK-P";  // hasPart kegg.compound:C00562 uniprot:Q02750 uniprot:P04049
  species MKK_PP_P2 in compartment_1 = 0; MKK_PP_P2 is "MKK-PP_P2";  // hasPart kegg.compound:C00562 uniprot:P51452 uniprot:Q02750
  species P2 in compartment_1 = 200;  // isVersionOf uniprot:P51452
  species MKK_P_P2 in compartment_1 = 0; MKK_P_P2 is "MKK-P_P2";  // hasVersion kegg.compound:C00562 uniprot:P51452 uniprot:Q02750
  species MKK_P2 in compartment_1 = 0;  // hasPart uniprot:P51452 uniprot:Q02750
  species MKKK in compartment_1 = 300;  // isVersionOf uniprot:P04049
  species MKKK_Sig in compartment_1 = 0;  // hasPart uniprot:P04049 uniprot:P61225
  species Sig in compartment_1 = 10;  // isVersionOf uniprot:P61225
  species MKKK_P_P1 in compartment_1 = 0; MKKK_P_P1 is "MKKK-P_P1";  // isVersionOf kegg.compound:C00562 uniprot:P04049
  species MKK_PP in compartment_1 = 0; MKK_PP is "MKK-PP";  // isVersionOf kegg.compound:C00562 uniprot:Q02750
  species P1 in compartment_1 = 100;  // isVersionOf uniprot:P51452
  species MK_PP_P2 in compartment_1 = 0; MK_PP_P2 is "MK-PP_P2";  // hasPart kegg.compound:C00562 uniprot:P51452 uniprot:P27361
  species MK_P_P2 in compartment_1 = 0; MK_P_P2 is "MK-P_P2";  // hasPart uniprot:P51452 uniprot:P27361
  species MK_P2 in compartment_1 = 0;  // hasPart kegg.compound:C00562 uniprot:P51452 uniprot:P27361
  species MKK_PP_P1 in compartment_1 = 0; MKK_PP_P1 is "MKK-PP_P1";  // hasPart kegg.compound:C00562 uniprot:P51452 uniprot:Q02750
  species MKK_P_P1 in compartment_1 = 0; MKK_P_P1 is "MKK-P_P1";  // hasPart kegg.compound:C00562 uniprot:Q02750 uniprot:P51452
  species MKK_P1 in compartment_1 = 0;  // hasPart kegg.compound:C00562 uniprot:P51452 uniprot:Q02750
  species MKKK_P1 in compartment_1 = 0;  // hasPart kegg.compound:C00562 uniprot:P51452 uniprot:P04049
  species MK_MKK_PP in compartment_1 = 0; MK_MKK_PP is "MK_MKK-PP";  // hasPart kegg.compound:C00562 uniprot:Q02750 uniprot:P27361
  species MK_P in compartment_1 = 0; MK_P is "MK-P";  // isVersionOf kegg.compound:C00562 uniprot:P27361
  species MK_P_MKK_PP in compartment_1 = 0; MK_P_MKK_PP is "MK-P_MKK-PP";  // hasPart kegg.compound:C00562 uniprot:Q02750 uniprot:P27361
  species MK_PP in compartment_1 = 0; MK_PP is "MK-PP";  // isVersionOf kegg.compound:C00562 uniprot:P27361
  species MKK in compartment_1 = 1200;  // isVersionOf uniprot:Q02750
  species MKKK_P in compartment_1 = 0; MKKK_P is "MKKK-P";  // isVersionOf kegg.compound:C00562 uniprot:P04049
  species MKK_MKKK_P in compartment_1 = 0; MKK_MKKK_P is "MKK_MKKK-P";  // hasPart kegg.compound:C00562 uniprot:P27361 uniprot:Q02750

  // Parameters:
  quantity_1 = 0;

  // Assignment rules:
  observable_plot1_species_8_datagen1 := task2_model2_sarma1_species_8;
  observable_task1_model1_sarma1_species_8 := MKKK_P;

  // Reactions:
  _15: MKK_PP + MK -> MK_MKK_PP; compartment_1*(_15_k1*MK*MKK_PP - _15_k2*MK_MKK_PP);  // isVersionOf GO:0006461
    _15_k2 = 1; _15_k1 = 0.02;
  _6: MKKK_P + MKK -> MKK_MKKK_P; compartment_1*(_6_k1*MKK*MKKK_P - _6_k2*MKK_MKKK_P);  // isVersionOf GO:0006461
    _6_k2 = 1; _6_k1 = 0.02;
  _7: MKK_MKKK_P => MKKK_P + MKK_P; compartment_1*_7_k1*MKK_MKKK_P;  // isVersionOf GO:0016310 GO:0043241
    _7_k1 = 0.01;
  _8: MKKK_P + MKK_P -> MKK_P_MKKK_P; compartment_1*(_8_k1*MKK_P*MKKK_P - _8_k2*MKK_P_MKKK_P);  // isVersionOf GO:0006461
    _8_k2 = 1; _8_k1 = 0.032;
  _9: MKK_P_MKKK_P => MKKK_P + MKK_PP; compartment_1*_9_k1*MKK_P_MKKK_P;  // isVersionOf GO:0016310 GO:0043241
    _9_k1 = 15;
  _10_P2: P2 + MKK_PP -> MKK_PP_P2; compartment_1*(_10_P2_k1*MKK_PP*P2 - _10_P2_k2*MKK_PP_P2);  // isVersionOf GO:0006461
    _10_P2_k2 = 1; _10_P2_k1 = 0.045;
  _11_P2: MKK_PP_P2 => P2 + MKK_P; compartment_1*_11_P2_k1*MKK_PP_P2;  // isVersionOf GO:0016311 GO:0043241
    _11_P2_k1 = 0.092;
  _12_P2: P2 + MKK_P -> MKK_P_P2; compartment_1*(_12_P2_k1*MKK_P*P2 - _12_P2_k2*MKK_P_P2);  // isVersionOf GO:0006461
    _12_P2_k2 = 1; _12_P2_k1 = 0.01;
  _13_P2: MKK_P_P2 => P2 + MKK; compartment_1*_13_P2_k1*MKK_P_P2;  // isVersionOf GO:0016311 GO:0043241
    _13_P2_k1 = 0.086;
  _14_P2: MKK_P2 -> P2 + MKK; compartment_1*(_14_P2_k1*MKK_P2 - _14_P2_k2*MKK*P2);  // isVersionOf GO:0043241
    _14_P2_k2 = 0; _14_P2_k1 = 0;
  _1: Sig + MKKK -> MKKK_Sig; compartment_1*(_1_k1*MKKK*Sig - _1_k2*MKKK_Sig);  // isVersionOf GO:0006461
    _1_k2 = 1; _1_k1 = 0.02;
  _16: MK_MKK_PP => MKK_PP + MK_P; compartment_1*_16_k1*MK_MKK_PP;  // isVersionOf GO:0016310 GO:0043241
    _16_k1 = 0.01;
  _2: MKKK_Sig => Sig + MKKK_P; compartment_1*_2_k1*MKKK_Sig;  // isVersionOf GO:0043241 GO:0016310
    _2_k1 = 1;
  _3: P1 + MKKK_P -> MKKK_P_P1; compartment_1*(_3_k1*MKKK_P*P1 - _3_k2*MKKK_P_P1);  // isVersionOf GO:0006461
    _3_k2 = 1; _3_k1 = 0.02;
  _4: MKKK_P_P1 => P1 + MKKK; compartment_1*_4_k1*MKKK_P_P1;  // isVersionOf GO:0043241 GO:0016311
    _4_k1 = 0.086;
  _10_P1: P1 + MKK_PP -> MKK_PP_P1; compartment_1*(_10_P1_k1*MKK_PP*P1 - _10_P1_k2*MKK_PP_P1);  // isVersionOf GO:0006461
    _10_P1_k2 = 1; _10_P1_k1 = 0.045;
  _5: MKKK_P1 -> P1 + MKKK; compartment_1*(_5_k1*MKKK_P1 - _5_k2*MKKK*P1);  // isVersionOf GO:0043241
    _5_k2 = 0; _5_k1 = 0;
  _11_P1: MKK_PP_P1 => P1 + MKK_P; compartment_1*_11_P1_k1*MKK_PP_P1;  // isVersionOf GO:0016311 GO:0043241
    _11_P1_k1 = 0.092;
  _12_P1: P1 + MKK_P -> MKK_P_P1; compartment_1*(_12_P1_k1*MKK_P*P1 - _12_P1_k2*MKK_P_P1);  // isVersionOf GO:0006461
    _12_P1_k2 = 1; _12_P1_k1 = 0.01;
  _13_P1: MKK_P_P1 => P1 + MKK; compartment_1*_13_P1_k1*MKK_P_P1;  // isVersionOf GO:0043241 GO:0016311
    _13_P1_k1 = 0.086;
  _14_P1: MKK_P1 -> P1 + MKK; compartment_1*(_14_P1_k1*MKK_P1 - _14_P1_k2*MKK*P1);  // isVersionOf GO:0043241
    _14_P1_k2 = 0; _14_P1_k1 = 0;
  _17: MKK_PP + MK_P -> MK_P_MKK_PP; compartment_1*(_17_k1*MK_P*MKK_PP - _17_k2*MK_P_MKK_PP);  // isVersionOf GO:0006461
    _17_k2 = 1; _17_k1 = 0.032;
  _18: MK_P_MKK_PP => MKK_PP + MK_PP; compartment_1*_18_k1*MK_P_MKK_PP;  // isVersionOf GO:0016310 GO:0043241
    _18_k1 = 15;
  _19: P2 + MK_PP -> MK_PP_P2; compartment_1*(_19_k1*MK_PP*P2 - _19_k2*MK_PP_P2);  // isVersionOf GO:0006461
    _19_k2 = 1; _19_k1 = 0.045;
  _20: MK_PP_P2 => P2 + MK_P; compartment_1*_20_k1*MK_PP_P2;  // isVersionOf GO:0016311 GO:0043241
    _20_k1 = 0.092;
  _21: P2 + MK_P -> MK_P_P2; compartment_1*(_21_k1*MK_P*P2 - _21_k2*MK_P_P2);  // isVersionOf GO:0006461
    _21_k2 = 1; _21_k1 = 0.01;
  _22: MK_P_P2 => P2 + MK; compartment_1*_22_k1*MK_P_P2;  // isVersionOf GO:0016311 GO:0043241
    _22_k1 = 0.086;
  _23: MK_P2 -> P2 + MK; compartment_1*(_23_k1*MK_P2 - _23_k2*MK*P2);  // isVersionOf GO:0043241
    _23_k2 = 0; _23_k1 = 0;

  // Unit definitions:
  unit substance = 1e-9 mole;
  unit volume = 1e-3 litre;
end
