// SBML level 2 version 4

function function_4_1_1(A, K1, Ka, V1, MKKK, M_PP)
  V1*MKKK/K1/(1 + MKKK/K1)*((1 + A*M_PP/Ka)/(1 + M_PP/Ka));
end

function function_2(V12, X_P, K12)
  V12*X_P/(K12 + X_P);
end
function_2 is "12";

function function_1(V11, X, K11, A, M_PP, Ka)
  V11*X/K11/(1 + X/K11)*((1 + A*M_PP/Ka)/(1 + M_PP/Ka));
end
function_1 is "11";

function function_4_10_1(K10, k10, P3, M_P, M_PP)
  k10*P3*M_P/K10/(1 + M_PP/K10 + M_P/K10);
end

function function_4_9_1(K9, k9, P3, M_P, M_PP)
  k9*P3*M_PP/K9/(1 + M_PP/K9 + M_P/K9);
end

function function_4_6_1(K6, k6, MKK_P, MKK_PP, P2)
  k6*P2*MKK_P/K6/(1 + MKK_PP/K6 + MKK_P/K6);
end

function function_4_5_1(K5, k5, MKK_P, MKK_PP, P2)
  k5*P2*MKK_PP/K5/(1 + MKK_PP/K5 + MKK_P/K5);
end

function function_4_2_1(K2, k2, MKKK_P, P1)
  k2*P1*MKKK_P/K2/(1 + MKKK_P/K2);
end

function function_4_8_1(K8, k8, MKK_PP, M, M_P)
  k8*MKK_PP*M_P/K8/(1 + M/K8 + M_P/K8);
end

function function_4_7_1(K7, k7, MKK_PP, M, M_P)
  k7*MKK_PP*M/K7/(1 + M/K7 + M_P/K7);
end

function function_4_4_1(K4, KI, k4, MKKK_P, MKK, MKK_P, M_PP)
  k4*MKKK_P*MKK_P/K4/((1 + MKK/K4 + MKK_P/K4)*(1 + M_PP/KI));
end

function function_4_3_1(K3, KI, k3, MKKK_P, MKK, MKK_P, M_PP)
  k3*MKKK_P*MKK/K3/((1 + MKK/K3 + MKK_P/K3)*(1 + M_PP/KI));
end

model sarma7()

  // Compartments:
  compartment compartment_0 = 1;  // GO:0005623

  // Species:
  species MKKK in compartment_0 = 999.9999;  // isVersionOf uniprot:P04049
  species MKKK_P in compartment_0 = 0;  // isVersionOf kegg.compound:C00562 uniprot:P04049
  species P3 in compartment_0 = 500;  // isVersionOf uniprot:P51452
  species X in compartment_0 = 99.99999;  // isVersionOf uniprot:P28482
  species X_P in compartment_0 = 0;  // isVersionOf kegg.compound:C00562 uniprot:P28482
  species MKK in compartment_0 = 4000;  // isVersionOf uniprot:Q02750
  species MKK_P in compartment_0 = 0;  // isVersionOf kegg.compound:C00562 uniprot:Q02750
  species MKK_PP in compartment_0 = 0;  // isVersionOf kegg.compound:C00562 uniprot:Q02750
  species M in compartment_0 = 999.9999;  // isVersionOf uniprot:P28482
  species M_P in compartment_0 = 0;  // isVersionOf kegg.compound:C00562 uniprot:P28482
  species M_PP in compartment_0 = 0;  // isVersionOf kegg.compound:C00562 uniprot:P28482
  species P1 in compartment_0 = 99.99999;  // isVersionOf uniprot:P51452
  species P2 in compartment_0 = 500;  // isVersionOf uniprot:P51452

  // Assignment rules:
  observable_task3_model3_sarma7_species_12 := X_P;
  observable_task2_model2_sarma7_species_12 := X_P;
  observable_task1_model1_sarma7_species_12 := X_P;
  observable_task0_model0_sarma7_species_12 := X_P;

  // Reactions:
  _1: MKKK => MKKK_P; compartment_0*function_4_1_1(_1_A, K1, _1_Ka, V1, MKKK, M_PP);  // modifiers: M_PP; isVersionOf GO:0016310
    V1 = 6; _1_Ka = 500; K1 = 15; _1_A = 100;
  _3: MKK => MKK_P; compartment_0*function_4_3_1(K3, _3_KI, k3, MKKK_P, MKK, MKK_P, M_PP);  // modifiers: M_PP, MKKK_P; isVersionOf GO:0016310
    k3 = 0.1; _3_KI = 9; K3 = 20;
  reaction_10: X => X_P; compartment_0*function_1(V11, X, K11, reaction_10_A, M_PP, reaction_10_Ka); reaction_10 is "11";  // modifiers: M_PP; isVersionOf GO:0016310
    reaction_10_Ka = 500; reaction_10_A = 100; K11 = 50; V11 = 0.1;
  reaction_11: X_P => X; compartment_0*function_2(V12, X_P, K12); reaction_11 is "12";  // isVersionOf GO:0016311
    K12 = 50; V12 = 0.5;
  _4: MKK_P => MKK_PP; compartment_0*function_4_4_1(K4, _4_KI, k4, MKKK_P, MKK, MKK_P, M_PP);  // modifiers: M_PP, MKK, MKKK_P; isVersionOf GO:0016310
    k4 = 0.1; _4_KI = 9; K4 = 20;
  _7: M => M_P; compartment_0*function_4_7_1(K7, k7, MKK_PP, M, M_P);  // modifiers: MKK_PP; isVersionOf GO:0016310
    k7 = 0.1; K7 = 20;
  _8: M_P => M_PP; compartment_0*function_4_8_1(K8, k8, MKK_PP, M, M_P);  // modifiers: M, MKK_PP; isVersionOf GO:0016310
    k8 = 0.1; K8 = 20;
  _2: MKKK_P => MKKK; compartment_0*function_4_2_1(K2, k2, MKKK_P, P1);  // modifiers: P1; isVersionOf GO:0016311
    k2 = 0.1; K2 = 100;
  _5: MKK_PP => MKK_P; compartment_0*function_4_5_1(K5, k5, MKK_P, MKK_PP, P2);  // modifiers: P2; isVersionOf GO:0016311
    k5 = 0.02; K5 = 20;
  _6: MKK_P => MKK; compartment_0*function_4_6_1(K6, k6, MKK_P, MKK_PP, P2);  // modifiers: P2, MKK_PP; isVersionOf GO:0016311
    k6 = 0.02; K6 = 20;
  _9: M_PP => M_P; compartment_0*function_4_9_1(K9, k9, P3, M_P, M_PP);  // modifiers: P3, M; isVersionOf GO:0016311
    k9 = 0.02; K9 = 20;
  _10: M_P => M; compartment_0*function_4_10_1(K10, k10, P3, M_P, M_PP);  // modifiers: M_PP, P3; isVersionOf GO:0016311
    k10 = 0.02; K10 = 20;

  // Unit definitions:
  unit substance = 1e-9 mole;
  unit volume = 1e-3 litre;
end
