// SBML level 2 version 4

function function_6(P1, MKK_P, MKK_PP, MK_P, MK_PP, MKK, MK, k6a, K6a, MKKK, MKKK_P, P2, K6b, K2a, Kse1, K5a, k6b, K5b, Kse2, K10b, K9b)
  k6a*P1*MKK_P/K6a/(1 + MKKK_P/K2a + MKKK/Kse1 + MKK_PP/K5a + MKK_P/K6a + MKK/Kse1) + k6b*P2*MKK_P/K6b/(1 + MKK_PP/K5b + MKK_P/K6b + MKK/Kse2 + MK/Kse2 + MK_P/K10b + MK_PP/K9b);
end

function function_8(k7, MKK_PP, MK_P, K8, MK, K7)
  k7*MKK_PP*MK_P/K8/(1 + MK/K7 + MK_P/K8);
end

function function_9(MK_PP, MKK_PP, MKK_P, MK_P, MKK, MK, P2, K9b, K5b, K6b, Kse2, K10b, k9b)
  k9b*P2*MK_PP/K9b/(1 + MKK_PP/K5b + MKK_P/K6b + MKK/Kse2 + MK/Kse2 + MK_P/K10b + MK_PP/K9b);
end

function function_7(k7, MKK_PP, MK, K7, MK_P, K8)
  k7*MKK_PP*MK/K7/(1 + MK/K7 + MK_P/K8);
end

function function_5(MKK_PP, MKK_P, MK_P, MK_PP, P1, MKK, MK, k5a, K5a, MKKK, MKKK_P, k5b, P2, K5b, K6a, Kse1, K2a, K6b, Kse2, K10b, K9b)
  k5a*P1*MKK_PP/K5a/(1 + MKKK_P/K2a + MKKK/Kse1 + MKK_PP/K5a + MKK_P/K6a + MKK/Kse1) + k5b*P2*MKK_PP/K5b/(1 + MKK_PP/K5b + MKK_P/K6b + MKK/Kse2 + MK/Kse2 + MK_P/K10b + MK_PP/K9b);
end

function function_4(k4, MKKK_P, MKK_P, K4, MKK, K3)
  k4*MKKK_P*MKK_P/K4/(1 + MKK/K3 + MKK_P/K4);
end

function function_3(k3, MKKK_P, MKK, K3, MKK_P, K4)
  k3*MKKK_P*MKK/K3/(1 + MKK/K3 + MKK_P/K4);
end

function function_2(MKKK_P, MKKK, P1, MKK_PP, MKK_P, MKK, Kse1, K2a, K5a, K6a, k2a)
  k2a*MKKK_P*P1/K2a/(1 + MKKK_P/K2a + MKKK/Kse1 + MKK_PP/K5a + MKK_P/K6a + MKK/Kse1);
end

function function_1(MKKK, K1, k1, Sig)
  k1*Sig*MKKK/(K1 + MKKK);
end

function function_10(MK_P, MKK_PP, MKK_P, MK_PP, MKK, MK, P2, K10b, K5b, K6b, Kse2, K9b, k10b)
  k10b*P2*MK_P/K10b/(1 + MKK_PP/K5b + MKK_P/K6b + MKK/Kse2 + MK/Kse2 + MK_P/K10b + MK_PP/K9b);
end

model sarma4()

  // Compartments:
  compartment compartment_1 = 1;  // isVersionOf GO:0005623
  compartment No_Name = 1;

  // Species:
  species MKKK in compartment_1 = 300;  // isVersionOf uniprot:P04049
  species P2 in compartment_1 = 200;  // isVersionOf uniprot:P51452
  species Sig in compartment_1 = 20;  // isVersionOf uniprot:P61225
  species MKKK_P in compartment_1 = 0;  // isVersionOf kegg.compound:C00562 uniprot:P04049
  species MKK in compartment_1 = 1200;  // isVersionOf uniprot:Q02750
  species MKK_P in compartment_1 = 0;  // isVersionOf kegg.compound:C00562 uniprot:Q02750
  species MKK_PP in compartment_1 = 0;  // isVersionOf kegg.compound:C00562 uniprot:Q02750
  species MK in compartment_1 = 1200;  // isVersionOf uniprot:P27361
  species MK_P in compartment_1 = 0;  // isVersionOf kegg.compound:C00562 uniprot:P27361
  species MK_PP in compartment_1 = 0;  // isVersionOf kegg.compound:C00562 uniprot:P27361
  species P1 in compartment_1 = 100;  // isVersionOf uniprot:P51452

  // Parameters:
  K1 = 100;
  K10b = 108.6;
  Kse1 = 0.06;
  Kse2 = 0.06;
  K5b = 24.3;
  K6b = 108.6;
  K2a = 54.3;
  K3 = 50.5;
  K4 = 500;
  K5a = 24.3;
  K6a = 108.6;
  K7 = 50.5;
  K8 = 500;
  K9b = 24.3;

  // Assignment rules:
  observable_plot1_species_2_datagen1 := task1_model1_sarma4_species_2;
  observable_task0_model0_sarma4_species_2 := MKKK_P;

  // Reactions:
  reaction_1: MKKK => MKKK_P; compartment_1*function_1(MKKK, K1, k1, Sig);  // modifiers: Sig; isVersionOf GO:0016310
    k1 = 1;
  reaction_10: MK_P => MK; compartment_1*function_10(MK_P, MKK_PP, MKK_P, MK_PP, MKK, MK, P2, K10b, K5b, K6b, Kse2, K9b, k10b);  // modifiers: P2, MKK, MK_PP, MKK_P, MKK_PP; isVersionOf GO:0016311
    k10b = 0.086;
  reaction_2: MKKK_P => MKKK; compartment_1*function_2(MKKK_P, MKKK, P1, MKK_PP, MKK_P, MKK, Kse1, K2a, K5a, K6a, k2a);  // modifiers: MKK, MKK_P, MKK_PP, P1; isVersionOf GO:0016311
    k2a = 0.086;
  reaction_3: MKK => MKK_P; compartment_1*function_3(k3, MKKK_P, MKK, K3, MKK_P, K4);  // modifiers: MKKK_P; isVersionOf GO:0016310
    k3 = 0.01;
  reaction_4: MKK_P => MKK_PP; compartment_1*function_4(k4, MKKK_P, MKK_P, K4, MKK, K3);  // modifiers: MKK, MKKK_P; isVersionOf GO:0016310
    k4 = 15;
  reaction_5: MKK_PP => MKK_P; compartment_1*function_5(MKK_PP, MKK_P, MK_P, MK_PP, P1, MKK, MK, k5a, K5a, MKKK, MKKK_P, k5b, P2, K5b, K6a, Kse1, K2a, K6b, Kse2, K10b, K9b);  // modifiers: P2, MKKK_P, MKKK, MK, MKK, P1, MK_PP, MK_P; isVersionOf GO:0016311
    k5b = 0.092; k5a = 0.092;
  reaction_6: MKK_P => MKK; compartment_1*function_6(P1, MKK_P, MKK_PP, MK_P, MK_PP, MKK, MK, k6a, K6a, MKKK, MKKK_P, P2, K6b, K2a, Kse1, K5a, k6b, K5b, Kse2, K10b, K9b);  // modifiers: P2, MKKK_P, MKKK, MK, MK_PP, MK_P, MKK_PP, P1; isVersionOf GO:0016311
    k6b = 0.086; k6a = 0.086;
  reaction_7: MK => MK_P; compartment_1*function_7(reaction_7_k7, MKK_PP, MK, K7, MK_P, K8);  // modifiers: MKK_PP; isVersionOf GO:0016310
    reaction_7_k7 = 0.01;
  reaction_8: MK_P => MK_PP; compartment_1*function_8(reaction_8_k7, MKK_PP, MK_P, K8, MK, K7);  // modifiers: MK, MKK_PP; isVersionOf GO:0016310
    reaction_8_k7 = 15;
  reaction_9: MK_PP => MK_P; compartment_1*function_9(MK_PP, P1, MKK_P, MK_P, MKK, MK, P2, K9b, K5b, K6b, Kse2, K10b, k9b);  // modifiers: P2, MK, MKK, MKK_P, P1; isVersionOf GO:0016311
    k9b = 0.092;

  // Unit definitions:
  unit substance = 1e-9 mole;
  unit volume = 1e-3 litre;
end
