// SBML level 2 version 4

model schilling1()

  // Compartments:
  compartment cell = 1;  // isVersionOf FMA:83517 GO:0005623

  // Species:
  species Delay01_mSHP1 in cell = 0;  // isVersionOf uniprot:P29351
  species Delay02_mSHP1 in cell = 0;  // isVersionOf uniprot:P29351
  species Delay03_mSHP1 in cell = 0;  // isVersionOf uniprot:P29351
  species Delay04_mSHP1 in cell = 0;  // isVersionOf uniprot:P29351
  species Delay05_mSHP1 in cell = 0;  // isVersionOf uniprot:P29351
  species Delay06_mSHP1 in cell = 0;  // isVersionOf uniprot:P29351
  species Delay07_mSHP1 in cell = 0;  // hasVersion uniprot:P29351
  species Delay08_mSHP1 in cell = 0;  // isVersionOf uniprot:P29351
  species ERK1 in cell = 7;  // isVersionOf uniprot:Q63844
  species ERK2 in cell = 21;  // isVersionOf uniprot:P63085
  species Epo in cell = 50;  // substance in U; isVersionOf GO:0005128 uniprot:P07321
  species EpoR in cell = 1;  // isVersionOf uniprot:P14753
  species JAK2 in cell = 2;  // isVersionOf uniprot:Q62120
  species MEK1 in cell = 24;  // isVersionOf uniprot:P31938
  species MEK2 in cell = 11;  // isVersionOf uniprot:Q63932
  species Raf in cell = 3.7719;  // isVersionOf uniprot:Q99N57
  species SHP1 in cell = 10.7991;  // isVersionOf uniprot:P29351 interpro:IPR000387
  species SOS in cell = 2.5101;  // hasVersion uniprot:Q62245
  species actSHP1 in cell = 0;  // isVersionOf GO:0004725 uniprot:P29351
  species mSHP1 in cell = 0;  // isVersionOf GO:0019897 uniprot:P29351
  species mSOS in cell = 0;  // isVersionOf GO:0005085 GO:0019897 uniprot:Q62245
  species pERK1 in cell = 0;  // hasPart kegg.compound:C00562 uniprot:Q63844 MOD:00048
  species pERK2 in cell = 0;  // hasPart uniprot:P63085 kegg.compound:C00562 MOD:00048
  species pEpoR in cell = 0;  // isVersionOf MOD:00048 uniprot:P14753 kegg.compound:C00562
  species pJAK2 in cell = 0;  // hasVersion uniprot:Q62120 GO:0004713 reactome:REACT_24029 kegg.compound:C00562
  species pMEK1 in cell = 0;  // isVersionOf uniprot:P31938 kegg.compound:C00562
  species pMEK2 in cell = 0;  // isVersionOf uniprot:Q63932 kegg.compound:C00562
  species pRaf in cell = 0;  // isVersionOf GO:0004709 reactome:REACT_3158 MOD:00046 kegg.compound:C00562
  species pSOS in cell = 0;  // isVersionOf kegg.compound:C00562 uniprot:Q62245
  species ppERK1 in cell = 0;  // hasPart uniprot:Q63844 GO:0004707 kegg.compound:C00562 MOD:00048
  species ppERK2 in cell = 0;  // hasPart kegg.compound:C00562 GO:0004707 uniprot:P63085 MOD:00048
  species ppMEK1 in cell = 0;  // hasPart uniprot:P31938 kegg.compound:C00562 GO:0004709 MOD:00047
  species ppMEK2 in cell = 0;  // isVersionOf GO:0004709 MOD:00047 MOD:00048 uniprot:Q63932

  // Parameters:
  EpoR_phosphorylation_by_pJAK2 = 3.15714;
  First_ERK1_phosphorylation_by_ppMEK = 2.4927;
  First_ERK2_phosphorylation_by_ppMEK = 2.44361;
  First_ERK_dephosphorylation = 39.0886;
  First_MEK1_phosphorylation_by_pRaf = 0.687193;
  First_MEK2_phosphorylation_by_pRaf = 3.11919;
  First_MEK_dephosphorylation = 0.130937;
  JAK2_phosphorylation_by_Epo = 0.0122149;
  SHP1_activation_by_pEpoR = 0.408408;
  SHP1_delay = 0.408408;
  SOS_recruitment_by_pEpoR = 0.10271;
  Second_ERK1_phosphorylation_by_ppMEK = 59.5251;
  Second_ERK2_phosphorylation_by_ppMEK = 53.0816;
  Second_ERK_dephosphorylation = 3.00453;
  Second_MEK1_phosphorylation_by_pRaf = 667.957;
  Second_MEK2_phosphorylation_by_pRaf = 215.158;
  Second_MEK_dephosphorylation = 0.0732724;
  actSHP1_deactivation = 0.0248773;
  mSOS_induced_Raf_phosphorylation = 0.144515;
  mSOS_release_from_membrane = 15.5956;
  pEpoR_dephosphorylation_by_actSHP1 = 1.19995;
  pJAK2_dephosphorylation_by_actSHP1 = 0.368384;
  pRaf_dephosphorylation = 0.374228;
  pSOS_dephosphorylation = 0.124944;
  ppERK_neg_feedback_on_mSOS = 5122.68;
  scale_SOS = 1.10228;
  scale_pEpoR = 0.493312;
  scale_pJAK2 = 0.21008;
  scale_ppERK = 13.5981;
  scale_ppMEK = 40.5364;

  // Assignment rules:
  rescaled_mSOS := scale_SOS*mSOS;
  rescaled_SOS := scale_SOS*SOS;
  rescaled_pSOS := scale_SOS*pSOS;
  rescaled_ppMEK2 := scale_ppMEK*ppMEK2;
  rescaled_ppMEK1 := scale_ppMEK*ppMEK1;
  rescaled_ppERK2 := scale_ppERK*ppERK2;
  rescaled_ppERK1 := scale_ppERK*ppERK1;
  rescaled_pJAK2 := scale_pJAK2*pJAK2;
  rescaled_pEpoR := scale_pEpoR*pEpoR;
  observable_task0_model0_schilling1_rescaled_SOS := task0_model0_schilling1_rescaled_SOS;
  observable_task0_model0_schilling1_rescaled_pSOS := task0_model0_schilling1_rescaled_pSOS;
  observable_task0_model0_schilling1_rescaled_ppERK2 := task0_model0_schilling1_rescaled_ppERK2;
  observable_task0_model0_schilling1_rescaled_ppERK1 := task0_model0_schilling1_rescaled_ppERK1;
  observable_task0_model0_schilling1_rescaled_ppMEK2 := task0_model0_schilling1_rescaled_ppMEK2;
  observable_task0_model0_schilling1_rescaled_ppMEK1 := task0_model0_schilling1_rescaled_ppMEK1;
  observable_task0_model0_schilling1_rescaled_pEpoR := task0_model0_schilling1_rescaled_pEpoR;
  observable_task0_model0_schilling1_rescaled_pJAK2 := task0_model0_schilling1_rescaled_pJAK2;

  // Reactions:
  reaction_1: JAK2 => pJAK2; JAK2_phosphorylation_by_Epo*JAK2*Epo*cell;  // modifiers: Epo; isVersionOf reactome:REACT_23935.1 GO:0004715 GO:0010535 ec-code:2.7.10.2
  reaction_10: Delay06_mSHP1 => Delay07_mSHP1; SHP1_delay*Delay06_mSHP1*cell;
  reaction_11: Delay07_mSHP1 => Delay08_mSHP1; SHP1_delay*Delay07_mSHP1*cell;
  reaction_12: Delay08_mSHP1 => actSHP1; SHP1_delay*Delay08_mSHP1*cell;
  reaction_13: actSHP1 => SHP1; actSHP1_deactivation*actSHP1*cell;
  reaction_14: pEpoR => EpoR; pEpoR_dephosphorylation_by_actSHP1*pEpoR*actSHP1*cell;  // modifiers: actSHP1; isVersionOf GO:0004725 ec-code:3.1.3.48
  reaction_15: pJAK2 => JAK2; pJAK2_dephosphorylation_by_actSHP1*pJAK2*actSHP1*cell;  // modifiers: actSHP1; isVersionOf ec-code:3.1.3.48 GO:0004725
  reaction_16: SOS => mSOS; SOS_recruitment_by_pEpoR*SOS*pEpoR*cell;  // modifiers: pEpoR; isVersionOf GO:0006461
  reaction_17: mSOS => SOS; mSOS_release_from_membrane*mSOS*cell;
  reaction_18: Raf => pRaf; mSOS_induced_Raf_phosphorylation*Raf*mSOS*cell;  // modifiers: mSOS; isVersionOf GO:0000185 GO:0006468
  reaction_19: pRaf => Raf; pRaf_dephosphorylation*pRaf*cell;  // isVersionOf GO:0051390 GO:0006470
  reaction_2: EpoR => pEpoR; EpoR_phosphorylation_by_pJAK2*EpoR*pJAK2*cell;  // modifiers: pJAK2; isVersionOf ec-code:2.7.10.2 GO:0004715
  reaction_20: MEK2 => pMEK2; First_MEK2_phosphorylation_by_pRaf*MEK2*pRaf*cell;  // modifiers: pRaf; isPartOf ec-code:2.7.11.25 GO:0004709 reactome:REACT_1727.5
  reaction_21: MEK1 => pMEK1; First_MEK1_phosphorylation_by_pRaf*MEK1*pRaf*cell;  // modifiers: pRaf; isPartOf GO:0004709 ec-code:2.7.11.25 reactome:REACT_545.5
  reaction_22: pMEK2 => ppMEK2; Second_MEK2_phosphorylation_by_pRaf*pMEK2*pRaf*cell;  // modifiers: pRaf; isPartOf ec-code:2.7.11.25 GO:0000186 reactome:REACT_1727.5
  reaction_23: pMEK1 => ppMEK1; Second_MEK1_phosphorylation_by_pRaf*pMEK1*pRaf*cell;  // modifiers: pRaf; isPartOf ec-code:2.7.11.25 GO:0000186 reactome:REACT_545.5
  reaction_24: ppMEK2 => pMEK2; First_MEK_dephosphorylation*ppMEK2*cell;  // isVersionOf GO:0051389 GO:0006470
  reaction_25: ppMEK1 => pMEK1; First_MEK_dephosphorylation*ppMEK1*cell;  // isVersionOf GO:0051389 GO:0006470
  reaction_26: pMEK2 => MEK2; Second_MEK_dephosphorylation*pMEK2*cell;  // isVersionOf GO:0006470
  reaction_27: pMEK1 => MEK1; Second_MEK_dephosphorylation*pMEK1*cell;  // isVersionOf GO:0006470
  reaction_28: ERK1 => pERK1; First_ERK1_phosphorylation_by_ppMEK*ERK1*ppMEK2*cell;  // modifiers: ppMEK2; isPartOf GO:0004708 ec-code:2.7.12.2 reactome:REACT_136.4
  reaction_29: ERK2 => pERK2; First_ERK2_phosphorylation_by_ppMEK*ERK2*ppMEK2*cell;  // modifiers: ppMEK2; isVersionOf ec-code:2.7.12.2 GO:0004708
  reaction_3: SHP1 => mSHP1; SHP1_activation_by_pEpoR*SHP1*pEpoR*cell;  // modifiers: pEpoR; isVersionOf GO:0051668 GO:0006461
  reaction_30: ERK1 => pERK1; First_ERK1_phosphorylation_by_ppMEK*ERK1*ppMEK1*cell;  // modifiers: ppMEK1; isPartOf GO:0004708 ec-code:2.7.12.2 reactome:REACT_136.4
  reaction_31: ERK2 => pERK2; First_ERK2_phosphorylation_by_ppMEK*ERK2*ppMEK1*cell;  // modifiers: ppMEK1; isVersionOf ec-code:2.7.12.2 GO:0004708
  reaction_32: pERK1 => ppERK1; Second_ERK1_phosphorylation_by_ppMEK*pERK1*ppMEK2*cell;  // modifiers: ppMEK2; isPartOf GO:0000187 GO:0004708 ec-code:2.7.12.2 reactome:REACT_136.4
  reaction_33: pERK2 => ppERK2; Second_ERK2_phosphorylation_by_ppMEK*pERK2*ppMEK2*cell;  // modifiers: ppMEK2; isVersionOf GO:0000187 ec-code:2.7.12.2 GO:0004708
  reaction_34: pERK1 => ppERK1; Second_ERK1_phosphorylation_by_ppMEK*pERK1*ppMEK1*cell;  // modifiers: ppMEK1; isPartOf GO:0000187 GO:0004708 ec-code:2.7.12.2 reactome:REACT_136.4
  reaction_35: pERK2 => ppERK2; Second_ERK2_phosphorylation_by_ppMEK*pERK2*ppMEK1*cell;  // modifiers: ppMEK1; isVersionOf GO:0000187 ec-code:2.7.12.2 GO:0004708
  reaction_36: ppERK1 => pERK1; First_ERK_dephosphorylation*ppERK1*cell;  // isPartOf GO:0017017 GO:0000188 GO:0006470 reactome:REACT_12439.1
  reaction_37: ppERK2 => pERK2; First_ERK_dephosphorylation*ppERK2*cell;  // isVersionOf GO:0017017 reactome:REACT_12439.1 GO:0006470 GO:0000188
  reaction_38: pERK1 => ERK1; Second_ERK_dephosphorylation*pERK1*cell;  // isVersionOf GO:0017017 reactome:REACT_12439.1 GO:0006470
  reaction_39: pERK2 => ERK2; Second_ERK_dephosphorylation*pERK2*cell;  // isVersionOf GO:0006470 reactome:REACT_12439.1 GO:0017017
  reaction_4: mSHP1 => Delay01_mSHP1; SHP1_delay*mSHP1*cell;
  reaction_40: mSOS => pSOS; ppERK_neg_feedback_on_mSOS*mSOS*ppERK1*cell;  // modifiers: ppERK1; reactome:REACT_1420.5 GO:0006468 ec-code:2.7.11.24 GO:0004707
  reaction_41: mSOS => pSOS; ppERK_neg_feedback_on_mSOS*mSOS*ppERK2*cell;  // modifiers: ppERK2; reactome:REACT_1420.5 GO:0006468 ec-code:2.7.11.24 GO:0004707
  reaction_42: pSOS => SOS; pSOS_dephosphorylation*pSOS*cell;  // isVersionOf GO:0006470
  reaction_5: Delay01_mSHP1 => Delay02_mSHP1; SHP1_delay*Delay01_mSHP1*cell;
  reaction_6: Delay02_mSHP1 => Delay03_mSHP1; SHP1_delay*Delay02_mSHP1*cell;
  reaction_7: Delay03_mSHP1 => Delay04_mSHP1; SHP1_delay*Delay03_mSHP1*cell;
  reaction_8: Delay04_mSHP1 => Delay05_mSHP1; SHP1_delay*Delay04_mSHP1*cell;
  reaction_9: Delay05_mSHP1 => Delay06_mSHP1; SHP1_delay*Delay05_mSHP1*cell;

  // Unit definitions:
  unit second_order_rate_constant = 1e-3 litre / (60 second * 10000 item);
  unit per_minute = 1 / (60 second);
  unit arb_unit_per_10000_molecules = dimensionless * 1e-3 litre / (10000 item); arb_unit_per_10000_molecules is "arb. unit. per 10000 molecules";
  unit arb_units = dimensionless; arb_units is "arb. units";
  unit per_min_per_Uml = 1e-3 litre / (60 second * dimensionless); per_min_per_Uml is "per min per (Uml)";
  unit U_per_ml = dimensionless / (1e-3 litre);
  unit U = dimensionless;
  unit ml = 1e-3 litre;
  unit minutes = 60 second;
  unit _10E4_molecules = 10000 item;
end
