// SBML level 3 version 1

model tripathi1()

  // Compartments:
  compartment default = 1;

  // Species:
  species A in default = 500; A is "AIDS";
  species $EXT in default = 1;
  species I1 in default = 10000; I1 is "Unaware HIV infected";
  species I2 in default = 2000; I2 is "Aware HIV infected";
  species S in default = 2500; S is "Susceptible";

  // Parameters:
  Alpha = 1;
  Beta_1 = 1.344;
  Beta_2 = 0.15;
  Delta = 0.1;
  Q_0 = 2000;
  Theta = 0.015;
  d = 0.02;

  // Assignment rules:
  Lambda := (Beta_1*I1 + Beta_2*I2)/(S + I1 + I2 + A);
  N := S + I1 + I2 + A;
  observable_plot0_I2_datagen1 := task0_model0_tripathi1_I2;
  observable_task0_model0_tripathi1_I1 := I1;
  observable_plot1_A_datagen1 := task0_model0_tripathi1_A;
  observable_task1_model1_tripathi1_A := A;
  observable_plot1_I1_datagen1 := task1_model1_tripathi1_I1;
  observable_plot2_I2_datagen1 := task1_model1_tripathi1_I2;
  observable_plot2_I1_datagen1 := task2_model2_tripathi1_I1;
  observable_task2_model2_tripathi1_I2 := I2;
  observable_plot0_A_datagen1 := task2_model2_tripathi1_A;

  // Reactions:
  v_1: $EXT -> S; Q_0;
  v_10: A -> $EXT; d*A;
  v_2: S -> I1; Lambda*S;
  v_3: S -> $EXT; d*S;
  v_4: I1 -> I2; Theta*I1;
  v_5: I1 -> A; Delta*I1;
  v_6: I1 -> $EXT; d*I1;
  v_7: I2 -> A; Delta*I2;
  v_8: I2 -> $EXT; d*I2;
  v_9: A -> $EXT; Alpha*A;
end
