// SBML level 3 version 1

model valero()
  // model units - substance: umol, time: s, volume: L, extent: uM

  // Compartments:
  compartment default_compartment = 1;

  // Species:
  species ADP in default_compartment = 0;  // CHEBI:16761
  species AMP in default_compartment = 0;  // CHEBI:16027
  species ATP in default_compartment = 16.3;  // CHEBI:15422
  species $Lac in default_compartment = 0;  // CHEBI:28358
  species NADH in default_compartment = 1;  // CHEBI:16908
  species Pyr in default_compartment = 0;  // CHEBI:32816

  // Parameters:
  K = 71000;
  Km2AMP = 110;
  Km2ATP = 25;
  Kmapp1 = 700;
  Kmapp3 = 260;
  Vm2 = 170;
  Vmapp1 = 2.3;
  Vmapp3 = 65;
  k4 = 5;

  // Assignment rules:
  observable_task0_model0_valero_ADP := ADP;
  observable_task0_model0_valero_AMP := AMP;
  observable_task0_model0_valero_ATP := ATP;
  observable_task0_model0_valero_NADH := NADH;
  observable_task1_model1_valero_NADH := NADH;
  observable_task1_model1_valero_ADP := ADP;
  observable_task1_model1_valero_AMP := AMP;
  observable_task1_model1_valero_ATP := ATP;

  // Reactions:
  v_1: ATP -> AMP; Vmapp1*ATP/(Kmapp1 + ATP);
  v_2: ATP + AMP -> 2 ADP; Vm2*ATP*AMP/(K + Km2ATP*AMP + Km2AMP*ATP + ATP*AMP);
  v_3: ADP -> ATP + Pyr; Vmapp3*ADP/(Kmapp3 + ADP);
  v_4: Pyr + NADH -> $Lac; k4*Pyr;

  // Unit definitions:
  unit umol = 1e-6 mole;
  unit s = second;
  unit L = litre;
  unit uM = 1e-6 mole / litre;
end
