// SBML level 2 version 1

model vanHeerden2()

  // Compartments:
  compartment compartment = 1;

  // Species:
  species $EtOH in compartment = 0;
  species $Glycerol in compartment = 0;
  species $PiVac in compartment = 0;
  species atp in compartment = 1;
  species fbp in compartment = 2;
  species $g6p in compartment = 0;
  species phos in compartment = 10;

  // Parameters:
  KATPASE = 10;
  KMLGADP = 0.1;
  KMLGF16P = 1;
  KMLGP = 2;
  KMPFKATP = 0.1;
  KiPFKATP = 3;
  VMAXGLYC = 0;
  VMAXLG = 10;
  VMAXPFK = 10;
  atot = 5;
  k6 = 0.3;
  pT = 10;

  // Assignment rules:
  observable_task1_model1__atp := atp;
  observable_task1_model1__fbp := fbp;
  observable_task1_model1__phos := phos;
  observable_task2_model2__atp := atp;
  observable_task2_model2__fbp := fbp;
  observable_task2_model2__phos := phos;

  // Reactions:
  v1: 2 atp + $g6p -> fbp; VMAXPFK*atp/(KMPFKATP + atp*(1 + atp/KiPFKATP));
  v2: 2 phos + fbp -> 4 atp + 2 $EtOH; VMAXLG*(fbp/(KMLGF16P + fbp))*((atot - atp)/KMLGADP)*(phos/KMLGP)/((1 + (atot - atp)/KMLGADP)*(1 + phos/KMLGP));
  v3: atp -> phos; KATPASE*atp;
  v4: $PiVac -> phos; k6*(pT - phos);
  v5: fbp -> $Glycerol + 2 phos; VMAXGLYC*(fbp/(KMLGF16P + fbp));

  // Unit definitions:
  unit volume = litre;
  unit length = metre;
  unit substance = mole;
  unit time = second;
  unit area = metre^2;
end
