// SBML level 3 version 1

model wang1()

  // Compartments:
  compartment default = 1;

  // Species:
  species T in default = 1000;
  species TStar in default = 0;
  species V in default = 200;

  // Parameters:
  NN = 10;
  Tmax = 1500;
  alpha = 0.02;
  beta = 0.3;
  gamma = 2.4;
  k = 0.0027;
  r = 2;
  s = 0.1;
  sigma1 = 0.8888889;

  // Assignment rules:
  observable_task0_model0_wang1_T := T;
  observable_task0_model0_wang1_V := V;
  observable_task1_model1_wang1_T := T;
  observable_task1_model1_wang1_V := V;

  // Reactions:
  v1: -> T; s;
  v2: T -> ; alpha*T;
  v3: -> T; r*T;
  v4: T -> ; r*T*(T + TStar)/Tmax;  // modifiers: TStar
  v5: T -> ; k*T*V;  // modifiers: V
  v6: -> TStar; k*sigma1*T*V;  // modifiers: T, V
  v7: TStar -> ; beta*TStar;
  v8: -> V; beta*NN*TStar;  // modifiers: TStar
  v9: V -> ; gamma*V;
end
