// SBML level 2 version 1

model xie1()

  // Compartments:
  compartment wholeCell = 1;  // GO:0005623

  // Species:
  species CC in wholeCell = 0.5566;  // hasPart uniprot:O61735 uniprot:O61734
  species CCPT in wholeCell = 0.4982;  // hasPart uniprot:O61735 uniprot:O61734 uniprot:P07663 uniprot:Q59E16
  species CLK in wholeCell = 3.6628;  // isVersionOf uniprot:O61735
  species $CYC in wholeCell = 1;  // isVersionOf uniprot:O61734
  species PDP in wholeCell = 4.1953;  // isVersionOf uniprot:Q9TW49
  species PER in wholeCell = 2.7527;  // isVersionOf uniprot:P07663
  species PT in wholeCell = 0.4014;  // hasPart uniprot:P07663 uniprot:Q59E16
  species TIM in wholeCell = 2.7527;  // isVersionOf uniprot:Q59E16
  species VRI in wholeCell = 3.175;  // uniprot:Q9VMS4
  species clkm in wholeCell = 0.2583;
  species clkp in wholeCell = 0.003185;
  species pdpm in wholeCell = 0.3175;
  species pdpp in wholeCell = 0.003185;
  species perm in wholeCell = 0.2395;
  species perp in wholeCell = 0.003185;
  species prcpdp in wholeCell = 0; prcpdp is "CCbindingpdp";
  species prcper in wholeCell = 0; prcper is "CCbindingPer";
  species prct in wholeCell = 0; prct is "CCbindingtim";
  species prcv in wholeCell = 0; prcv is "CCbindingvri";
  species prpc in wholeCell = 0; prpc is "PDPbindingclkp";
  species prvc in wholeCell = 0; prvc is "VRIbindingclkp";
  species timm in wholeCell = 0.2395;
  species timp in wholeCell = 0.003185;
  species vrim in wholeCell = 0.2571;
  species vrip in wholeCell = 0.003185;

  // Parameters:
  bcc = 2.349;
  bccpdpp = 0.062;
  bccperp = 0.069;
  bccpt = 51;
  bcctimp = 0.069;
  bccvrip = 0.1;
  bpdpclkp = 1.155;
  bpt = 1.1;
  bvriclkp = 1.858;
  dcc = 0.184;
  dccpt = 15.06;
  dclk = 0.2;
  dclkm = 0.643;
  dpdp = 0.156;
  dpdpm = 0.06;
  dper = 0.62;
  dperm = 0.053;
  dpt = 0.279;
  dtim = 0.62;
  dtimm = 0.053;
  dvri = 1.226;
  dvrim = 0.07;
  npdp = 6;
  npt = 5;
  nvri = 4;
  tcccpdpp = 9.831;
  tcccperp = 11;
  tccctimp = 11;
  tcccvrip = 16.86;
  tcclkp = 1.42;
  tcdvpmt = 0.028;
  tcpdpclkp = 125.54;
  tcvriclkp = 0.053;
  tlclk = 35;
  tlpdp = 1.87;
  tlper = 36;
  tltim = 36;
  tlvri = 14.68;
  ubcc = 0.89;
  ubccpdpp = 0.145;
  ubccperp = 0.262;
  ubccpt = 7.89;
  ubcctimp = 0.262;
  ubccvrip = 0.276;
  ubpdpclkp = 0.952;
  ubpt = 2.93;
  ubvriclkp = 1.043;

  // Assignment rules:
  observable_task0_model0_xie1_vrim := vrim;
  observable_task0_model0_xie1_perm := perm;
  observable_task0_model0_xie1_pdpm := pdpm;
  observable_task0_model0_xie1_clkm := clkm;
  observable_task0_model0_xie1_VRI := VRI;
  observable_task0_model0_xie1_PER := PER;
  observable_task0_model0_xie1_PDP := PDP;
  observable_task0_model0_xie1_CLK := CLK;

  // Reactions:
  CC_PT_association: PT + CC => CCPT; wholeCell*CC*PT*bccpt;  // isVersionOf GO:0046982
  clkm_translation: => CLK; wholeCell*clkm*tlclk;  // modifiers: clkm; isVersionOf GO:0006412
  Degradation_of_per_mRNA: perm => ; wholeCell*perm*dperm;  // isVersionOf GO:0006402
  perm_translation: => PER; wholeCell*perm*tlper;  // modifiers: perm; isVersionOf GO:0006412
  Degradation_of_CLK_CYK_dimer: CC => ; wholeCell*CC*dcc;  // isVersionOf GO:0044257
  per_transcription: => perm; wholeCell*((1 - (1 - prcper)^npt)*tcccperp + (1 - prcper)^npt*tcdvpmt)*perp;  // modifiers: perp, prcper; isVersionOf GO:0006351
  vri_transcription: => vrim; wholeCell*((1 - (1 - prcv)^nvri)*tcccvrip + (1 - prcv)^nvri*tcdvpmt)*vrip;  // modifiers: vrip, prcv; isVersionOf GO:0006351
  Degradation_of_CC_PT_dimer: CCPT => ; wholeCell*CCPT*dccpt;  // isVersionOf GO:0044257
  Degradation_of_vri_mRNA: vrim => ; wholeCell*vrim*dvrim;  // isVersionOf GO:0006402
  vrim_translation: => VRI; wholeCell*vrim*tlvri;  // modifiers: vrim; isVersionOf GO:0006412
  VRI_protein_degradation: VRI => ; wholeCell*VRI*dvri;  // isVersionOf GO:0044257
  pdp_transcription: => pdpm; wholeCell*((1 - (1 - prcpdp)^npdp)*tcccpdpp + (1 - prcpdp)^npdp*tcdvpmt)*pdpp;  // modifiers: pdpp, prcpdp; isVersionOf GO:0006351
  Degradation_of_pdp_mRNA: pdpm => ; wholeCell*pdpm*dpdpm;  // isVersionOf GO:0006402
  pdpm_translation: => PDP; wholeCell*pdpm*tlpdp;  // modifiers: pdpm; isVersionOf GO:0006412
  PDP_protein_degradation: PDP => ; wholeCell*PDP*dpdp;  // isVersionOf GO:0044257
  Degradation_of_PER_TIM_dimer: PT => ; wholeCell*PT*dpt;  // isVersionOf GO:0044257
  clk_transcription: => clkm; wholeCell*(prvc*tcvriclkp + prpc*tcpdpclkp + (1 - prvc - prpc)*tcclkp)*clkp;  // modifiers: prpc, clkp, prvc; isVersionOf GO:0006351
  CLK_CYC_association: $CYC + CLK => CC; wholeCell*CLK*bcc*CYC;  // isVersionOf GO:0046982
  CLK_protein_degradation: CLK => ; wholeCell*CLK*dclk;  // isVersionOf GO:0044257
  CLK_CYC_dissociation: CC => $CYC + CLK; wholeCell*CC*ubcc;  // isVersionOf GO:0043624
  PER_TIM_association: TIM + PER => PT; wholeCell*PER*TIM*bpt;  // isVersionOf GO:0046982
  PER_TIM_dissociation: PT => TIM + PER; wholeCell*PT*ubpt;  // isVersionOf GO:0043624
  PER_protein_degradation: PER => ; wholeCell*PER*dper;  // isVersionOf GO:0044257
  tim_transcription: => timm; wholeCell*((1 - (1 - prct)^npt)*tccctimp + (1 - prct)^npt*tcdvpmt)*timp;  // modifiers: timp, prct; isVersionOf GO:0006351
  Degradation_of_tim_mRNA: timm => ; wholeCell*timm*dtimm;  // isVersionOf GO:0006402
  timm_translation: => TIM; wholeCell*timm*tltim;  // modifiers: timm; isVersionOf GO:0006412
  TIM_protein_degradation: TIM => ; wholeCell*TIM*dtim;  // isVersionOf GO:0044257
  CC_PT_dimer_dissociation: CCPT => PT + CC; wholeCell*CCPT*ubccpt;  // isVersionOf GO:0046982
  re57: => prcper; wholeCell*(1 - prcper)*bccperp*CC; re57 is "CC binding probability in per promoter";  // modifiers: CC; isVersionOf GO:0006357
  re58: prcper => ; wholeCell*prcper*ubccperp; re58 is "CC Unbinding probability in per promoter";  // isVersionOf GO:0006357
  re59: prcv => ; wholeCell*ubccvrip*prcv; re59 is "CC Unbinding probability in vri promoter";  // isVersionOf GO:0006357
  re60: => prcv; wholeCell*(1 - prcv)*bccvrip*CC; re60 is "CC binding probability in vri promoter";  // modifiers: CC; isVersionOf GO:0006357
  re61: prcpdp => ; wholeCell*ubccpdpp*prcpdp; re61 is "CC Unbinding probability in pdp1 promoter";  // isVersionOf GO:0006357
  re62: => prcpdp; wholeCell*(1 - prcpdp)*bccpdpp*CC; re62 is "CC binding probability in pdp1 promoter";  // modifiers: CC; isVersionOf GO:0006357
  VRI_binding_clk_promoter: => prvc; wholeCell*(1 - prvc - prpc)*bvriclkp*VRI;  // modifiers: VRI, prpc; isVersionOf GO:0030528
  VRI_unbinding_clk_promoter: prvc => ; wholeCell*prvc*ubvriclkp;  // isVersionOf GO:0030528
  PDP_binding_clk_promoter: => prpc; wholeCell*(1 - prvc - prpc)*bpdpclkp*PDP;  // modifiers: PDP, prvc; isVersionOf GO:0003700
  PDP_unbinding_clk_promoter: prpc => ; wholeCell*prpc*ubpdpclkp;  // isVersionOf GO:0043433
  re68: => prct; wholeCell*(1 - prct)*bcctimp*CC; re68 is "CC binding probability in tim promoter";  // modifiers: CC; isVersionOf GO:0006357
  re69: prct => ; wholeCell*prct*ubcctimp; re69 is "CC Unbinding probability in tim promoter";  // isVersionOf GO:0006357
  Degradation_of_clk_mRNA: clkm => ; wholeCell*clkm*dclkm;  // isVersionOf GO:0006402

  // Unit definitions:
  unit hour = 3600 second;
  unit nano_mole = 1e-9 mole;
end
