// SBML level 2 version 1
// This model was downloaded from BioModels Database
// http://www.ebi.ac.uk/biomodels-static/

model Pritchard2002_glycolysis()
  // from:
  // Schemes of fluc control in a model of Saccharomyces cerevisiae glycolysis
  // Pritchard, L and Kell, DB Eur. J. Biochem. 269(2002), 3894-3904.
  // It represents a modified version of Teusink et al. Eur. J. Biochem. 267(2000), 5313-5329.
  // The model is a translation from the GEPASI file encoded by Leighton Pritchard.
  // This version uses the Vmaxes found by the best fit (R1) of Table 1 of the Pritchard and Kell paper and simulates a decrease of external glucose concentration from 100 to 2 mM.
  // To reproduce the values in table 2 of the publication, set GLCo to 50 mM and compute the steady state.
  // To the extent possible under law, all copyright and related or neighbouring rights to this encoded model have been dedicated to the public domain worldwide. Please refer to CC0 Public Domain Dedication for more information.
  // In summary, you are entitled to use this encoded model in absolutely any manner you deem suitable, verbatim, or with modification, alone or embedded it in a larger context, redistribute it, commercially or not, in a restricted way or not.
  // To cite BioModels Database, please use: Li C, Donizelli M, Rodriguez N, Dharuri H, Endler L, Chelliah V, Li L, He E, Henry A, Stefan MI, Snoep JL, Hucka M, Le Novère N, Laibe C (2010) BioModels Database: An enhanced, curated and annotated resource for published quantitative kinetic models. BMC Syst Biol., 4:92.
  // biomodels.db:MODEL8293171637
  // biomodels.db:BIOMD0000000172
  // isDescribedBy pubmed:12180966
  // isDerivedFrom biomodels.db:BIOMD0000000064
  // isVersionOf GO:0006096
  // isPartOf kegg.pathway:sce00010

  // Compartments:
  compartment cell = 1; cell is "cytosol";  // GO:0005829
  compartment ext = 1; ext is "exterior";  // GO:0005576

  // Species:
  species $GLCo in ext = 2; GLCo is "Glc(ext)";  // CHEBI:4167 kegg.compound:C00031
  species GLCi in cell = 0.09765223; GLCi is "Glc(int)";  // CHEBI:4167 kegg.compound:C00031
  species ATP in cell = 2.525127;  // CHEBI:15422 kegg.compound:C00002
  species G6P in cell = 2.67504; G6P is "Glu6P";  // CHEBI:17665 kegg.compound:C00668
  species ADP in cell = 1.281988;  // CHEBI:16761 kegg.compound:C00008
  species F6P in cell = 0.6249764; F6P is "Fru6-P";  // CHEBI:16084 kegg.compound:C05345
  species F16bP in cell = 6.221321; F16bP is "Fru1,6-P2";  // CHEBI:28013 kegg.compound:C05378
  species AMP in cell = 0.2928849;  // CHEBI:16027 kegg.compound:C00020
  species $F26bP in cell = 0.02; F26bP is "Fru2,6-P2";  // CHEBI:28602 kegg.compound:C00665
  species DHAP in cell = 1.004153; DHAP is "glycerone phosphate";  // CHEBI:16108 kegg.compound:C00111
  species GAP in cell = 0.04518092; GAP is "Gra3P";  // CHEBI:29052 kegg.compound:C00118
  species NAD in cell = 1.50329;  // CHEBI:15846 kegg.compound:C00003
  species BPG in cell = 0.0007368735; BPG is "Gri2,3P2";  // CHEBI:16001 kegg.compound:C00236
  species NADH in cell = 0.0867097;  // CHEBI:16908 kegg.compound:C00004
  species P3G in cell = 0.8856885; P3G is "Gri3P";  // CHEBI:17794 kegg.compound:C00197
  species P2G in cell = 0.1276958; P2G is "Gri2P";  // CHEBI:17835 kegg.compound:C00631
  species PEP in cell = 0.06323521; PEP is "phosphoenolpyruvate";  // CHEBI:18021 kegg.compound:C00074
  species PYR in cell = 1.815313; PYR is "pyruvate";  // CHEBI:15361 kegg.compound:C00022
  species AcAld in cell = 0.1781406; AcAld is "acetaldehyde";  // CHEBI:15343 kegg.compound:C00084
  species $CO2 in cell = 1;  // CHEBI:16526 kegg.compound:C00011
  species $EtOH in cell = 50; EtOH is "ethanol";  // CHEBI:16236 kegg.compound:C00469
  species $Glycerol in cell = 0.15; Glycerol is "glycerol";  // CHEBI:17754 kegg.compound:C00116
  species $Glycogen in cell = 0; Glycogen is "glycogen";  // CHEBI:28087 kegg.compound:C00182
  species $Trehalose in cell = 0; Trehalose is "trehalose";  // CHEBI:16551 kegg.compound:C01083
  species $Succinate in cell = 0; Succinate is "succinate";  // CHEBI:30031 kegg.compound:C00042

  // Reactions:
  HXT: $GLCo -> GLCi; Vmax_1*(GLCo - GLCi)/Kglc_1/(1 + (GLCo + GLCi)/Kglc_1 + Ki_1*GLCo*GLCi/Kglc_1^2); HXT is "glucose transport";  // isVersionOf GO:0015758
    Vmax_1 = 97.24; Kglc_1 = 1.1918; Ki_1 = 0.91;
  HK: GLCi + ATP -> G6P + ADP; cell*Vmax_2*(GLCi*ATP/(Kglc_2*Katp_2) - G6P*ADP/(Kglc_2*Katp_2*Keq_2))/((1 + GLCi/Kglc_2 + G6P/Kg6p_2)*(1 + ATP/Katp_2 + ADP/Kadp_2)); HK is "hexokinase";  // kegg.reaction:R02848; isVersionOf ec-code:2.7.1.1 GO:0004396
    Vmax_2 = 236.7; Kglc_2 = 0.08; Katp_2 = 0.15; Keq_2 = 2000; Kg6p_2 = 30; Kadp_2 = 0.23;
  PGI: G6P -> F6P; cell*Vmax_3*(G6P/Kg6p_3 - F6P/(Kg6p_3*Keq_3))/(1 + G6P/Kg6p_3 + F6P/Kf6p_3); PGI is "phosphoglucose isomerase";  // kegg.reaction:R00771; isVersionOf ec-code:5.3.1.9 GO:0004347
    Vmax_3 = 1056; Kg6p_3 = 1.4; Keq_3 = 0.29; Kf6p_3 = 0.3;
  PFK: ATP + F6P => ADP + F16bP; cell*Vmax_4*(gR_4*(F6P/Kf6p_4)*(ATP/Katp_4)*(1 + F6P/Kf6p_4 + ATP/Katp_4 + gR_4*F6P/Kf6p_4*ATP/Katp_4)/((1 + F6P/Kf6p_4 + ATP/Katp_4 + gR_4*F6P/Kf6p_4*ATP/Katp_4)^2 + L0_4*((1 + Ciatp_4*ATP/Kiatp_4)/(1 + ATP/Kiatp_4))^2*((1 + Camp_4*AMP/Kamp_4)/(1 + AMP/Kamp_4))^2*((1 + Cf26_4*F26bP/Kf26_4 + Cf16_4*F16bP/Kf16_4)/(1 + F26bP/Kf26_4 + F16bP/Kf16_4))^2*(1 + Catp_4*ATP/Katp_4)^2)); PFK is "phosphofructosekinase";  // modifiers: AMP, F26bP; isVersionOf ec-code:2.7.1.11 GO:0003872; kegg.reaction:R00756
    Vmax_4 = 110; gR_4 = 5.12; Kf6p_4 = 0.1; Katp_4 = 0.71; L0_4 = 0.66; Ciatp_4 = 100; Kiatp_4 = 0.65; Camp_4 = 0.0845; Kamp_4 = 0.0995; Cf26_4 = 0.0174; Kf26_4 = 0.000682; Cf16_4 = 0.397; Kf16_4 = 0.111; Catp_4 = 3;
  ALD: F16bP -> DHAP + GAP; cell*Vmax_5*(F16bP/Kf16bp_5 - DHAP*GAP/(Kf16bp_5*Keq_5))/(1 + F16bP/Kf16bp_5 + DHAP/Kdhap_5 + GAP/Kgap_5 + F16bP*GAP/(Kf16bp_5*Kigap_5) + DHAP*GAP/(Kdhap_5*Kgap_5)); ALD is "fructosebisphosphate aldolase";  // kegg.reaction:R01068; isVersionOf ec-code:4.1.2.13 GO:0004332
    Vmax_5 = 94.69; Kf16bp_5 = 0.3; Keq_5 = 0.069; Kdhap_5 = 2; Kgap_5 = 2.4; Kigap_5 = 10;
  TPI: DHAP -> GAP; cell*(k1_6*DHAP - k2_6*GAP); TPI is "triosephosphate isomerase";  // kegg.reaction:R01015; isVersionOf ec-code:5.3.1.1 GO:0004807
    k1_6 = 450000; k2_6 = 10000000;
  GAPDH: GAP + NAD -> BPG + NADH; cell*C_7*(Vmaxf_7*GAP*NAD/(Kgap_7*Knad_7) - Vmaxr_7*BPG*NADH/(Kbpg_7*Knadh_7))/((1 + GAP/Kgap_7 + BPG/Kbpg_7)*(1 + NAD/Knad_7 + NADH/Knadh_7)); GAPDH is "glyceraldehyde phosphate dehydrogenase";  // kegg.reaction:R01061; isVersionOf ec-code:1.2.1.12 GO:0004365
    C_7 = 1; Vmaxf_7 = 1152; Kgap_7 = 0.21; Knad_7 = 0.09; Vmaxr_7 = 6719; Kbpg_7 = 0.0098; Knadh_7 = 0.06;
  PGK: ADP + BPG -> ATP + P3G; cell*Vmax_8*((Keq_8*BPG*ADP - P3G*ATP)/(Kp3g_8*Katp_8))/((1 + BPG/Kbpg_8 + P3G/Kp3g_8)*(1 + ADP/Kadp_8 + ATP/Katp_8)); PGK is "3-phosphoglycerate kinase";  // kegg.reaction:R01512; isVersionOf ec-code:2.7.2.3 GO:0004618
    Vmax_8 = 1288; Keq_8 = 3200; Kp3g_8 = 0.53; Katp_8 = 0.3; Kbpg_8 = 0.003; Kadp_8 = 0.2;
  PGM: P3G -> P2G; cell*Vmax_9*(P3G/Kp3g_9 - P2G/(Kp3g_9*Keq_9))/(1 + P3G/Kp3g_9 + P2G/Kp2g_9); PGM is "phosphoglyceromutase";  // isVersionOf ec-code:5.4.2.1 GO:0004619; kegg.reaction:R01518
    Vmax_9 = 2585; Kp3g_9 = 1.2; Keq_9 = 0.19; Kp2g_9 = 0.08;
  ENO: P2G -> PEP; cell*Vmax_10*(P2G/Kp2g_10 - PEP/(Kp2g_10*Keq_10))/(1 + P2G/Kp2g_10 + PEP/Kpep_10); ENO is "enolase";  // kegg.reaction:R00658; isVersionOf ec-code:4.2.1.11 GO:0004634
    Vmax_10 = 201.6; Kp2g_10 = 0.04; Keq_10 = 6.7; Kpep_10 = 0.5;
  PYK: ADP + PEP -> ATP + PYR; cell*Vmax_11*(PEP*ADP/(Kpep_11*Kadp_11) - PYR*ATP/(Kpep_11*Kadp_11*Keq_11))/((1 + PEP/Kpep_11 + PYR/Kpyr_11)*(1 + ADP/Kadp_11 + ATP/Katp_11)); PYK is "pyruvate kinase";  // kegg.reaction:R00200; isVersionOf ec-code:2.7.1.40 GO:0004743
    Vmax_11 = 1000; Kpep_11 = 0.14; Kadp_11 = 0.53; Keq_11 = 6500; Kpyr_11 = 21; Katp_11 = 1.5;
  PDC: PYR => AcAld + $CO2; cell*Vmax_12*(PYR/Kpyr_12)^nH_12/(1 + (PYR/Kpyr_12)^nH_12); PDC is "pyruvate decarboxylase";  // kegg.reaction:R00636; isVersionOf ec-code:4.1.1.1 GO:0004737
    Vmax_12 = 857.8; Kpyr_12 = 4.33; nH_12 = 1.9;
  ADH: NAD + $EtOH -> NADH + AcAld; cell*Vmax_13*(EtOH*NAD/(Ketoh_13*Kinad_13) - AcAld*NADH/(Ketoh_13*Kinad_13*Keq_13))/(1 + NAD/Kinad_13 + EtOH*Knad_13/(Kinad_13*Ketoh_13) + AcAld*Knadh_13/(Kinadh_13*Kacald_13) + NADH/Kinadh_13 + EtOH*NAD/(Kinad_13*Ketoh_13) + NAD*AcAld*Knadh_13/(Kinad_13*Kinadh_13*Kacald_13) + EtOH*NADH*Knad_13/(Kinad_13*Kinadh_13*Ketoh_13) + AcAld*NADH/(Kacald_13*Kinadh_13) + EtOH*NAD*AcAld/(Kinad_13*Kiacald_13*Ketoh_13) + EtOH*AcAld*NADH/(Kietoh_13*Kinadh_13*Kacald_13)); ADH is "alcohol dehydrogenase";  // kegg.reaction:R00754; isVersionOf ec-code:1.1.1.1 GO:0004022
    Vmax_13 = 209.5; Ketoh_13 = 17; Kinad_13 = 0.92; Keq_13 = 6.9e-5; Knad_13 = 0.17; Knadh_13 = 0.11; Kinadh_13 = 0.031; Kacald_13 = 1.11; Kiacald_13 = 1.1; Kietoh_13 = 90;
  ATPase: ATP => ADP; cell*Katpase_14*ATP;  // isVersionOf GO:0016887
    Katpase_14 = 39.5;
  AK: 2 ADP -> ATP + AMP; cell*(k1_15*ADP*ADP - k2_15*ATP*AMP);  // isVersionOf ec-code:2.7.4.3 GO:0004017; kegg.reaction:R00127
    k1_15 = 45; k2_15 = 100;
  G3PDH: DHAP + NADH => NAD + $Glycerol; cell*Vmax_16*(DHAP/Kdhap_16*(NADH/Knadh_16) - Glycerol/Kdhap_16*(NAD/Knadh_16)*(1/Keq_16))/((1 + DHAP/Kdhap_16 + Glycerol/Kglycerol_16)*(1 + NADH/Knadh_16 + NAD/Knad_16)); G3PDH is "glycerol-3-phosphate dehydrogenase";  // hasPart kegg.reaction:R00842 kegg.reaction:R07298; hasVersion ec-code:3.1.3.21 ec-code:1.1.1.8; isVersionOf GO:0006114
    Vmax_16 = 47.11; Kdhap_16 = 0.4; Knadh_16 = 0.023; Keq_16 = 4300; Kglycerol_16 = 1; Knad_16 = 0.93;
  Glycogen_Branch: ATP + G6P => ADP + $Glycogen; cell*KGLYCOGEN_17;  // isVersionOf GO:0005978
    KGLYCOGEN_17 = 6;
  Trehalose_Branch: ATP + 2 G6P => ADP + $Trehalose; cell*Ktrehalose_18;  // isVersionOf GO:0005992
    Ktrehalose_18 = 2.4;
  Succinate_Branch: 3 NAD + 2 AcAld => 3 NADH + $Succinate; cell*k_19*AcAld;  // isVersionOf GO:0006105
    k_19 = 21.4;

  // Unit definitions:
  unit substance = 1e-3 mole; substance is "mmole";
  unit time = 60 second; time is "minute";
end
