// SBML level 2 version 4

model bachmann2()

  // Compartments:
  compartment cyt = 0.4;  // isVersionOf GO:0005829
  compartment nuc = 0.275;  // isVersionOf GO:0005634

  // Species:
  species CIS in cyt = 0;  // isVersionOf uniprot:Q62225
  species CISRNA in cyt = 0;  // isVersionOf CHEBI:33699
  species CISnRNA1 in nuc = 0;  // isVersionOf CHEBI:33699
  species CISnRNA2 in nuc = 0;  // isVersionOf CHEBI:33699
  species CISnRNA3 in nuc = 0;  // isVersionOf CHEBI:33699
  species CISnRNA4 in nuc = 0;  // isVersionOf CHEBI:33699
  species CISnRNA5 in nuc = 0;  // isVersionOf CHEBI:33699
  species Epo in cyt = 1.24997e-7;  // isVersionOf uniprot:P07321
  species EpoRJAK2 in cyt = 3.97622;  // hasPart uniprot:P14753 uniprot:Q62120
  species EpoRJAK2_CIS in cyt = 0;  // hasPart uniprot:P14753 uniprot:Q62120 uniprot:Q62225
  species EpoRpJAK2 in cyt = 0;  // hasPart uniprot:P14753 uniprot:Q62120 kegg.compound:C00562
  species SHP1 in cyt = 26.7251;  // isVersionOf uniprot:P29351
  species SHP1Act in cyt = 0;  // isVersionOf uniprot:P29351
  species SOCS3 in cyt = 0;  // isVersionOf uniprot:O35718
  species SOCS3RNA in cyt = 0;  // isVersionOf CHEBI:33699
  species SOCS3nRNA1 in nuc = 0;  // isVersionOf CHEBI:33699
  species SOCS3nRNA2 in nuc = 0;  // isVersionOf CHEBI:33699
  species SOCS3nRNA3 in nuc = 0;  // isVersionOf CHEBI:33699
  species SOCS3nRNA4 in nuc = 0;  // isVersionOf CHEBI:33699
  species SOCS3nRNA5 in nuc = 0;  // isVersionOf CHEBI:33699
  species STAT5 in cyt = 79.7535;  // isVersionOf uniprot:P42230
  species npSTAT5 in nuc = 0;  // isVersionOf uniprot:P42230 kegg.compound:C00562
  species p12EpoRpJAK2 in cyt = 0;  // hasPart uniprot:P14753 uniprot:Q62120 kegg.compound:C00562
  species p1EpoRpJAK2 in cyt = 0;  // hasPart uniprot:P14753 uniprot:Q62120 kegg.compound:C00562
  species p2EpoRpJAK2 in cyt = 0;  // hasPart uniprot:P14753 uniprot:Q62120 kegg.compound:C00562
  species pSTAT5 in cyt = 0;  // isVersionOf uniprot:P42230 kegg.compound:C00562

  // Parameters:
  ActD = 0;
  CISEqc = 432.871;
  CISEqcOE = 0.530261;
  CISInh = 784653000;
  CISRNADelay = 0.144775;
  CISRNAEqc = 1;
  CISRNATurn = 1000;
  CISTurn = 0.00839842;
  CISoe = 0;
  EpoRActJAK2 = 0.267308;
  EpoRCISInh = 1000000;
  EpoRCISRemove = 5.42932;
  JAK2ActEpo = 633253;
  JAK2EpoRDeaSHP1 = 142.722;
  SHP1ActEpoR = 0.001;
  SHP1Dea = 0.00816391;
  SOCS3Eqc = 173.653;
  SOCS3EqcOE = 0.679157;
  SOCS3Inh = 10.408;
  SOCS3RNADelay = 1.06465;
  SOCS3RNAEqc = 1;
  SOCS3RNATurn = 0.00830844;
  SOCS3Turn = 10000;
  SOCS3oe = 0;
  STAT5ActEpoR = 38.9757;
  STAT5ActJAK2 = 0.0780965;
  STAT5Exp = 0.0745155;
  STAT5Imp = 0.0268889;
  epo_level = 1.24997e-7;
  init_EpoRJAK2 = 3.97622;
  init_SHP1 = 26.7251;
  init_STAT5 = 79.7535;

  // Assignment rules:
  observable_task0_model0_bachmann2_p2EpoRpJAK2 := p2EpoRpJAK2;
  observable_task0_model0_bachmann2_p12EpoRpJAK2 := p12EpoRpJAK2;
  observable_task0_model0_bachmann2_SHP1 := SHP1;
  observable_task0_model0_bachmann2_SHP1Act := SHP1Act;
  observable_task0_model0_bachmann2_STAT5 := STAT5;
  observable_task0_model0_bachmann2_pSTAT5 := pSTAT5;
  observable_task0_model0_bachmann2_npSTAT5 := npSTAT5;
  observable_task0_model0_bachmann2_CISRNA := CISRNA;
  observable_task0_model0_bachmann2_CIS := CIS;
  observable_task0_model0_bachmann2_SOCS3RNA := SOCS3RNA;
  observable_task0_model0_bachmann2_EpoRJAK2 := EpoRJAK2;
  observable_task0_model0_bachmann2_SOCS3 := SOCS3;
  observable_task0_model0_bachmann2_EpoRpJAK2 := EpoRpJAK2;
  observable_task0_model0_bachmann2_p1EpoRpJAK2 := p1EpoRpJAK2;

  // Reactions:
  reaction_1: EpoRJAK2 => EpoRpJAK2; JAK2ActEpo*Epo*EpoRJAK2/(SOCS3Inh*SOCS3/SOCS3Eqc + 1)*cyt;  // modifiers: Epo, SOCS3; isVersionOf GO:0016310
  reaction_10: EpoRJAK2_CIS => ; EpoRCISRemove*EpoRJAK2_CIS*(p12EpoRpJAK2 + p1EpoRpJAK2)/init_EpoRJAK2*cyt;  // modifiers: p12EpoRpJAK2, p1EpoRpJAK2; isVersionOf GO:0009056
  reaction_11: SHP1 => SHP1Act; SHP1ActEpoR*SHP1*(EpoRpJAK2 + p12EpoRpJAK2 + p1EpoRpJAK2 + p2EpoRpJAK2)/init_EpoRJAK2*cyt;  // modifiers: EpoRpJAK2, p12EpoRpJAK2, p1EpoRpJAK2, p2EpoRpJAK2; isVersionOf MOD:00000
  reaction_12: SHP1Act => SHP1; SHP1Dea*SHP1Act*cyt;  // isVersionOf MOD:00000
  reaction_13: STAT5 => pSTAT5; STAT5ActJAK2*STAT5*(EpoRpJAK2 + p12EpoRpJAK2 + p1EpoRpJAK2 + p2EpoRpJAK2)/(init_EpoRJAK2*(SOCS3Inh*SOCS3/SOCS3Eqc + 1))*cyt;  // modifiers: EpoRpJAK2, SOCS3, p12EpoRpJAK2, p1EpoRpJAK2, p2EpoRpJAK2; isVersionOf GO:0016310
  reaction_14: STAT5 => pSTAT5; STAT5ActEpoR*STAT5*(p12EpoRpJAK2 + p1EpoRpJAK2)^2/(init_EpoRJAK2^2*(CISInh*CIS/CISEqc + 1)*(SOCS3Inh*SOCS3/SOCS3Eqc + 1))*cyt;  // modifiers: CIS, SOCS3, p12EpoRpJAK2, p1EpoRpJAK2; isVersionOf GO:0016310
  reaction_15: pSTAT5 => npSTAT5; STAT5Imp*pSTAT5*cyt;  // isVersionOf GO:0051169
  reaction_16: npSTAT5 => STAT5; STAT5Exp*npSTAT5*nuc;  // isVersionOf GO:0016311
  reaction_17: -> CISnRNA1; -(CISRNAEqc*CISRNATurn*npSTAT5*(ActD - 1)/init_STAT5*nuc);  // modifiers: npSTAT5; isVersionOf GO:0032774
  reaction_18: CISnRNA1 => CISnRNA2; CISRNADelay*CISnRNA1*nuc;  // isVersionOf GO:0009451
  reaction_19: CISnRNA2 => CISnRNA3; CISRNADelay*CISnRNA2*nuc;  // isVersionOf GO:0009451
  reaction_2: EpoRpJAK2 => EpoRJAK2; JAK2EpoRDeaSHP1*SHP1Act*EpoRpJAK2/init_SHP1*cyt;  // modifiers: SHP1Act; isVersionOf GO:0016311
  reaction_20: CISnRNA3 => CISnRNA4; CISRNADelay*CISnRNA3*nuc;  // isVersionOf GO:0009451
  reaction_21: CISnRNA4 => CISnRNA5; CISRNADelay*CISnRNA4*nuc;  // isVersionOf GO:0009451
  reaction_22: CISnRNA5 => CISRNA; CISRNADelay*CISnRNA5*nuc;  // isVersionOf GO:0009451
  reaction_23: CISRNA => ; CISRNATurn*CISRNA*cyt;  // isVersionOf GO:0006401
  reaction_24: => CIS; CISEqc*CISTurn*CISRNA/CISRNAEqc*cyt;  // modifiers: CISRNA; isVersionOf GO:0009058
  reaction_25: CIS => ; CISTurn*CIS*cyt;  // isVersionOf GO:0006401
  reaction_26: => CIS; CISoe*CISEqc*CISTurn*CISEqcOE;  // isVersionOf GO:0009058
  reaction_27: -> SOCS3nRNA1; -(SOCS3RNAEqc*SOCS3RNATurn*npSTAT5*(ActD - 1)/init_STAT5*nuc);  // modifiers: npSTAT5; isVersionOf GO:0032774
  reaction_28: SOCS3nRNA1 => SOCS3nRNA2; SOCS3RNADelay*SOCS3nRNA1*nuc;  // isVersionOf GO:0009451
  reaction_29: SOCS3nRNA2 => SOCS3nRNA3; SOCS3RNADelay*SOCS3nRNA2*nuc;  // isVersionOf GO:0009451
  reaction_3: EpoRpJAK2 => p1EpoRpJAK2; EpoRActJAK2*EpoRpJAK2/(SOCS3Inh*SOCS3/SOCS3Eqc + 1)*cyt;  // modifiers: SOCS3; isVersionOf GO:0016310
  reaction_30: SOCS3nRNA3 => SOCS3nRNA4; SOCS3RNADelay*SOCS3nRNA3*nuc;  // isVersionOf GO:0009451
  reaction_31: SOCS3nRNA4 => SOCS3nRNA5; SOCS3RNADelay*SOCS3nRNA4*nuc;  // isVersionOf GO:0009451
  reaction_32: SOCS3nRNA5 => SOCS3RNA; SOCS3RNADelay*SOCS3nRNA5*nuc;  // isVersionOf GO:0009451
  reaction_33: SOCS3RNA => ; SOCS3RNATurn*SOCS3RNA*cyt;  // isVersionOf GO:0006401
  reaction_34: => SOCS3; SOCS3Eqc*SOCS3Turn*SOCS3RNA/SOCS3RNAEqc*cyt;  // modifiers: SOCS3RNA; isVersionOf GO:0009058
  reaction_35: SOCS3 => ; SOCS3Turn*SOCS3*cyt;  // isVersionOf GO:0006401
  reaction_36: => SOCS3; SOCS3oe*SOCS3Eqc*SOCS3Turn*SOCS3EqcOE;  // isVersionOf GO:0009058
  reaction_4: EpoRpJAK2 => p2EpoRpJAK2; 3*EpoRActJAK2*EpoRpJAK2/((SOCS3Inh*SOCS3/SOCS3Eqc + 1)*(EpoRCISInh*EpoRJAK2_CIS + 1))*cyt;  // modifiers: EpoRJAK2_CIS, SOCS3; isVersionOf GO:0016310
  reaction_5: p1EpoRpJAK2 => p12EpoRpJAK2; 3*EpoRActJAK2*p1EpoRpJAK2/((SOCS3Inh*SOCS3/SOCS3Eqc + 1)*(EpoRCISInh*EpoRJAK2_CIS + 1))*cyt;  // modifiers: EpoRJAK2_CIS, SOCS3; isVersionOf GO:0016310
  reaction_6: p2EpoRpJAK2 => p12EpoRpJAK2; EpoRActJAK2*p2EpoRpJAK2/(SOCS3Inh*SOCS3/SOCS3Eqc + 1)*cyt;  // modifiers: SOCS3; isVersionOf GO:0016310
  reaction_7: p1EpoRpJAK2 => EpoRJAK2; JAK2EpoRDeaSHP1*SHP1Act*p1EpoRpJAK2/init_SHP1*cyt;  // modifiers: SHP1Act; isVersionOf GO:0016311
  reaction_8: p2EpoRpJAK2 => EpoRJAK2; JAK2EpoRDeaSHP1*SHP1Act*p2EpoRpJAK2/init_SHP1*cyt;  // modifiers: SHP1Act; isVersionOf GO:0016311
  reaction_9: p12EpoRpJAK2 => EpoRJAK2; JAK2EpoRDeaSHP1*SHP1Act*p12EpoRpJAK2/init_SHP1*cyt;  // modifiers: SHP1Act; isVersionOf GO:0016311
end
