// SBML level 2 version 4

model band2()

  // Compartments:
  compartment cell = 1;  // isVersionOf GO:0005623

  // Species:
  species VENUS in cell = 1;  // hasPart uniprot:Q940U6 uniprot:Q9XFM0

  // Parameters:
  lambda_star = 0.52;
  p1_star = 0.056;
  p2 = 0.0053;
  qj_star = 0.16;

  // Assignment rules:
  observable_plot1_VENUS_datagen1 := task1_model1_band2_VENUS;
  observable_plot3_VENUS_datagen1 := task3_model3_band2_VENUS;
  observable_plot5_VENUS_datagen1 := task5_model5_band2_VENUS;
  observable_task0_model0_band2_VENUS := VENUS;
  observable_plot2_VENUS_datagen1 := task2_model2_band2_VENUS;
  observable_plot4_VENUS_datagen1 := task4_model4_band2_VENUS;

  // Reactions:
  VENUSdecayduetoauxin: VENUS => ; p2*VENUS/(p1_star*VENUS + qj_star);  // isVersionOf GO:0030163
  VENUSdecayduetophotobleaching: VENUS => ; lambda_star*p2*VENUS;  // isVersionOf GO:0030163
  VENUSproduction: => VENUS; p2;  // isVersionOf GO:0006412
end
