// SBML level 2 version 4

model bier2()

  // Compartments:
  compartment compartment = 1;  // GO:0005623

  // Species:
  species G1 in compartment = 6.6; G1 is "Glucose_1";  // isVersionOf kegg.compound:C00293 CHEBI:17234
  species G2 in compartment = 10.3; G2 is "Glucose_2";  // isVersionOf kegg.compound:C00293 CHEBI:17234
  species T1 in compartment = 7.6; T1 is "ATP_1";  // isVersionOf kegg.compound:C00002 CHEBI:15422
  species T2 in compartment = 0.41; T2 is "ATP_2";  // isVersionOf kegg.compound:C00002 CHEBI:15422

  // Parameters:
  // V_in represents the constant glucose inflow
  V_in = 0.36;
  epsilon = 0.01;
  // k1 represents the phosphofructo kinase activity
  k1 = 0.02;
  km = 13;
  kp = 6;

  // Assignment rules:
  Tsum := T2 + T1;
  Tdiff := T2 - T1;
  observable_task0_model0_bier2_Tsum := task0_model0_bier2_Tsum;
  observable_task0_model0_bier2_Tdiff := task0_model0_bier2_Tdiff;
  observable_task0_model0_bier2_T1 := T1;
  observable_task0_model0_bier2_T2 := T2;

  // Reactions:
  vG1toT1: G1 -> 2 T1; k1*G1*T1;
  vG2toT2: G2 -> 2 T2; k1*G2*T2;
  vIn: -> G1 + G2; V_in;
  vOut1T1: T1 -> ; kp*T1/(km + T1);
  vOut1T2: T2 -> ; kp*T2/(km + T2);
  vT2toT1: T2 -> T1; epsilon*(T2 - T1);
end
