// SBML level 2 version 1

model bindschadler1()

  // Compartments:
  compartment compartment = 1;  // GO:0005829

  // Species:
  species Calcium_ion_Cell1 in compartment = 0.3;  // CHEBI:29108 kegg.compound:C00076
  species Calcium_ion_Cell2 in compartment = 0.1;  // CHEBI:29108 kegg.compound:C00076
  species h1 in compartment = 0.8; h1 is "Receptor fraction Cell1";  // isVersionOf interpro:IPR000493
  species h2 in compartment = 0.1; h2 is "Receptor fraction Cell2";  // isVersionOf interpro:IPR000493

  // Parameters:
  R1 = 6;
  R3 = 50;
  R5 = 1.6;
  k1 = 44;
  k2 = 26.5;
  k3 = 1.6;
  r2 = 100;
  r4 = 20;

  // Assignment rules:
  Phi3_c2 := k3/(R5 + Calcium_ion_Cell2);
  Phi2_c2 := (k2 + r4*Calcium_ion_Cell2)/(R3 + Calcium_ion_Cell2);
  Phi_minus1_c2 := k1/(R3 + Calcium_ion_Cell2);
  Phi1_c2 := r2*Calcium_ion_Cell2/(R1 + Calcium_ion_Cell2);
  Phi3_c1 := k3/(R5 + Calcium_ion_Cell1);
  Phi2_c1 := (k2 + r4*Calcium_ion_Cell1)/(R3 + Calcium_ion_Cell1);
  Phi_minus1_c1 := k1/(R3 + Calcium_ion_Cell1);
  Phi1_c1 := r2*Calcium_ion_Cell1/(R1 + Calcium_ion_Cell1);
  observable_task0_model0_bindschadler1_c1 := Calcium_ion_Cell1;
  observable_task0_model0_bindschadler1_c2 := Calcium_ion_Cell2;

  // Reactions:
  Inactivated_to_S_Cell1: => h1; compartment*Phi3_c1*(1 - h1); Inactivated_to_S_Cell1 is "Inactivated to Shut state transition Cell1";  // isVersionOf GO:0031586
  Inactivated_to_S_Cell2: => h2; compartment*Phi3_c2*(1 - h2); Inactivated_to_S_Cell2 is "Inactivated to Shut state transition Cell2";  // isVersionOf GO:0031586
  Jleak_Cell1: => Calcium_ion_Cell1; compartment*Jleak_Cell1_Jleak; Jleak_Cell1 is "IP3R independent Ca release Cell1";  // isVersionOf GO:0007204 GO:0051209
    Jleak_Cell1_Jleak = 0.2;
  Jleak_Cell2: => Calcium_ion_Cell2; compartment*Jleak_Cell2_Jleak; Jleak_Cell2 is "IP3R independent Ca release Cell2";  // isVersionOf GO:0007204 GO:0051209
    Jleak_Cell2_Jleak = 0.2;
  Jpump_Cell1: Calcium_ion_Cell1 => ; compartment*(Jpump_Cell1_Vp*Calcium_ion_Cell1^2/(Jpump_Cell1_Kp^2 + Calcium_ion_Cell1^2)); Jpump_Cell1 is "ATPase pump mediated Ca efflux Cell1";  // GO:0005388
    Jpump_Cell1_Vp = 1.2; Jpump_Cell1_Kp = 0.18;
  Jpump_Cell2: Calcium_ion_Cell2 => ; compartment*Jpump_Cell2_Vp*Calcium_ion_Cell2^2/(Jpump_Cell2_Kp^2 + Calcium_ion_Cell2^2); Jpump_Cell2 is "ATPase pump mediated Ca efflux Cell2";  // GO:0005388
    Jpump_Cell2_Vp = 1.2; Jpump_Cell2_Kp = 0.18;
  Jreceptor_Cell1: => Calcium_ion_Cell1; compartment*Jreceptor_Cell1_kf*(Jreceptor_Cell1_p*h1*Phi1_c1/(Phi1_c1*Jreceptor_Cell1_p + Phi_minus1_c1))^4; Jreceptor_Cell1 is "IP3R mediated Ca release Cell1";  // modifiers: h1; GO:0005220 GO:0007204
    Jreceptor_Cell1_kf = 28; Jreceptor_Cell1_p = 0.2778;
  Jreceptor_Cell2: => Calcium_ion_Cell2; compartment*Jreceptor_Cell2_kf*(Jreceptor_Cell2_p*h2*Phi1_c2/(Phi1_c2*Jreceptor_Cell2_p + Phi_minus1_c2))^4; Jreceptor_Cell2 is "IP3R mediated Ca release Cell2";  // modifiers: h2; GO:0005220 GO:0007204
    Jreceptor_Cell2_kf = 28; Jreceptor_Cell2_p = 0.2778;
  Open_to_Inactivated_Cell1: h1 => ; compartment*Phi1_c1*Phi2_c1*h1*Open_to_Inactivated_Cell1_p/(Phi1_c1*Open_to_Inactivated_Cell1_p + Phi_minus1_c1); Open_to_Inactivated_Cell1 is "Open to Inactivated state transition Cell1";  // isVersionOf GO:0031586
    Open_to_Inactivated_Cell1_p = 0.2778;
  Open_to_Inactivated_Cell2: h2 => ; compartment*Phi1_c2*Phi2_c2*h2*Open_to_Inactivated_Cell2_p/(Phi1_c2*Open_to_Inactivated_Cell2_p + Phi_minus1_c2); Open_to_Inactivated_Cell2 is "Open to Inactivated state transition Cell2";  // isVersionOf GO:0031586
    Open_to_Inactivated_Cell2_p = 0.2778;
  diffusion: Calcium_ion_Cell2 => Calcium_ion_Cell1; compartment*D*(Calcium_ion_Cell2 - Calcium_ion_Cell1); diffusion is "Diffusion of Ca between cells";  // isVersionOf GO:0015085
    D = 0.01;

  // Unit definitions:
  unit micromole = 1e-6 mole;
end
