// SBML level 2 version 4

model borghans2()

  // Compartments:
  compartment cytosol = 1;  // isVersionOf GO:0005829
  compartment extracellular = 1;  // isVersionOf GO:0005615
  compartment intravesicular = 1;  // isVersionOf GO:0005790

  // Species:
  species A in cytosol = 0.45;  // CHEBI:16595 kegg.compound:C01245
  species EC in extracellular = 1000;  // CHEBI:29108 kegg.compound:C00076
  species Y in intravesicular = 0.36;  // CHEBI:29108 kegg.compound:C00076
  species Z in cytosol = 0;  // CHEBI:29108 kegg.compound:C00076

  // Parameters:
  beta = 0.5;

  // Assignment rules:
  observable_task0_model0_borghans2_Z := Z;
  observable_task0_model0_borghans2_A := A;
  observable_task0_model0_borghans2_Y := Y;

  // Reactions:
  v2: Z => Y; intravesicular*(Vm2*Z^2/(K2^2 + Z^2));  // isVersionOf GO:0051481
    Vm2 = 6.5; K2 = 0.1;
  v3: Y => Z; cytosol*Vm3*A^4*Y^2*Z^4/((Ka^4 + A^4)*(Ky^2 + Y^2)*(Kz^4 + Z^4));  // modifiers: A; isVersionOf GO:0006816 GO:0051482
    Vm3 = 19.5; Ka = 0.2; Ky = 0.2; Kz = 0.3;
  v4: Y => Z; cytosol*Kf*Y;  // isVersionOf GO:0007204
    Kf = 1;
  v5: Z => EC; extracellular*K*Z;  // isVersionOf GO:0051481
    K = 10;
  v6: => A; cytosol*beta*Vp; v6 is "Agonist stimulated production of IP3";  // isVersionOf GO:0006021 GO:0007200
    Vp = 2.5;
  Ca_dependent_IP3_degradation: A => ; cytosol*Vd*A^2*Z^n/((Kp^2 + A^2)*(Kd^n + Z^n));  // modifiers: Z; isVersionOf GO:0019310
    Vd = 80; Kp = 1; Kd = 0.4; n = 4;
  Ca_independent_IP3_degradation: A => ; cytosol*epsilon*A;  // isVersionOf GO:0019310
    epsilon = 0.1;
  vin: EC => Z; cytosol*(v0 + v1*beta);  // isVersionOf GO:0006816 GO:0007204
    v0 = 2; v1 = 1;

  // Unit definitions:
  unit micromole_default = 1e-6 mole; micromole_default is "micromole (default)";
  unit minute_default = 60 second; minute_default is "minute (default)";
end
