// SBML level 2 version 4

model bucher1()

  // Compartments:
  compartment cell = 0.0142;  // GO:0005623
  compartment compartment = 1;
  compartment medium = 2;  // BTO:0000316

  // Species:
  species ASL_b in cell = 0;  // hasVersion pubchem.compound:6483036
  species ASL_c in cell = 0;  // isVersionOf pubchem.compound:6483036
  species ASL_m in medium = 30.56;  // isVersionOf pubchem.compound:6483036
  species ASLoOH_b in cell = 0;  // hasVersion pubchem.compound:6483036
  species ASLoOH_c in cell = 0;  // hasVersion pubchem.compound:6483036
  species ASLoOH_m in medium = 0;  // hasVersion pubchem.compound:6483036
  species ASLpOH_b in cell = 0;  // hasVersion pubchem.compound:6483036
  species ASLpOH_c in cell = 0;  // hasVersion pubchem.compound:6483036
  species ASLpOH_m in medium = 0;  // hasVersion pubchem.compound:6483036
  species AS_b in cell = 0;  // hasVersion CHEBI:39548
  species AS_c in cell = 0;  // isVersionOf CHEBI:39548
  species AS_m in medium = 8797.15;  // isVersionOf CHEBI:39548 pubchem.compound:60823
  species ASoOH_b in cell = 0;  // hasVersion CHEBI:39548
  species ASoOH_c in cell = 0;  // hasVersion CHEBI:39548
  species ASoOH_m in medium = 0;  // hasVersion CHEBI:39548
  species ASpOH_b in cell = 0;  // hasVersion CHEBI:39548
  species ASpOH_c in cell = 0;  // hasVersion CHEBI:39548
  species ASpOH_m in medium = 0;  // hasVersion CHEBI:39548

  // Parameters:
  CYP3A4_ASLoOH_Km1 = 3900;
  CYP3A4_ASLoOH_Vmax = 39.1342;
  CYP3A4_ASLpOH_Km1 = 1400;
  CYP3A4_ASLpOH_Vmax = 17.4446;
  CYP3A4_ASoOH_Km1 = 29700;
  CYP3A4_ASoOH_Vmax = 47.4985;
  CYP3A4_ASpOH_Km1 = 25600;
  CYP3A4_ASpOH_Vmax = 15.7336;
  Export_ASL_k = 0.021822;
  Export_ASLoOH_k = 0.0026674;
  Export_ASLpOH_k = 0.0011319;
  Export_AS_k = 0.002166;
  Export_ASoOH_k = 0.0015983;
  Export_ASpOH_k = 0.00079526;
  Import_ASL_k = 0.2754;
  Import_ASLoOH_k = 0.026122;
  Import_ASLpOH_k = 0.033729;
  Import_AS_k = 0.020335;
  Import_ASoOH_k = 0.00038875;
  Import_ASpOH_k = 0.0039614;
  Prot_k1 = 8.52;
  UGT1A3_AS_KI1 = 75000;
  UGT1A3_AS_Km1 = 12000;
  UGT1A3_AS_Vmax = 13.5862;
  fu_AS = 0.22 dimensionless;
  fu_ASL = 0.22 dimensionless;
  k_CR_ASL_c = 3.55e-5;
  k_CR_ASL_m = 0.005;
  k_PON_ASL_c = 0.0043734;
  k_PON_OH_c = 0.0039829;

  // Assignment rules:
  observable_task0_model0_bucher1_ASoOH_m := ASoOH_m;
  observable_task0_model0_bucher1_ASL_m := ASL_m;
  observable_task0_model0_bucher1_ASLpOH_m := ASLpOH_m;
  observable_task0_model0_bucher1_ASLoOH_m := ASLoOH_m;
  observable_task0_model0_bucher1_AS_c := AS_c;
  observable_task0_model0_bucher1_ASpOH_c := ASpOH_c;
  observable_task0_model0_bucher1_ASoOH_c := ASoOH_c;
  observable_task0_model0_bucher1_ASL_c := ASL_c;
  observable_task0_model0_bucher1_ASLpOH_c := ASLpOH_c;
  observable_task0_model0_bucher1_ASLoOH_c := ASLoOH_c;
  observable_task0_model0_bucher1_AS_m := AS_m;
  observable_task0_model0_bucher1_ASpOH_m := ASpOH_m;

  // Reactions:
  ASL_Prot: ASL_c => ASL_b; Prot_k1*((1 - fu_ASL)/fu_ASL*ASL_c - ASL_b);
  ASLoOH_Prot: ASLoOH_c => ASLoOH_b; Prot_k1*((1 - fu_ASL)/fu_ASL*ASLoOH_c - ASLoOH_b);
  ASLpOH_Prot: ASLpOH_c => ASLpOH_b; Prot_k1*((1 - fu_ASL)/fu_ASL*ASLpOH_c - ASLpOH_b);
  AS_Prot: AS_c => AS_b; Prot_k1*((1 - fu_AS)/fu_AS*AS_c - AS_b);
  ASoOH_Prot: ASoOH_c => ASoOH_b; Prot_k1*((1 - fu_AS)/fu_AS*ASoOH_c - ASoOH_b);
  ASpOH_Prot: ASpOH_c => ASpOH_b; Prot_k1*((1 - fu_AS)/fu_AS*ASpOH_c - ASpOH_b);
  CR_oOH: ASLoOH_c => ASoOH_c; (k_CR_ASL_c + k_PON_OH_c)*ASLoOH_c;
  CR_pOH: ASLpOH_c => ASpOH_c; (k_CR_ASL_c + k_PON_OH_c)*ASLpOH_c;
  CYP3A4_ASLoOH: ASL_c => ASLoOH_c; CYP3A4_ASLoOH_Vmax/CYP3A4_ASLoOH_Km1*ASL_c/(1 + AS_c/CYP3A4_ASpOH_Km1 + AS_c/CYP3A4_ASoOH_Km1 + ASL_c/CYP3A4_ASLpOH_Km1 + ASL_c/CYP3A4_ASLoOH_Km1);  // modifiers: AS_c
  CYP3A4_ASLpOH: ASL_c => ASLpOH_c; CYP3A4_ASLpOH_Vmax/CYP3A4_ASLpOH_Km1*ASL_c/(1 + AS_c/CYP3A4_ASpOH_Km1 + AS_c/CYP3A4_ASoOH_Km1 + ASL_c/CYP3A4_ASLpOH_Km1 + ASL_c/CYP3A4_ASLoOH_Km1);  // modifiers: AS_c
  CYP3A4_ASoOH: AS_c => ASoOH_c; CYP3A4_ASoOH_Vmax/CYP3A4_ASoOH_Km1*AS_c/(1 + AS_c/CYP3A4_ASpOH_Km1 + AS_c/CYP3A4_ASoOH_Km1 + ASL_c/CYP3A4_ASLpOH_Km1 + ASL_c/CYP3A4_ASLoOH_Km1);  // modifiers: ASL_c
  CYP3A4_ASpOH: AS_c => ASpOH_c; CYP3A4_ASpOH_Vmax/CYP3A4_ASpOH_Km1*AS_c/(1 + AS_c/CYP3A4_ASpOH_Km1 + AS_c/CYP3A4_ASoOH_Km1 + ASL_c/CYP3A4_ASLpOH_Km1 + ASL_c/CYP3A4_ASLoOH_Km1);  // modifiers: ASL_c
  Export_AS: AS_c => AS_m; Export_AS_k*AS_c;
  Export_ASL: ASL_c => ASL_m; Export_ASL_k*ASL_c;
  Export_ASLoOH: ASLoOH_c => ASLoOH_m; Export_ASLoOH_k*ASLoOH_c;
  Export_ASLpOH: ASLpOH_c => ASLpOH_m; Export_ASLpOH_k*ASLpOH_c;
  Export_ASoOH: ASoOH_c => ASoOH_m; Export_ASoOH_k*ASoOH_c;
  Export_ASpOH: ASpOH_c => ASpOH_m; Export_ASpOH_k*ASpOH_c;
  Import_AS: AS_m => AS_c; Import_AS_k*AS_m;
  Import_ASL: ASL_m => ASL_c; Import_ASL_k*ASL_m;
  Import_ASLoOH: ASLoOH_m => ASLoOH_c; Import_ASLoOH_k*ASLoOH_m;
  Import_ASLpOH: ASLpOH_m => ASLpOH_c; Import_ASLpOH_k*ASLpOH_m;
  Import_ASoOH: ASoOH_m => ASoOH_c; Import_ASoOH_k*ASoOH_m;
  Import_ASpOH: ASpOH_m => ASpOH_c; Import_ASpOH_k*ASpOH_m;
  R_ASASL_c: ASL_c => AS_c; (k_CR_ASL_c + k_PON_ASL_c)*ASL_c;
  R_ASASL_m: ASL_m => AS_m; k_CR_ASL_m*ASL_m;
  R_oOH_m: ASLoOH_m => ASoOH_m; k_CR_ASL_m*ASLoOH_m;
  R_pOH_m: ASLpOH_m => ASpOH_m; k_CR_ASL_m*ASLpOH_m;
  UGT1A3_AS: AS_c => ASL_c; UGT1A3_AS_Vmax*AS_c/(UGT1A3_AS_Km1 + AS_c + AS_c*AS_c/UGT1A3_AS_KI1);

  // Unit definitions:
  unit min = 60 second;
  unit pmole = 1e-12 mole;
  unit ml = 1e-3 litre;
  unit pmole_per_ml = 1e-12 mole / (1e-3 litre);
  unit pmole_per_minute = 1e-12 mole / (60 second);
  unit ml_per_minute = 1e-3 litre / (60 second);
end
