// SBML level 2 version 4

model bungay2()

  // Compartments:
  compartment compartment = 1; compartment is "Cell";

  // Species:
  species APC_PS_Va_l in compartment = 0;  // hasPart PR:000007300 PR:000013261 PR:000013269 CHEBI:50967
  species APC_PS_l in compartment = 0;  // hasPart PR:000013261 PR:000013269 CHEBI:50967
  species APC_f in compartment = 0;  // isVersionOf PR:000013261 BTO:0004383
  species APC_l in compartment = 0;  // isVersionOf PR:000013261 CHEBI:50967
  species AT_f in compartment = 4721;  // isVersionOf PR:000003252 BTO:0004383
  species II_f in compartment = 1174.5;  // isVersionOf PR:000007299 BTO:0004383
  species II_l in compartment = 0;  // hasProperty CHEBI:50967 PR:000007299
  species IIa_AT_f in compartment = 0;  // hasPart PR:000007299 PR:000003252 BTO:0004383
  species IIa_TM_PC_l in compartment = 0;  // hasPart PR:000007299 PR:000013261 PR:000002105 CHEBI:50967
  species IIa_TM_l in compartment = 0;  // hasPart PR:000007299 PR:000002105 CHEBI:50967
  species IIa_f in compartment = 0;  // isVersionOf PR:000007299 BTO:0004383
  species LIPID in compartment = 170000;  // isVersionOf CHEBI:18059
  species PC_f in compartment = 66;  // isVersionOf PR:000013261 BTO:0004383
  species PC_l in compartment = 0;  // isVersionOf PR:000013261 CHEBI:50967
  species PS_f in compartment = 116;  // isVersionOf PR:000013269 BTO:0004383
  species PS_l in compartment = 0;  // isVersionOf PR:000013269 CHEBI:50967
  species TFPI_Xa_TF_VIIa_l in compartment = 0;  // hasPart PR:000007301 PR:000007294 PR:000016279 PR:000001940
  species TFPI_Xa_l in compartment = 0;  // hasPart PR:000007294 PR:000016279 CHEBI:50967
  species TFPI_f in compartment = 12.3;  // isVersionOf PR:000016279 BTO:0004383
  species TF_VII_Xa_l in compartment = 0;  // hasPart PR:000007301 PR:000007294 PR:000001940 CHEBI:50967
  species TF_VII_l in compartment = 0;  // hasPart PR:000007301 PR:000001940 CHEBI:50967
  species TF_VIIa_X_l in compartment = 0;  // hasPart PR:000007301 PR:000007294 PR:000001940 CHEBI:50967
  species TF_VIIa_Xa_l in compartment = 0;  // hasPart PR:000007301 PR:000007294 PR:000001940 CHEBI:50967
  species TF_VIIa_l in compartment = 0;  // hasPart PR:000007301 PR:000001940 CHEBI:50967
  species TF_l in compartment = 0.0182;  // isVersionOf PR:000001940 CHEBI:50967
  species TM_l in compartment = 1;  // isVersionOf PR:000002105 CHEBI:50967
  species VII_Xa_l in compartment = 0;  // hasPart PR:000007301 PR:000007294 CHEBI:50967
  species VII_f in compartment = 7.6;  // isVersionOf PR:000007301 BTO:0004383
  species VII_l in compartment = 0;  // isVersionOf PR:000007301 CHEBI:50967
  species VIIa_f in compartment = 0.1;  // isVersionOf PR:000007301 BTO:0004383
  species VIIa_l in compartment = 0;  // isVersionOf PR:000007301 CHEBI:50967
  species V_IIa_l in compartment = 0;  // hasPart PR:000007299 PR:000007300 CHEBI:50967
  species V_Xa_l in compartment = 0;  // hasPart PR:000007300 PR:000007294 CHEBI:50967
  species V_f in compartment = 1.75;  // isVersionOf PR:000007300 BTO:0004383
  species V_l in compartment = 0;  // isVersionOf PR:000007300 CHEBI:50967
  species V_mIIa_l in compartment = 0;  // hasPart PR:000007299 PR:000007300 CHEBI:50967
  species Va_f in compartment = 0;  // isVersionOf PR:000007300 BTO:0004383
  species Va_l in compartment = 0;  // isVersionOf PR:000007300 CHEBI:50967
  species Vai_f in compartment = 0;  // isVersionOf PR:000007300 BTO:0004383
  species Vai_l in compartment = 0;  // isVersionOf PR:000007300 CHEBI:50967
  species X_f in compartment = 142.85;  // isVersionOf PR:000007294 BTO:0004383
  species X_l in compartment = 0;  // isVersionOf PR:000007294 CHEBI:50967
  species Xa_AT_f in compartment = 0;  // hasPart PR:000007294 PR:000003252 BTO:0004383
  species Xa_Va_II_l in compartment = 0;  // hasPart PR:000007299 PR:000007300 PR:000007294 CHEBI:50967
  species Xa_Va_l in compartment = 0;  // hasPart PR:000007300 PR:000007294 CHEBI:50967
  species Xa_Va_mIIa_l in compartment = 0;  // hasPart PR:000007299 PR:000007300 PR:000007294 CHEBI:50967
  species Xa_f in compartment = 0;  // isVersionOf PR:000007294 BTO:0004383
  species Xa_l in compartment = 0;  // isVersionOf PR:000007294 CHEBI:50967
  species alpha2M_IIa_l in compartment = 0;  // hasPart PR:000007299 PR:000024845 CHEBI:50967
  species alpha2M_Xa_l in compartment = 0;  // hasPart PR:000024845 PR:000007294 CHEBI:50967
  species alpha2M_l in compartment = 364;  // isVersionOf PR:000024845 CHEBI:50967
  species mIIa_AT_l in compartment = 0;  // hasPart PR:000007299 PR:000003252 CHEBI:50967
  species mIIa_f in compartment = 0;  // occursIn BTO:0004383 PR:000007299
  species mIIa_l in compartment = 0;  // isVersionOf PR:000007299 CHEBI:50967

  // Parameters:
  k1 = 0.5;
  k10 = 1.5;
  k11 = 0.05;
  k12 = 44.8;
  k13 = 15.2;
  k16 = 1;
  k17 = 1;
  k2 = 0.005;
  k21 = 0.1;
  k22 = 1;
  k23 = 0.043;
  k27 = 0.1;
  k28 = 6.94;
  k29 = 0.23;
  k3 = 0.005;
  k33 = 0.1;
  k34 = 100;
  k35 = 0.1;
  k36 = 66;
  k37 = 13;
  k38 = 15;
  k39 = 0.05;
  k4 = 0.005;
  k40 = 44.8;
  k41 = 15.2;
  k48 = 0.1;
  k49 = 1.6;
  k50 = 0.4;
  k51 = 0.016;
  k52 = 0.00033;
  k53 = 0.01;
  k54 = 0.0011;
  k56 = 2.3e-6;
  k57 = 6.83e-6;
  k58 = 0.1;
  k59 = 6.94;
  k60 = 1.035;
  k64 = 1;
  k65 = 0.5;
  k66 = 0.1;
  k67 = 6.4;
  k68 = 3.6;
  k69 = 6.83e-6;
  k70 = 0.1;
  k71 = 0.5;
  k75 = 1;
  k77 = 2.5e-6;
  k78 = 1.4e-6;
  k8 = 0.1;
  k9 = 32.5;
  koffAPC = 3.5;
  koffII = 1;
  koffPC = 11.5;
  koffPS = 0.2;
  koffV = 0.145;
  koffVII = 0.66;
  koffVIIa = 0.227;
  koffVa = 0.17;
  koffVai = 0.17;
  koffX = 1.9;
  koffXa = 3.3;
  koffmIIa = 0.475;
  konAPC = 0.05;
  konII = 0.0043;
  konPC = 0.05;
  konPS = 0.05;
  konV = 0.05;
  konVII = 0.05;
  konVIIa = 0.05;
  konVa = 0.057;
  konVai = 0.057;
  konX = 0.01;
  konXa = 0.029;
  konmIIa = 0.05;
  nva = 100;

  // Assignment rules:
  observable_task0_model0_bungay2_IIa_f := IIa_f;

  // Reactions:
  LB1: II_f + 100 LIPID => II_l; compartment*(konII*II_f*LIPID/nva - koffII*II_l); LB1 is "Factor II lipid binding";  // isVersionOf GO:0008289
  LB11: X_f + 100 LIPID => X_l; compartment*(konX*X_f*LIPID/nva - koffX*X_l); LB11 is "Factor X lipid binding";  // isVersionOf GO:0008289
  LB12: Xa_f + 100 LIPID => Xa_l; konXa*Xa_f*LIPID/nva - koffXa*Xa_l; LB12 is "Factor Xa lipid binding";  // isVersionOf GO:0008289
  LB13: APC_f + 100 LIPID => APC_l; compartment*(konAPC*APC_f*LIPID/nva - koffAPC*APC_l); LB13 is "APC lipid binding";  // isVersionOf GO:0008289
  LB14: PS_f + 100 LIPID => PS_l; compartment*(konPS*PS_f*LIPID/nva - koffPS*PS_l); LB14 is "PS lipid binding";  // isVersionOf GO:0008289
  LB16: Vai_f + 100 LIPID => Vai_l; compartment*(konVai*Vai_f*LIPID/nva - koffVai*Vai_l); LB16 is "Factor Vai lipid binding";  // isVersionOf GO:0008289
  LB17: PC_f + 100 LIPID => PC_l; compartment*(konPC*PC_f*LIPID/nva - koffPC*PC_l); LB17 is "PC lipid binding";  // isVersionOf GO:0008289
  LB2: mIIa_f + 100 LIPID => mIIa_l; compartment*(konmIIa*mIIa_f*LIPID/nva - koffmIIa*mIIa_l); LB2 is "Factor mIIa lipid binding";  // isVersionOf GO:0008289
  LB3: V_f + 100 LIPID => V_l; compartment*(konV*V_f*LIPID/nva - koffV*V_l); LB3 is "Factor V lipid binding";  // isVersionOf GO:0008289
  LB4: Va_f + 100 LIPID => Va_l; compartment*(konVa*Va_f*LIPID/nva - koffVa*Va_l); LB4 is "Factor Va lipid binding";  // isVersionOf GO:0008289
  LB5: VII_f + 100 LIPID => VII_l; compartment*(konVII*VII_f*LIPID/nva - koffVII*VII_l); LB5 is "Factor VII lipid binding";  // isVersionOf GO:0008289
  LB6: VIIa_f + 100 LIPID => VIIa_l; compartment*(konVIIa*VIIa_f*LIPID/nva - koffVIIa*VIIa_l); LB6 is "Factor VIIa lipid binding";  // isVersionOf GO:0008289
  TF_VIIa_binding: VIIa_l + TF_l => TF_VIIa_l; compartment*(k1*TF_l*VIIa_l - k2*TF_VIIa_l);
  R11: IIa_f + V_l => V_IIa_l; compartment*(k27*V_l*IIa_f - k28*V_IIa_l);
  R11b: V_IIa_l => IIa_f + Va_l; compartment*k29*V_IIa_l;
  R13: II_l + Xa_Va_l => Xa_Va_II_l; compartment*(k33*Xa_Va_l*II_l - k34*Xa_Va_II_l);
  R14: mIIa_l + Xa_Va_l => Xa_Va_mIIa_l; compartment*(k35*Xa_Va_l*mIIa_l - k36*Xa_Va_mIIa_l);
  R15: Xa_Va_II_l => Xa_Va_mIIa_l; compartment*k37*Xa_Va_II_l;
  R15b: Xa_Va_mIIa_l => IIa_f + Xa_Va_l + 100 LIPID; compartment*k38*Xa_Va_mIIa_l;
  R16: Xa_l + VII_l => VII_Xa_l; compartment*(k39*VII_l*Xa_l - k40*VII_Xa_l);
  R16b: VII_Xa_l => Xa_l + VIIa_l; compartment*k41*VII_Xa_l;
  R19: Va_l + APC_PS_l => APC_PS_Va_l; compartment*(k48*APC_PS_l*Va_l - k49*APC_PS_Va_l);
  R19b: APC_PS_Va_l => Vai_l + APC_PS_l; compartment*k50*APC_PS_Va_l;
  TF_VII_binding: VII_l + TF_l => TF_VII_l; compartment*(k3*TF_l*VII_l - k4*TF_VII_l);
  R20: Xa_f + TFPI_f => TFPI_Xa_l; compartment*(k51*TFPI_f*Xa_f - k52*TFPI_Xa_l);
  R21: TF_VIIa_l + TFPI_Xa_l => TFPI_Xa_TF_VIIa_l; compartment*(k53*TFPI_Xa_l*TF_VIIa_l - k54*TFPI_Xa_TF_VIIa_l);
  R23: AT_f + Xa_f => Xa_AT_f; compartment*k56*Xa_f*AT_f;
  R24: AT_f + IIa_f => IIa_AT_f; compartment*k57*IIa_f*AT_f;
  R25: mIIa_l + V_l => V_mIIa_l; compartment*(k58*V_l*mIIa_l - k59*V_mIIa_l);
  R25b: V_mIIa_l => mIIa_l + Va_l; compartment*k60*V_mIIa_l;
  R27: TM_l + IIa_f => IIa_TM_l; compartment*(k64*IIa_f*TM_l - k65*IIa_TM_l);
  R28: PC_l + IIa_TM_l => IIa_TM_PC_l; compartment*(k66*IIa_TM_l*PC_l - k67*IIa_TM_PC_l);
  R28b: IIa_TM_PC_l => APC_l + IIa_TM_l; compartment*k68*IIa_TM_PC_l;
  R29: AT_f + mIIa_f => mIIa_AT_l; compartment*k69*mIIa_f*AT_f;
  R30: PS_l + APC_l => APC_PS_l; compartment*(k70*APC_l*PS_l - k71*APC_PS_l);
  R33: alpha2M_l + IIa_f => alpha2M_IIa_l; compartment*k77*alpha2M_l*IIa_f;
  R34: alpha2M_l + Xa_f => alpha2M_Xa_l; compartment*k78*alpha2M_l*Xa_f;
  X_TF_VIIa_complex_formation: X_l + TF_VIIa_l => TF_VIIa_X_l; compartment*(k8*TF_VIIa_l*X_l - k9*TF_VIIa_X_l);
  R4b: TF_VIIa_X_l => TF_VIIa_Xa_l; compartment*k10*TF_VIIa_X_l; R4b is "Factor X activation";
  R4c: TF_VIIa_Xa_l => Xa_l + TF_VIIa_l; compartment*k75*TF_VIIa_Xa_l; R4c is "Factor Xa release";
  Xa_TF_VII_binding: Xa_l + TF_VII_l => TF_VII_Xa_l; compartment*(k11*TF_VII_l*Xa_l - k12*TF_VII_Xa_l);
  R5b: TF_VII_Xa_l => Xa_l + TF_VIIa_l; compartment*k13*TF_VII_Xa_l; R5b is "TF_VII activation";
  Va_Xa_binding: Va_l + Xa_l => Xa_Va_l; compartment*(k16*Xa_l*Va_l - k17*Xa_Va_l);
  V_Xa_binding: Xa_l + V_l => V_Xa_l; compartment*(k21*V_l*Xa_l - k22*V_Xa_l);
  R9b: V_Xa_l => Xa_l + Va_l; compartment*k23*V_Xa_l; R9b is "Factor V activation";

  // Unit definitions:
  unit nano_mole = 1e-9 mole;
end
