// SBML level 2 version 1

model chassagnole2()

  // Compartments:
  compartment cytosol = 1;  // GO:0005829
  compartment extracellular = 1;  // GO:0005576

  // Species:
  species cdhap in cytosol = 0.167; cdhap is "Dihydroxyacetonephosphate";  // CHEBI:16108 kegg.compound:C00111
  species ce4p in cytosol = 0.098; ce4p is "Erythrose-4-phosphate";  // CHEBI:48153 kegg.compound:C00279
  species cf6p in cytosol = 0.6; cf6p is "Fructose-6-Phosphate";  // kegg.compound:C05345 CHEBI:16084 kegg.compound:C00085 CHEBI:15946
  species cfdp in cytosol = 0.272; cfdp is "Fructose-1,6-bisphosphate";  // CHEBI:16905 kegg.compound:C00354
  species cg1p in cytosol = 0.653; cg1p is "Glucose-1-Phosphate";  // CHEBI:16077 kegg.compound:C00103
  species cg6p in cytosol = 3.48; cg6p is "Glucose-6-Phosphate";  // CHEBI:17665 kegg.compound:C00668
  species cgap in cytosol = 0.218; cgap is "Glyceraldehyde-3-Phosphate";  // CHEBI:17138 kegg.compound:C00661
  species cglcex in extracellular = 2; cglcex is "Extracellular Glucose";  // CHEBI:4167 kegg.compound:C00031 CHEBI:17234 kegg.compound:C00293
  species cpep in cytosol = 2.67; cpep is "Phosphoenol pyruvate";  // CHEBI:18021 kegg.compound:C00074
  species cpg in cytosol = 0.808; cpg is "6-Phosphogluconate";  // CHEBI:16863 kegg.compound:C00345
  species cpg2 in cytosol = 0.399; cpg2 is "2-Phosphoglycerate";  // CHEBI:17835 kegg.compound:C00631
  species cpg3 in cytosol = 2.13; cpg3 is "3-Phosphoglycerate";  // CHEBI:17794 kegg.compound:C00197
  species cpgp in cytosol = 0.008; cpgp is "1,3-diphosphosphoglycerate";  // CHEBI:16001 kegg.compound:C00236
  species cpyr in cytosol = 2.67; cpyr is "Pyruvate";  // CHEBI:15361 kegg.compound:C00022
  species crib5p in cytosol = 0.398; crib5p is "Ribose-5-phosphate";  // CHEBI:17797 kegg.compound:C00117
  species cribu5p in cytosol = 0.111; cribu5p is "Ribulose-5-phosphate";  // CHEBI:17363 kegg.compound:C00199
  species csed7p in cytosol = 0.276; csed7p is "sedoheptulose-7-phosphate";  // CHEBI:15721 kegg.compound:C00281
  species cxyl5p in cytosol = 0.138; cxyl5p is "Xylulose-5-phosphate";  // CHEBI:16332 kegg.compound:C00231

  // Assignment rules:
  cnad := 1.314 + 1.314*2.73^(-0.0435*t - 0.342) - (t + 7.871)*(2.73^(-0.0218*t - 0.171)/(8.481 + t));
  cnadh := 0.0934 + 0.00111*2.371^(-0.123*t)*(0.844*t + 0.104*t^3);
  cnadp := 0.159 - 0.00554*(t/(2.8 - 0.271*t + 0.01*t^2)) + 0.182/(4.82 + 0.526*t);
  cnadph := 0.062 + 0.332*2.718^(-0.464*t)*(0.0166*t^1.58 + 0.000166*t^4.73 + 0.1312*10^(-9)*t^7.89 + 0.1362*10^(-12)*t^11 + 0.1233*10^(-15)*t^14.2);
  camp := 0.123 + 7.25*(t/(7.25 + 1.47*t + 0.17*t^2)) + 1.073/(1.29 + 8.05*t);
  cadp := 0.582 + 1.73*2.731^(-0.15*t)*(0.12*t + 0.000214*t^3);
  catp := 4.27 - 4.163*(t/(0.657 + 1.43*t + 0.0364*t^2));
  observable_task0_model0_chassagnole2_cnadh := task0_model0_chassagnole2_cnadh;
  observable_task0_model0_chassagnole2_cnad := task0_model0_chassagnole2_cnad;
  observable_task0_model0_chassagnole2_cnadph := task0_model0_chassagnole2_cnadph;
  observable_task0_model0_chassagnole2_cnadp := task0_model0_chassagnole2_cnadp;
  observable_task0_model0_chassagnole2_camp := task0_model0_chassagnole2_camp;
  observable_task0_model0_chassagnole2_cadp := task0_model0_chassagnole2_cadp;
  observable_task0_model0_chassagnole2_catp := task0_model0_chassagnole2_catp;

  // Reactions:
  vALDO: cfdp -> cdhap + cgap; cytosol*rmaxALDO*(cfdp - cgap*cdhap/kALDOeq)/(kALDOfdp + cfdp + kALDOgap*cdhap/(kALDOeq*VALDOblf) + kALDOdhap*cgap/(kALDOeq*VALDOblf) + cfdp*cgap/kALDOgapinh + cgap*cdhap/(VALDOblf*kALDOeq)); vALDO is "Aldolase";  // isHomologTo reactome:REACT_1602 kegg.reaction:R01070 ec-code:4.1.2.13
    rmaxALDO = 17.41464 mM_per_second; kALDOeq = 0.144; kALDOfdp = 1.75; kALDOgap = 0.088; VALDOblf = 2 dimensionless; kALDOdhap = 0.088; kALDOgapinh = 0.6;
  vDAHPS: ce4p + cpep -> ; cytosol*rmaxDAHPS*ce4p^nDAHPSe4p*cpep^nDAHPSpep/((KDAHPSe4p + ce4p^nDAHPSe4p)*(KDAHPSpep + cpep^nDAHPSpep)); vDAHPS is "DAHP synthesis";  // kegg.reaction:R01826 ec-code:2.5.1.54
    rmaxDAHPS = 0.1079531 mM_per_second; nDAHPSe4p = 2.6 dimensionless; nDAHPSpep = 2.2 dimensionless; KDAHPSe4p = 0.035; KDAHPSpep = 0.0053;
  vDHAP: cdhap -> ; cytosol*vDHAP_mu*cdhap; vDHAP is "DHAP degradation";  // isVersionOf GO:0044275
    vDHAP_mu = 2.78e-5 second_inverse;
  vE4P: ce4p -> ; cytosol*vE4P_mu*ce4p; vE4P is "E4P dilution";
    vE4P_mu = 2.78e-5 second_inverse;
  vENO: cpg2 -> cpep; cytosol*rmaxENO*(cpg2 - cpep/KENOeq)/(KENOpg2*(1 + cpep/KENOpep) + cpg2); vENO is "Enolase";  // isHomologTo reactome:REACT_1400 kegg.reaction:R00658 ec-code:4.2.1.11
    rmaxENO = 330.4476 mM_per_second; KENOeq = 6.73; KENOpg2 = 0.1; KENOpep = 0.135;
  vEXTER: -> cglcex; extracellular*Dil*(cfeed - cglcex); vEXTER is "Extracellular glucose kinetics";
    Dil = 2.78e-5 second_inverse; cfeed = 110.96;
  vG1PAT: cg1p -> ; cytosol*rmaxG1PAT*cg1p*catp*(1 + (cfdp/KG1PATfdp)^nG1PATfdp)/((KG1PATatp + catp)*(KG1PATg1p + cg1p)); vG1PAT is "Glucose-1-phosphate adenyltransferase";  // modifiers: cfdp; kegg.reaction:R00948 ec-code:2.7.7.27
    rmaxG1PAT = 0.007525458 mM_per_second; KG1PATfdp = 0.119; nG1PATfdp = 1.2; KG1PATatp = 4.42; KG1PATg1p = 3.2;
  vG3PDH: cdhap -> ; cytosol*rmaxG3PDH*cdhap/(KG3PDHdhap + cdhap); vG3PDH is "Glycerol-3-phosphate dehydrogenase";  // isHomologTo reactome:REACT_16938 kegg.reaction:R00842 ec-code:1.1.1.8
    rmaxG3PDH = 0.01162043 mM_per_second; KG3PDHdhap = 1;
  vG6P: cg6p -> ; cytosol*vG6P_mu*cg6p; vG6P is "G6P degradation";  // isVersionOf GO:0044275
    vG6P_mu = 2.78e-5 second_inverse;
  vG6PDH: cg6p -> cpg; cytosol*rmaxG6PDH*cg6p*cnadp/((cg6p + KG6PDHg6p)*(1 + cnadph/KG6PDHnadphg6pinh)*(KG6PDHnadp*(1 + cnadph/KG6PDHnadphnadpinh) + cnadp)); vG6PDH is "Glucose-6-phosphate dehydrogenase";  // hasPart kegg.reaction:R00835 kegg.reaction:R02035 ec-code:1.1.1.49 ec-code:3.1.1.31
    rmaxG6PDH = 1.380197 mM_per_second; KG6PDHg6p = 14.4; KG6PDHnadphg6pinh = 6.43; KG6PDHnadp = 0.0246; KG6PDHnadphnadpinh = 0.01;
  vGAP: cgap -> ; cytosol*vGAP_mu*cgap; vGAP is "GAP degradation";  // isVersionOf GO:0019683
    vGAP_mu = 2.78e-5 second_inverse;
  vGAPDH: cgap -> cpgp; cytosol*rmaxGAPDH*(cgap*cnad - cpgp*cnadh/KGAPDHeq)/((KGAPDHgap*(1 + cpgp/KGAPDHpgp) + cgap)*(KGAPDHnad*(1 + cnadh/KGAPDHnadh) + cnad)); vGAPDH is "Glyceraldehyde-3-phosphate dehydrogenase";  // isHomologTo reactome:REACT_1847 kegg.reaction:R01061 ec-code:1.2.1.12
    rmaxGAPDH = 921.5943 mM_per_second; KGAPDHeq = 0.63 dimensionless; KGAPDHgap = 0.683; KGAPDHpgp = 1.04e-5; KGAPDHnad = 0.252; KGAPDHnadh = 1.09;
  vGLP: cg1p -> ; cytosol*vGLP_mu*cg1p; vGLP is "GLP dilution";
    vGLP_mu = 2.78e-5 second_inverse;
  vMURSyNTH: 2 cf6p -> ; cytosol*rmaxMurSynth; vMURSyNTH is "Mureine synthesis";  // isVersionOf GO:0006002
    rmaxMurSynth = 0.00043711 mM_per_second;
  vMethSynth: -> cpyr; cytosol*rmaxMetSynth; vMethSynth is "Methionine synthesis";  // isVersionOf GO:0042866
    rmaxMetSynth = 0.0022627 mM_per_second;
  vPDH: cpyr -> ; cytosol*rmaxPDH*cpyr^nPDH/(KPDHpyr + cpyr^nPDH); vPDH is "Pyruvate dehydrogenase";  // isVersionOf ec-code:1.2.1.51 kegg.reaction:R00209 kegg.pathway:rn00620
    rmaxPDH = 6.059531 mM_per_second; nPDH = 3.68 dimensionless; KPDHpyr = 1159;
  vPEP: cpep -> ; cytosol*vPEP_mu*cpep; vPEP is "PEP degradation";  // isVersionOf GO:0046395
    vPEP_mu = 2.78e-5 second_inverse;
  vPFK: cf6p -> cfdp; cytosol*rmaxPFK*catp*cf6p/((catp + KPFKatps*(1 + cadp/KPFKadpc))*(cf6p + KPFKf6ps*(1 + cpep/KPFKpep + cadp/KPFKadpb + camp/KPFKampb)/(1 + cadp/KPFKadpa + camp/KPFKampa))*(1 + LPFK/(1 + cf6p*(1 + cadp/KPFKadpa + camp/KPFKampa)/(KPFKf6ps*(1 + cpep/KPFKpep + cadp/KPFKadpb + camp/KPFKampb)))^nPFK)); vPFK is "Phosphofructokinase";  // modifiers: cpep; isHomologTo reactome:REACT_736 kegg.reaction:R00756 ec-code:2.7.1.11
    rmaxPFK = 1840.585 mM_per_second; KPFKatps = 0.123; KPFKadpc = 4.14; KPFKf6ps = 0.325; KPFKpep = 3.26; KPFKadpb = 3.89; KPFKampb = 3.2; KPFKadpa = 128; KPFKampa = 19.1; LPFK = 5629067 dimensionless; nPFK = 11.1 dimensionless;
  vPG: cpg -> ; cytosol*vPG_mu*cpg; vPG is "PG dilution";
    vPG_mu = 2.78e-5 second_inverse;
  vPG3: cpg3 -> ; cytosol*vPG3_mu*cpg3; vPG3 is "PG3 degradation";  // isVersionOf GO:0044275
    vPG3_mu = 2.78e-5 second_inverse;
  vPGDH: cpg -> cribu5p; cytosol*rmaxPGDH*cpg*cnadp/((cpg + KPGDHpg)*(cnadp + KPGDHnadp*(1 + cnadph/KPGDHnadphinh)*(1 + catp/KPGDHatpinh))); vPGDH is "6-Phosphogluconate dehydrogenase";  // isVersionOf ec-code:1.1.1.44 kegg.reaction:R01528 reactome:REACT_611
    rmaxPGDH = 16.23236 mM_per_second; KPGDHpg = 37.5; KPGDHnadp = 0.0506; KPGDHnadphinh = 0.0138; KPGDHatpinh = 208;
  vPGI: cg6p -> cf6p; cytosol*rmaxPGI*(cg6p - cf6p/KPGIeq)/(KPGIg6p*(1 + cf6p/(KPGIf6p*(1 + cpg/KPGIf6ppginh)) + cpg/KPGIg6ppginh) + cg6p); vPGI is "Glucose-6-phosphate isomerase";  // modifiers: cpg; isHomologTo reactome:REACT_1255 kegg.reaction:R00771 ec-code:5.3.1.9 GO:0004347
    rmaxPGI = 650.9879 mM_per_second; KPGIeq = 0.1725 dimensionless; KPGIg6p = 2.9; KPGIf6p = 0.266; KPGIf6ppginh = 0.2; KPGIg6ppginh = 0.2;
  vPGK: cpgp -> cpg3; cytosol*rmaxPGK*(cadp*cpgp - catp*cpg3/KPGKeq)/((KPGKadp*(1 + catp/KPGKatp) + cadp)*(KPGKpgp*(1 + cpg3/KPGKpg3) + cpgp)); vPGK is "Phosphoglycerate kinase";  // isHomologTo reactome:REACT_1186 kegg.reaction:R01512 ec-code:2.7.2.3
    rmaxPGK = 3021.774 mM_per_second; KPGKeq = 1934.4 dimensionless; KPGKadp = 0.185; KPGKatp = 0.653; KPGKpgp = 0.0468; KPGKpg3 = 0.473;
  vPGM: cg6p -> cg1p; cytosol*rmaxPGM*(cg6p - cg1p/KPGMeq)/(KPGMg6p*(1 + cg1p/KPGMg1p) + cg6p); vPGM is "Phosphoglucomutase";  // isHomologTo reactome:REACT_605 kegg.reaction:R00959 ec-code:5.4.2.2
    rmaxPGM = 0.8398243 mM_per_second; KPGMeq = 0.196 dimensionless; KPGMg6p = 1.038; KPGMg1p = 0.0136;
  vPGP: cpgp -> ; cytosol*vPGP_mu*cpgp; vPGP is "PGP degradation";  // isVersionOf GO:0044275
    vPGP_mu = 2.78e-5 second_inverse;
  vPK: cpep -> cpyr; cytosol*rmaxPK*cpep*(cpep/KPKpep + 1)^(nPK - 1)*cadp/(KPKpep*(LPK*((1 + catp/KPKatp)/(cfdp/KPKfdp + camp/KPKamp + 1))^nPK + (cpep/KPKpep + 1)^nPK)*(cadp + KPKadp)); vPK is "Pyruvate kinase";  // modifiers: cfdp; isHomologTo reactome:REACT_1524 kegg.reaction:R00200 ec-code:2.7.1.40
    rmaxPK = 0.0611315 mM_per_second; KPKpep = 0.31; nPK = 4 dimensionless; LPK = 1000 dimensionless; KPKatp = 22.5; KPKfdp = 0.19; KPKamp = 0.2; KPKadp = 0.26;
  vPPK: crib5p -> ; cytosol*rmaxRPPK*crib5p/(KRPPKrib5p + crib5p); vPPK is "Ribose phosphate pyrophosphokinase";  // kegg.reaction:R01049 ec-code:2.7.6.1 reactome:REACT_2023
    rmaxRPPK = 0.01290045 mM_per_second; KRPPKrib5p = 0.1;
  vPTS: cglcex + 65 cpep -> 65 cg6p + 65 cpyr; extracellular*rmaxPTS*cglcex*(cpep/cpyr)/((KPTSa1 + KPTSa2*(cpep/cpyr) + KPTSa3*cglcex + cglcex*(cpep/cpyr))*(1 + cg6p^nPTSg6p/KPTSg6p)); vPTS is "Phosphotransferase system";  // kegg.pathway:eco02060
    rmaxPTS = 7829.78 mM_per_second; KPTSa1 = 3082.3; KPTSa2 = 0.01; KPTSa3 = 245.3 dimensionless; nPTSg6p = 3.66 dimensionless; KPTSg6p = 2.15;
  vR5PI: cribu5p -> crib5p; cytosol*rmaxR5PI*(cribu5p - crib5p/KR5PIeq); vR5PI is "Ribose-phosphate isomerase";  // isVersionOf ec-code:5.3.1.6 kegg.reaction:R01056 reactome:REACT_6907
    rmaxR5PI = 4.83841193 second_inverse; KR5PIeq = 4 dimensionless;
  vRIB5P: crib5p -> ; cytosol*vRIB5P_mu*crib5p; vRIB5P is "Rib5P dilution";
    vRIB5P_mu = 2.78e-5 second_inverse;
  vRibu5p: cribu5p -> ; cytosol*vRibu5p_mu*cribu5p; vRibu5p is "Ribu5P dilution";
    vRibu5p_mu = 2.78e-5 second_inverse;
  vRu5P: cribu5p -> cxyl5p; cytosol*rmaxRu5P*(cribu5p - cxyl5p/KRu5Peq); vRu5P is "Ribulose-phosphate epimerase";  // kegg.reaction:R01529 ec-code:5.1.3.1 reactome:REACT_1522
    rmaxRu5P = 6.739029 second_inverse; KRu5Peq = 1.4 dimensionless;
  vSED7P: csed7p -> ; cytosol*vSED7P_mu*csed7p; vSED7P is "SED7P dilution";
    vSED7P_mu = 2.78e-5 second_inverse;
  vSynth1: cpep -> ; cytosol*rmaxSynth1*cpep/(KSynth1pep + cpep); vSynth1 is "Synthesis 1";  // isVersionOf GO:0009423
    rmaxSynth1 = 0.01953897 mM_per_second; KSynth1pep = 1;
  vSynth2: cpyr -> ; cytosol*rmaxSynth2*cpyr/(KSynth2pyr + cpyr); vSynth2 is "Synthesis 2";  // hasPart GO:0006523 GO:0009097 GO:0019877
    rmaxSynth2 = 0.07361855 mM_per_second; KSynth2pyr = 1;
  vTA: cgap + csed7p -> cf6p + ce4p; cytosol*rmaxTA*(cgap*csed7p - ce4p*cf6p/KTAeq); vTA is "Transaldolase";  // isHomologTo reactome:REACT_1272 kegg.reaction:R01827 ec-code:2.2.1.2
    rmaxTA = 10.87164 per_mM_per_second; KTAeq = 1.05 dimensionless;
  vTIS: cdhap -> cgap; cytosol*rmaxTIS*(cdhap - cgap/kTISeq)/(kTISdhap*(1 + cgap/kTISgap) + cdhap); vTIS is "Triosephosphate isomerase";  // isHomologTo reactome:REACT_469 kegg.reaction:R01015 ec-code:5.3.1.1
    rmaxTIS = 68.67474 mM_per_second; kTISeq = 1.39 dimensionless; kTISdhap = 2.8; kTISgap = 0.3;
  vTKA: crib5p + cxyl5p -> cgap + csed7p; cytosol*rmaxTKa*(crib5p*cxyl5p - csed7p*cgap/KTKaeq); vTKA is "Transketolase a";  // isHomologTo reactome:REACT_162 kegg.reaction:R01641 ec-code:2.2.1.1
    rmaxTKa = 9.473385 per_mM_per_second; KTKaeq = 1.2 dimensionless;
  vTKB: ce4p + cxyl5p -> cgap + cf6p; cytosol*rmaxTKb*(cxyl5p*ce4p - cf6p*cgap/KTKbeq); vTKB is "Transketolase b";  // isHomologTo reactome:REACT_1811 kegg.reaction:R01067 ec-code:2.2.1.1
    rmaxTKb = 86.55856 per_mM_per_second; KTKbeq = 10 dimensionless;
  vTRPSYNTH: -> cpyr + cgap; cytosol*rmaxTrpSynth; vTRPSYNTH is "Tryptophan synthesis";  // isVersionOf GO:0000162
    rmaxTrpSynth = 0.001037 mM_per_second;
  vXYL5P: cxyl5p -> ; cytosol*vXYL5P_mu*cxyl5p; vXYL5P is "XYL5P dilution";
    vXYL5P_mu = 2.78e-5 second_inverse;
  vf6P: cf6p -> ; cytosol*vf6P_mu*cf6p; vf6P is "F6P degradation";  // isVersionOf GO:0044275
    vf6P_mu = 2.78e-5 second_inverse;
  vfdP: cfdp -> ; cytosol*vfdP_mu*cfdp; vfdP is "FDP degradation";  // isVersionOf GO:0044275
    vfdP_mu = 2.78e-5 second_inverse;
  vpepCxylase: cpep -> ; cytosol*rmaxpepCxylase*cpep*(1 + (cfdp/KpepCxylasefdp)^npepCxylasefdp)/(KpepCxylasepep + cpep); vpepCxylase is "PEP carboxylase";  // modifiers: cfdp; kegg.reaction:R00345 ec-code:4.1.1.31
    rmaxpepCxylase = 0.1070206 mM_per_second; KpepCxylasefdp = 0.7; npepCxylasefdp = 4.21 dimensionless; KpepCxylasepep = 4.07;
  vpg2: cpg2 -> ; cytosol*vpg2_mu*cpg2; vpg2 is "PG2 degradation";  // isVersionOf GO:0044275
    vpg2_mu = 2.78e-5 second_inverse;
  vpyr: cpyr -> ; cytosol*vpyr_mu*cpyr; vpyr is "Pyruvate dilution";
    vpyr_mu = 2.78e-5 second_inverse;
  vrpGluMu: cpg3 -> cpg2; cytosol*rmaxPGluMu*(cpg3 - cpg2/KPGluMueq)/(KPGluMupg3*(1 + cpg2/KPGluMupg2) + cpg3); vrpGluMu is "Phosphoglycerate mutase";  // isHomologTo reactome:REACT_576 kegg.reaction:R01518 ec-code:5.4.2.1
    rmaxPGluMu = 89.04965 mM_per_second; KPGluMueq = 0.188 dimensionless; KPGluMupg3 = 0.2; KPGluMupg2 = 0.369;
  vsersynth: cpg3 -> ; cytosol*rmaxSerSynth*cpg3/(KSerSynthpg3 + cpg3); vsersynth is "Serine synthesis";  // isVersionOf GO:0009070
    rmaxSerSynth = 0.025712107 mM_per_second; KSerSynthpg3 = 1;

  // Unit definitions:
  unit millimole = 1e-3 mole;
  unit milli_Molar = 1e-3 mole / litre;
  unit second_inverse = 1 / second;
  unit mM_per_second = 1e-3 mole / (litre * second);
  unit per_mM_per_second = litre / (1e-3 mole * second);
end
