// SBML level 2 version 3

function hydrolysis(kh, R)
  kh*R;
end

function hill_act(r, ke, R, h, kg)
  r*ke*R^h/(kg + R^h);
end
hill_act is "Hills activation";

function extraction(kminus1, r)
  kminus1*r;
end

function sig_act_t(r, ke, t, kg, R, kf)
  r*(ke*t/(100 + t))/(1 + exp((kg - R)*kf));
end
sig_act_t is "Sigmoid Activation 3 (t)";

function sig_act(ke, r, kg, R, kf)
  ke*r/(1 + exp((kg - R)*kf));
end
sig_act is "Sigmoid Activation";

model delcontezerail1()

  // Compartments:
  compartment endosome = 1; endosome is "endosomal membrane";  // GO:0010008

  // Species:
  species Rab5_GTP in endosome = 0.001; Rab5_GTP is "Rab5-GTP";  // hasPart CHEBI:15996 uniprot:P20339 GO:0031225
  species Rab7_GTP in endosome = 0.001; Rab7_GTP is "Rab7-GTP";  // hasPart CHEBI:15996 uniprot:P51149 GO:0031225
  species Rab5_GDP in endosome = 1; Rab5_GDP is "Rab5-GDP";  // hasPart CHEBI:17552 uniprot:P20339 GO:0031225
  species Rab7_GDP in endosome = 1; Rab7_GDP is "Rab7-GDP";  // hasPart CHEBI:17552 uniprot:P51149 GO:0031225

  // Assignment rules:
  observable_task0_model0_delcontezerail1_R5 := Rab5_GTP;
  observable_task0_model0_delcontezerail1_R7 := Rab7_GTP;

  // Reactions:
  recruitment_of_Rab5: => Rab5_GDP; endosome*recruitment_of_Rab5_K1;  // isVersionOf GO:0045184
    recruitment_of_Rab5_K1 = 1;
  activation_of_Rab5_time: Rab5_GDP => Rab5_GTP; endosome*sig_act_t(Rab5_GDP, activation_of_Rab5_time_ke, time, activation_of_Rab5_time_kg, Rab5_GTP, activation_of_Rab5_time_kf); activation_of_Rab5_time is "activation of Rab5 (time)";  // isVersionOf GO:0032858
    activation_of_Rab5_time_ke = 0.3; activation_of_Rab5_time_kg = 0.1 M; activation_of_Rab5_time_kf = 2.5;
  extraction_of_Rab5: Rab5_GDP => ; endosome*extraction(extraction_of_Rab5_kminus1, Rab5_GDP);
    extraction_of_Rab5_kminus1 = 1;
  recruitment_of_Rab7: => Rab7_GDP; endosome*recruitment_of_Rab7_K1;  // isVersionOf GO:0045184
    recruitment_of_Rab7_K1 = 0.483;
  activation_of_Rab7_by_GEF7: Rab7_GDP => Rab7_GTP; endosome*hill_act(Rab7_GDP, activation_of_Rab7_by_GEF7_ke, Rab7_GTP, h, activation_of_Rab7_by_GEF7_kg);  // isVersionOf GO:0017112 GO:0032858
    activation_of_Rab7_by_GEF7_ke = 0.21; h = 3 dimensionless; activation_of_Rab7_by_GEF7_kg = 0.1;
  activation_of_Rab7_by_GEF5: Rab7_GDP => Rab7_GTP; endosome*sig_act(activation_of_Rab7_by_GEF5_ke, Rab7_GDP, activation_of_Rab7_by_GEF5_kg, Rab5_GTP, activation_of_Rab7_by_GEF5_kf);  // modifiers: Rab5_GTP; isVersionOf GO:0032858 GO:0017112
    activation_of_Rab7_by_GEF5_ke = 0.021; activation_of_Rab7_by_GEF5_kg = 1 M; activation_of_Rab7_by_GEF5_kf = 3;
  hydrolysis_of_Rab5_by_Rab7: Rab5_GTP => Rab5_GDP; endosome*sig_act(hydrolysis_of_Rab5_by_Rab7_ke, Rab5_GTP, hydrolysis_of_Rab5_by_Rab7_kg, Rab7_GTP, hydrolysis_of_Rab5_by_Rab7_kf);  // modifiers: Rab7_GTP; isVersionOf GO:0003924 GO:0005097
    hydrolysis_of_Rab5_by_Rab7_ke = 0.31; hydrolysis_of_Rab5_by_Rab7_kg = 0.3 M; hydrolysis_of_Rab5_by_Rab7_kf = 3;
  extraction_of_rab7: Rab7_GDP => ; endosome*extraction(extraction_of_rab7_kminus1, Rab7_GDP);
    extraction_of_rab7_kminus1 = 0.483;
  hydrolysis_of_Rab5_intr: Rab5_GTP => Rab5_GDP; endosome*hydrolysis(hydrolysis_of_Rab5_intr_kh, Rab5_GTP); hydrolysis_of_Rab5_intr is "hydrolysis of Rab5 (intr.)";  // isVersionOf GO:0003924
    hydrolysis_of_Rab5_intr_kh = 0.06;
  hydrolysis_of_Rab7_intr: Rab7_GTP => Rab7_GDP; endosome*hydrolysis(hydrolysis_of_Rab7_intr_kh, Rab7_GTP); hydrolysis_of_Rab7_intr is "hydrolysis of Rab7 (intr.)";  // isVersionOf GO:0003924
    hydrolysis_of_Rab7_intr_kh = 0.15;

  // Unit definitions:
  unit sec = second;
  unit M = mole / litre;
  unit persec = 1 / second;
  unit Mpers = mole / (second * litre);
  unit lpermole = litre / mole;
end
