// SBML level 2 version 1

model dupont2()

  // Compartments:
  compartment cytosol = 1;  // GO:0005829
  compartment store = 1;  // GO:0005783

  // Species:
  species W_star in cytosol = 0; W_star is "Phosphorylated protein";
  species Wt in cytosol = 1; Wt is "Total Protein";
  species Y in store = 1.6;  // CHEBI:29108 kegg.compound:C00076
  species Z in cytosol = 0.15;  // CHEBI:29108 kegg.compound:C00076

  // Parameters:
  K1 = 0.01;
  K2 = 0.01;
  K_A = 0.9;
  Ka = 2.5;
  Kp = 1;
  Kr = 2;
  Vm2 = 65;
  Vm3 = 500;
  k = 10;
  kf = 1;
  m = 2;
  n = 2;
  p = 4;
  q = 1;
  v0 = 1;
  v1_beta = 2.7;
  vMK = 20;
  vp = 2.5;

  // Assignment rules:
  vk := vMK*Z^q/(Ka^q + Z^q);
  observable_task1_model1_dupont2_W_star := W_star;
  observable_task0_model0_dupont2_Z := Z;
  observable_task2_model2_dupont2_W_star := W_star;

  // Reactions:
  Protein_Phosphorylation: -> W_star; cytosol*(vp/Wt)*(vk/vp*((1 - W_star)/(K1 + 1 - W_star)) - W_star/(K2 + W_star));  // modifiers: Wt; GO:0042327
  Calcium_influx: => Z; cytosol*v0;  // GO:0006816
  InsP3_dependent_Ca_influx: => Z; cytosol*v1_beta;  // GO:0005220
  R2: Z => Y; cytosol*(Vm2*Z^n/(Kp^n + Z^n)); R2 is "ATP driven pumping of Ca into store";  // GO:0032470
  ATP_driven_pumping_into_cytosol: Y => Z; store*(Vm3*Y^m*Z^p/((Kr^m + Y^m)*(K_A^p + Z^p)));  // GO:0048763 GO:0007204
  R_eff: Z => ; cytosol*k*Z; R_eff is "Ca efflux";  // GO:0006816
  Rf: Y => Z; store*kf*Y; Rf is "Calcium leak";  // GO:0006816

  // Unit definitions:
  unit micromole = 1e-6 mole;
  unit minutes = 60 second;
end
