// SBML level 3 version 1

model essunger1()
  // model units - substance: concentration_per_microlitre, time: day, volume: microlitre

  // Compartments:
  compartment default = 1;  // 0-D

  // Species:
  species Ta in default = 10;
  species Tastarstar in default = 0;
  species Tm in default = 540;
  species Tmstarstar in default = 0;
  species Ttot in default = 1000;
  species Tv in default = 450;
  species V in default = 5e-5;

  // Parameters:
  NN = 600;
  Tmax = 1500;
  ka = 0.00495;
  kb = 0.0055;
  ki = 0.0007;
  muV = 0.75;
  mua = 0.02;
  muastarstar = 0.5;
  mum = 0.013;
  muv = 0.013;
  phi = 1;
  r = 1.5;
  rstar = 0;
  s = 8.076;

  // Assignment rules:
  observable_task0_model0_essunger1_V := V;
  observable_task0_model0_essunger1_Ttot := Ttot;
  observable_task0_model0_essunger1_Ta := Ta;
  observable_task0_model0_essunger1_Tv := Tv;
  observable_task0_model0_essunger1_Tm := Tm;
  observable_task0_model0_essunger1_Tmstarstar := Tmstarstar;
  observable_task0_model0_essunger1_Tastarstar := Tastarstar;

  // Reactions:
  CD4TproductionV: -> V; muastarstar*NN*Tastarstar; CD4TproductionV is "v20";  // modifiers: Tastarstar
  VinfectionCD4T: V + Ta -> Tastarstar; ki*Ta*V; VinfectionCD4T is "v8";
  activationCD4TrestingMemoryInfected: Tmstarstar -> Tastarstar; kb*Tmstarstar; activationCD4TrestingMemoryInfected is "v13";
  activationCD4TrestingMemoryPlain: Tm -> Ta; kb*Tm; activationCD4TrestingMemoryPlain is "v7";
  activationCD4TrestingNaivePlain: Tv -> Ta; ka*Tv; activationCD4TrestingNaivePlain is "v3";
  clearanceV: V -> ; muV*V; clearanceV is "v21";
  deathCD4TactiveInfected: Tastarstar + Ttot -> ; muastarstar*Tastarstar; deathCD4TactiveInfected is "v14";
  deathCD4TactivePlain: Ttot + Ta -> ; mua*Ta; deathCD4TactivePlain is "v4";
  deathCD4TrestingMemoryInfected: Tmstarstar + Ttot -> ; mum*Tmstarstar; deathCD4TrestingMemoryInfected is "v19";
  deathCD4TrestingMemoryPlain: Tm + Ttot -> ; mum*Tm; deathCD4TrestingMemoryPlain is "v11";
  deathCD4TrestingNaivePlain: Ttot + Tv -> ; muv*Tv; deathCD4TrestingNaivePlain is "v2";
  fractionVinfectionCD4T: Tastarstar -> Tmstarstar; ki*phi*Ta*V; fractionVinfectionCD4T is "v12";  // modifiers: Ta, V
  sourceCD4T: -> Tv + Ttot; s; sourceCD4T is "v1";
  v10: Ttot + Tm -> ; 2*r*Ta*Ttot/Tmax;  // modifiers: Ta
  v15: Ttot + Tastarstar -> ; rstar*Tastarstar;
  v16: -> Ttot + Tastarstar; rstar*Tastarstar*Ttot/Tmax;
  v17: -> Ttot + Tmstarstar; 2*rstar*Tastarstar;  // modifiers: Tastarstar
  v18: Ttot + Tmstarstar -> ; 2*rstar*Tastarstar*Ttot/Tmax;  // modifiers: Tastarstar
  v5: Ttot + Ta -> ; r*Ta;
  v6: -> Ttot + Ta; r*Ta*Ttot/Tmax;
  v9: -> Ttot + Tm; 2*r*Ta;  // modifiers: Ta

  // Unit definitions:
  unit concentration_per_microlitre = 1;
  unit day = 1;
  unit microlitre = 1;
end
