// SBML level 2 version 1

model fung1()

  // Compartments:
  compartment compartment = 1; compartment is "Intracellular";  // GO:0005622

  // Species:
  species AcCoA in compartment = 0; AcCoA is "Acetyl-CoA";  // CHEBI:15351 kegg.compound:C00024
  species AcP in compartment = 0; AcP is "Acetyl phosphate";  // CHEBI:15350 kegg.compound:C00227
  species Acs in compartment = 0; Acs is "Acetyl-CoA synthase";  // uniprot:P27550
  species HOAc in compartment = 0; HOAc is "protonated acetate";  // isVersionOf CHEBI:30089 kegg.compound:C00033
  species $HOAc_E in compartment = 0; HOAc_E is "acetate export";  // isVersionOf CHEBI:30089 kegg.compound:C00033
  species LacI in compartment = 0; LacI is "lac repressor";  // isPartOf GO:0017053
  species OAc in compartment = 0; OAc is "Acetate";  // CHEBI:30089 kegg.compound:C00033
  species Pta in compartment = 0; Pta is "Phosphate acetyl transferase";  // uniprot:P0A9M8

  // Parameters:
  C = 100;
  H = 1e-7;
  KM1 = 0.06;
  KM2 = 0.1;
  Keq = 0.0005;
  Kg1 = 10;
  Kg2 = 10;
  Kg3 = 0.001;
  S0 = 0.5;
  alpha0 = 0;
  alpha1 = 0.1;
  alpha2 = 2;
  alpha3 = 2;
  k1 = 80;
  k2 = 0.8;
  k3 = 0.01;
  kAck_f = 1;
  kAck_r = 1;
  kTCA = 10;
  kd = 0.06;
  n = 2;

  // Assignment rules:
  observable_task1_model1_fung1_AcCoA := AcCoA;
  observable_task1_model1_fung1_AcP := AcP;
  observable_task1_model1_fung1_AcCoA := AcCoA;
  observable_task1_model1_fung1_AcP := AcP;
  observable_task2_model2_fung1_AcCoA := AcCoA;
  observable_task2_model2_fung1_AcP := AcP;
  observable_task3_model3_fung1_AcCoA := AcCoA;
  observable_task3_model3_fung1_AcP := AcP;

  // Reactions:
  R_Acs: => Acs; compartment*(alpha2*(AcP/Kg2)^n/(1 + (AcP/Kg2)^n) + alpha0); R_Acs is "Acetyl-CoA synthase synthesis";  // modifiers: AcP; hasPart GO:0006351 GO:0006412
  R_LacI: => LacI; compartment*(alpha1*(AcP/Kg1)^n/(1 + (AcP/Kg1)^n) + alpha0); R_LacI is "LacI synthesis";  // modifiers: AcP; hasPart GO:0006351 GO:0006412
  R_Pta: => Pta; alpha3/(1 + (LacI/Kg3)^n) + alpha0; R_Pta is "Phosphate acetyl transferase synthase";  // modifiers: LacI; hasPart GO:0006351 GO:0006412
  R_dAcs: Acs => ; compartment*kd*Acs; R_dAcs is "Acs degradation";  // isVersionOf GO:0030163
  R_dLacI: LacI => ; compartment*kd*LacI; R_dLacI is "LacI degradation";  // isVersionOf GO:0030163
  R_dPta: Pta => ; compartment*kd*Pta; R_dPta is "Pta degradation";  // isVersionOf GO:0030163
  V_Ace: OAc -> HOAc; compartment*C*(OAc*H - Keq*HOAc); V_Ace is "Acid-base equilibrium";
  V_Ack: AcP -> OAc; compartment*(kAck_f*AcP - kAck_r*OAc); V_Ack is "Acetate kinase";  // isVersionOf ec-code:2.7.2.1 GO:0008776
  V_Acs: OAc => AcCoA; compartment*k2*Acs*OAc/(KM2 + OAc); V_Acs is "Acetyl-CoA synthase flux";  // modifiers: Acs; isVersionOf ec-code:6.2.1.1 GO:0019427 kegg.reaction:R00235
  V_Pta: AcCoA => AcP; compartment*k1*Pta*AcCoA/(KM1 + AcCoA); V_Pta is "Phosphate acetyl transferase flux";  // modifiers: Pta; ec-code:2.3.1.8 kegg.reaction:R00230
  V_TCA: AcCoA => ; compartment*kTCA*AcCoA; V_TCA is "Flux to TCA cycle";  // hasVersion GO:0006099
  V_gly: => AcCoA; compartment*S0; V_gly is "Glycolytic flux";  // hasVersion GO:0006096
  V_out: HOAc -> $HOAc_E; compartment*k3*(HOAc - HOAc_E); V_out is "Intercellular transport of Acetate";  // isVersionOf GO:0015123
end
