// SBML level 2 version 4

model gardner1()

  // Compartments:
  compartment Cell = 1;  // GO:0005737

  // Species:
  species C in Cell = 0; C is "cyclin";  // interpro:IPR006670
  species M in Cell = 0; M is "cdc2k";  // hasVersion uniprot:P35567 uniprot:P24033
  species X in Cell = 0; X is "protease";  // hasProperty GO:0008233
  species Y in Cell = 0; Y is "cyclin inhibitor";
  species Z in Cell = 0; Z is "complex inhibitor-cyclin";  // hasPart interpro:IPR006670

  // Parameters:
  K6 = 0.3;
  V1p = 0.75;
  V3p = 0.3;

  // Assignment rules:
  V3 := M*V3p;
  V1 := C*V1p*(C + K6)^(-1);
  observable_task0_model0_gardner1_Z := Z;
  observable_task0_model0_gardner1_C := C;

  // Reactions:
  creation_of_cyclin: => C; vi;  // isVersionOf GO:0006412
    vi = 0.1;
  desinhibition_of_cyclin: Z => C; desinhibition_of_cyclin_alpha*desinhibition_of_cyclin_d1*Z;  // isVersionOf GO:0044257
    desinhibition_of_cyclin_alpha = 0.1; desinhibition_of_cyclin_d1 = 0.05;
  degradation_of_inhibited_cyclin: Z => Y; degradation_of_inhibited_cyclin_alpha*degradation_of_inhibited_cyclin_kd*Z;  // isVersionOf GO:0008054
    degradation_of_inhibited_cyclin_kd = 0.02; degradation_of_inhibited_cyclin_alpha = 0.1;
  creation_of_cyclin_inhibitor: => Y; vs;  // isVersionOf GO:0006412
    vs = 0.2;
  degradation_of_cyclin_inhibitor: Y => ; degradation_of_cyclin_inhibitor_d1*Y;  // isVersionOf GO:0044257
    degradation_of_cyclin_inhibitor_d1 = 0.05;
  reaction2: C => ; C*k1*X*(C + K5)^(-1); reaction2 is "cdc2 kinase triggered degration of cyclin";  // modifiers: X; isVersionOf GO:0008054
    k1 = 0.5; K5 = 0.02;
  default_degradation_of_cyclin: C => ; C*default_degradation_of_cyclin_kd;  // isVersionOf GO:0008054
    default_degradation_of_cyclin_kd = 0.02;
  activation_of_cdc2_kinase: => M; (1 + (-1*M))*V1*(K1 + (-1*M) + 1)^(-1);  // isVersionOf GO:0045737
    K1 = 0.1;
  deactivation_of_cdc2_kinase: M => ; M*V2*(K2 + M)^(-1);  // isVersionOf GO:0045736
    V2 = 0.25; K2 = 0.1;
  activation_of_cyclin_protease: => X; V3*(1 + (-1*X))*(K3 + (-1*X) + 1)^(-1);
    K3 = 0.2;
  deactivation_of_cyclin_protease: X => ; V4*X*(K4 + X)^(-1);
    K4 = 0.1; V4 = 0.1;
  reaction8: C + Y => Z; a1*C*Y;
    a1 = 0.05;
  reaction9: Z => C + Y; a2*Z;  // isVersionOf GO:0043241
    a2 = 0.05;
end
