// SBML level 3 version 1

model goldbeter2()

  // Compartments:
  compartment default_compartment = 1;

  // Species:
  species Cvar in default_compartment = 0.01;
  species Mvar in default_compartment = 0.01;
  species X in default_compartment = 0.01;

  // Parameters:
  K1 = 0.005;
  K2 = 0.005;
  K3 = 0.005;
  K4 = 0.005;
  Kc = 0.5;
  Kd = 0.02;
  V2 = 1.5;
  V4 = 0.5;
  VM1 = 3;
  VM3 = 1;
  cell = 1;
  kd = 0.01;
  vd = 0.25;
  vi = 0.025;

  // Assignment rules:
  V1 := VM1*Cvar/(Kc + Cvar);
  V3 := VM3*Mvar;
  observable_task0_model0_goldbeter2_X := X;
  observable_task0_model0_goldbeter2_Cvar := Cvar;
  observable_task0_model0_goldbeter2_Mvar := Mvar;

  // Reactions:
  v_1: -> Cvar; cell*vi;
  v_2: Cvar -> ; cell*kd*Cvar;
  v_3: Cvar -> ; cell*vd*Cvar*X/(Kd + Cvar);  // modifiers: X
  v_4: -> Mvar; cell*V1*(1 - Mvar)/(1 + K1 - Mvar);
  v_5: Mvar -> ; cell*V2*Mvar/(K2 + Mvar);
  v_6: -> X; cell*V3*(1 - X)/(1 + K3 - X);
  v_7: X -> ; cell*V4*X/(K4 + X);
end
