// SBML level 3 version 1

model hornberg1()

  // Compartments:
  compartment default_compartment = 1;

  // Species:
  species $Inh in default_compartment = 0;
  species R in default_compartment = 0.5;
  species Rin in default_compartment = 0;
  species x1 in default_compartment = 1;
  species x1p in default_compartment = 0;
  species x2 in default_compartment = 1;
  species x2p in default_compartment = 0;
  species x3 in default_compartment = 1;
  species x3p in default_compartment = 0;

  // Parameters:
  Ki8 = 1;
  Km1 = 0.1;
  Km2 = 0.1;
  Km3 = 0.1;
  Km4 = 1;
  Km5 = 0.1;
  Km6 = 1;
  Km7 = 0.1;
  Km8 = 1;
  Vm1 = 1;
  Vm2 = 0.01;
  Vm4 = 0.3;
  Vm6 = 0.3;
  Vm8 = 0.3;
  k3 = 1;
  k5 = 1;
  k7 = 1;

  // Assignment rules:
  observable_task0_model0_hornberg1_R := R;

  // Reactions:
  v_1: R -> Rin; Vm1*R/(Km1 + R);
  v_2: Rin -> R; Vm2*Rin/(Km2 + Rin);
  v_3: x1 -> x1p; k3*R*x1/(Km3 + x1);  // modifiers: R
  v_4: x1p -> x1; Vm4*x1p/(Km4 + x1p);
  v_5: x2 -> x2p; k5*x1p*x2/(Km5 + x2);  // modifiers: x1p
  v_6: x2p -> x2; Vm6*x2p/(Km6 + x2p);
  v_7: x3 -> x3p; k7*x2p*x3/(Km7 + x3);  // modifiers: x2p
  v_8: x3p -> x3; Vm8*x3p/Km8/(1 + x3p/Km8 + Inh/Ki8);  // modifiers: Inh
end
