// SBML level 2 version 4

model ihekwaba1()

  // Compartments:
  compartment compartment = 1;  // isVersionOf GO:0005623

  // Species:
  species IKK in compartment = 0.1;  // hasPart uniprot:O88351 uniprot:O88522 uniprot:Q60680
  species IKKIkBa in compartment = 0;  // hasPart uniprot:O88351 uniprot:O88522 uniprot:Q60680 uniprot:Q9Z1E3
  species IKKIkBaNFkB in compartment = 0;  // hasPart uniprot:O88351 uniprot:O88522 uniprot:Q60680 uniprot:Q9Z1E3
  species IKKIkBb in compartment = 0;  // hasPart uniprot:O88351 uniprot:O88522 uniprot:Q60680 uniprot:Q60778
  species IKKIkBbNFkB in compartment = 0;  // hasPart uniprot:O88351 uniprot:O88522 uniprot:Q60680 uniprot:Q60778
  species IKKIkBe in compartment = 0;  // hasPart uniprot:O88351 uniprot:O88522 uniprot:Q60680 uniprot:O54910
  species IKKIkBeNFkB in compartment = 0;  // isVersionOf uniprot:O88351 uniprot:O88522 uniprot:Q60680 uniprot:O54910
  species IkBa in compartment = 0.19028;  // isVersionOf uniprot:Q9Z1E3
  species IkBaNFkB in compartment = 0.082062;  // hasPart uniprot:Q9Z1E3 uniprot:P25799
  species IkBan in compartment = 0.19326;  // isVersionOf uniprot:Q9Z1E3
  species IkBanNFkBn in compartment = 0.0013739;  // hasPart uniprot:Q9Z1E3 uniprot:P25799
  species IkBat in compartment = 0.0054868;
  species IkBb in compartment = 0.021428;  // isVersionOf uniprot:Q60778
  species IkBbNFkB in compartment = 0.0090963;  // hasPart uniprot:Q60778 uniprot:P25799
  species IkBbn in compartment = 0.021887;  // isVersionOf uniprot:Q60778
  species IkBbnNFkBn in compartment = 0.00030061;  // hasPart uniprot:Q60778 uniprot:P25799
  species IkBbt in compartment = 0.00063696;
  species IkBe in compartment = 0.015307;  // isVersionOf uniprot:O54910
  species IkBeNFkB in compartment = 0.0064977;  // isVersionOf uniprot:O54910 uniprot:P25799
  species IkBen in compartment = 0.015635;  // isVersionOf uniprot:O54910
  species IkBenNFkBn in compartment = 0.00021473;  // hasPart uniprot:O54910 uniprot:P25799
  species IkBet in compartment = 0.000455;
  species NFkB in compartment = 0.00025081;  // isVersionOf uniprot:P25799
  species NFkBn in compartment = 0.00020366;  // isVersionOf uniprot:P25799
  species $sink in compartment = 0;
  species $source in compartment = 1;

  // Parameters:
  k1 = 0.5;
  k10 = 0.5;
  k11 = 0.0005;
  k12 = 0.0075;
  k13 = 0.5;
  k14 = 0.0005;
  k15 = 0.011;
  k16 = 2.25e-5;
  k17 = 2.25e-5;
  k18 = 2.25e-5;
  k19 = 0.09;
  k2 = 0.0005;
  k20 = 8e-5;
  k21 = 0.5;
  k22 = 0.0005;
  k23 = 0.5;
  k24 = 0.0005;
  k25 = 0.5;
  k26 = 0.0005;
  k27 = 1.54e-6;
  k28 = 0.0165;
  k29 = 0.00028;
  k3 = 0.5;
  k30 = 1.78e-7;
  k31 = 0.00028;
  k32 = 1.27e-7;
  k33 = 0.00028;
  k34 = 0.0225;
  k35 = 0.00125;
  k36 = 0.00408;
  k37 = 0.000113;
  k38 = 0.0003;
  k39 = 0.0002;
  k4 = 0.0005;
  k40 = 0.006;
  k41 = 0.00175;
  k42 = 0.00408;
  k43 = 0.000113;
  k44 = 0.00015;
  k45 = 0.0001;
  k46 = 0.009;
  k47 = 0.00175;
  k48 = 0.00408;
  k49 = 0.000113;
  k5 = 0.5;
  k50 = 0.00015;
  k51 = 0.0001;
  k52 = 0.185;
  k53 = 0.00125;
  k54 = 0.0138;
  k55 = 0.048;
  k56 = 0.00175;
  k57 = 0.0052;
  k58 = 0.07;
  k59 = 0.00175;
  k6 = 0.0005;
  k60 = 0.0052;
  k61 = 0.00012;
  k62 = 0.00407;
  k63 = 0.0015;
  k64 = 0.0022;
  k7 = 0.5;
  k8 = 0.0005;
  k9 = 0.0204;

  // Assignment rules:
  observable_task0_model0_ihekwaba1_NFkBn := NFkBn;

  // Reactions:
  v1: NFkB + IKKIkBa => IKKIkBaNFkB; k7*IKKIkBa*NFkB;  // isVersionOf GO:0006461
  v10: IkBb + IKK => IKKIkBb; k40*IKK*IkBb;  // isVersionOf GO:0006461
  v11: IKKIkBb => IKK; k63*IKKIkBb;  // isVersionOf GO:0044257
  v12: IKKIkBb => IKK + IkBb; k41*IKKIkBb;  // isVersionOf GO:0043241
  v13: NFkB + IKKIkBe => IKKIkBeNFkB; k13*IKKIkBe*NFkB;  // isVersionOf GO:0006461
  v14: IKKIkBeNFkB => NFkB + IKK; k15*IKKIkBeNFkB;  // isVersionOf GO:0044257
  v15: IKKIkBeNFkB => NFkB + IKKIkBe; k14*IKKIkBeNFkB;  // isVersionOf GO:0043241
  v16: IkBe + IKK => IKKIkBe; k46*IKK*IkBe;  // isVersionOf GO:0006461
  v17: IKKIkBe => IKK; k64*IKKIkBe;  // isVersionOf GO:0044257
  v18: IKKIkBe => IkBe + IKK; k47*IKKIkBe;  // isVersionOf GO:0043241
  v19: IkBaNFkB + IKK => IKKIkBaNFkB; k52*IKK*IkBaNFkB;  // isVersionOf GO:0006461
  v2: IKKIkBaNFkB => NFkB + IKK; k9*IKKIkBaNFkB;  // isVersionOf GO:0043241
  v20: IKKIkBaNFkB => IkBaNFkB + IKK; k53*IKKIkBaNFkB;  // isVersionOf GO:0043241
  v21: IkBbNFkB + IKK => IKKIkBbNFkB; k55*IKK*IkBbNFkB;  // isVersionOf GO:0006461
  v22: IKKIkBbNFkB => IkBbNFkB + IKK; k56*IKKIkBbNFkB;  // isVersionOf GO:0043241
  v23: IKK + IkBeNFkB => IKKIkBeNFkB; k58*IKK*IkBeNFkB;  // isVersionOf GO:0006461
  v24: IKKIkBeNFkB => IKK + IkBeNFkB; k59*IKKIkBeNFkB;  // isVersionOf GO:0043241
  v25: IkBa + NFkB => IkBaNFkB; k1*IkBa*NFkB;  // isVersionOf GO:0006461
  v26: 2 $source => IkBat + 2 $sink; k28*NFkBn*NFkBn;  // modifiers: NFkBn; isVersionOf GO:0006351
  v27: IkBaNFkB => IkBa + NFkB; k2*IkBaNFkB;  // isVersionOf GO:0043241
  v28: NFkBn + IkBan => IkBanNFkBn; k21*IkBan*NFkBn;  // isVersionOf GO:0006461
  v29: IkBanNFkBn => NFkBn + IkBan; k22*IkBanNFkBn;  // isVersionOf GO:0043241
  v3: IKKIkBaNFkB => NFkB + IKKIkBa; k8*IKKIkBaNFkB;  // isVersionOf GO:0043241
  v30: IkBanNFkBn => IkBaNFkB; k54*IkBanNFkBn;  // isVersionOf GO:0051168
  v31: IkBaNFkB => NFkB; k16*IkBaNFkB;  // isVersionOf GO:0044257
  v32: IkBat => $sink; k29*IkBat;  // isVersionOf GO:0044257
  v33: IkBan => IkBa; k39*IkBan;  // isVersionOf GO:0051168
  v34: IkBa => IkBan; k38*IkBa;  // isVersionOf GO:0000060
  v35: $source => IkBa + $sink; k36*IkBat;  // modifiers: IkBat; isVersionOf GO:0006412
  v36: IkBb + NFkB => IkBbNFkB; k3*IkBb*NFkB;  // isVersionOf GO:0006461
  v37: IkBbNFkB => IkBb + NFkB; k4*IkBbNFkB;  // isVersionOf GO:0043241
  v38: IkBbn + NFkBn => IkBbnNFkBn; k23*IkBbn*NFkBn;  // isVersionOf GO:0006461
  v39: IkBbnNFkBn => IkBbn + NFkBn; k24*IkBbnNFkBn;  // isVersionOf GO:0043241
  v4: IKK + IkBa => IKKIkBa; k34*IKK*IkBa;  // isVersionOf GO:0006461
  v40: IkBbnNFkBn => IkBbNFkB; k57*IkBbnNFkBn;  // isVersionOf GO:0006611
  v41: IkBbNFkB => NFkB; k17*IkBbNFkB;  // isVersionOf GO:0044257
  v42: IkBbt => $sink; k31*IkBbt;  // isVersionOf GO:0044257
  v43: IkBbn => IkBb; k45*IkBbn;  // isVersionOf GO:0006611
  v44: IkBb => IkBbn; k44*IkBb;  // isVersionOf GO:0000060
  v45: $source => IkBb + $sink; k42*IkBbt;  // modifiers: IkBbt
  v46: NFkB + IkBe => IkBeNFkB; k5*IkBe*NFkB;  // isVersionOf GO:0006461
  v47: IkBeNFkB => NFkB + IkBe; k6*IkBeNFkB;  // isVersionOf GO:0043241
  v48: NFkBn + IkBen => IkBenNFkBn; k25*IkBen*NFkBn;  // isVersionOf GO:0006461
  v49: IkBenNFkBn => IkBen + NFkBn; k26*IkBenNFkBn;  // isVersionOf GO:0043241
  v5: IKKIkBa => IKK; k62*IKKIkBa;  // isVersionOf GO:0044257
  v50: IkBenNFkBn => IkBeNFkB; k60*IkBenNFkBn;  // isVersionOf GO:0006611
  v51: IkBeNFkB => NFkB; k18*IkBeNFkB;  // isVersionOf GO:0044257
  v52: IkBet => $sink; k33*IkBet;  // isVersionOf GO:0044257
  v53: IkBen => IkBe; k51*IkBen;  // isVersionOf GO:0006611
  v54: IkBe => IkBen; k50*IkBe;  // isVersionOf GO:0000060
  v55: $source => IkBe + $sink; k48*IkBet;  // modifiers: IkBet
  v56: NFkBn => NFkB; k20*NFkBn;  // isVersionOf GO:0006611
  v57: NFkB => NFkBn; k19*NFkB;  // isVersionOf GO:0000060
  v58: $source => IkBat; k27*source;  // isVersionOf GO:0006351
  v59: $source => IkBbt; k30*source;  // isVersionOf GO:0006351
  v6: IKKIkBa => IKK + IkBa; k35*IKKIkBa;  // isVersionOf GO:0043241
  v60: $source => IkBet; k32*source;  // isVersionOf GO:0006351
  v61: IkBa => $sink; k37*IkBa;  // isVersionOf GO:0044257
  v62: IkBb => $sink; k43*IkBb;  // isVersionOf GO:0044257
  v63: IkBe => $sink; k49*IkBe;  // isVersionOf GO:0044257
  v64: IKK => $sink; k61*IKK;  // isVersionOf GO:0044257
  v7: IKKIkBb + NFkB => IKKIkBbNFkB; k10*IKKIkBb*NFkB;  // isVersionOf GO:0006461
  v8: IKKIkBbNFkB => IKK + NFkB; k12*IKKIkBbNFkB;  // isVersionOf GO:0044257
  v9: IKKIkBbNFkB => IKKIkBb + NFkB; k11*IKKIkBbNFkB;  // isVersionOf GO:0043241
end
