// SBML level 3 version 1

model karin3()

  // Compartments:
  compartment default = 1;  // 0-D

  // Species:
  species y in default = 5;
  species z in default = 5;

  // Parameters:
  M = 25;
  lambdaMinus = 0.5;
  mu = 0.25;

  // Assignment rules:
  lambdaPlus := y/10;
  observable_plot1_z_datagen1 := task1_model1_karin3_z;
  observable_plot7_z_datagen1 := task7_model7_karin3_z;
  observable_plot2_z_datagen1 := task2_model2_karin3_z;
  observable_plot8_z_datagen1 := task8_model8_karin3_z;
  observable_plot3_y_datagen1 := task13_model13_karin3_z;
  observable_plot9_y_datagen1 := task18_model18_karin3_z;
  observable_plot14_y_datagen1 := task23_model23_karin3_z;
  observable_plot19_y_datagen1 := task28_model28_karin3_z;
  observable_plot3_z_datagen1 := task3_model3_karin3_z;
  observable_plot9_z_datagen1 := task9_model9_karin3_z;
  observable_plot4_y_datagen1 := task14_model14_karin3_z;
  observable_plot10_y_datagen1 := task19_model19_karin3_z;
  observable_plot15_y_datagen1 := task24_model24_karin3_z;
  observable_plot20_y_datagen1 := task29_model29_karin3_z;
  observable_plot4_z_datagen1 := task4_model4_karin3_z;
  observable_plot10_z_datagen1 := task10_model10_karin3_z;
  observable_plot6_y_datagen1 := task15_model15_karin3_z;
  observable_plot11_y_datagen1 := task20_model20_karin3_z;
  observable_plot16_y_datagen1 := task25_model25_karin3_z;
  observable_plot5_y_datagen1 := task5_model5_karin3_z;
  observable_plot5_z_datagen1 := task5_model5_karin3_z;
  observable_task14_model14_karin3_z := task11_model11_karin3_z;
  observable_plot7_y_datagen1 := task16_model16_karin3_z;
  observable_plot12_y_datagen1 := task21_model21_karin3_z;
  observable_plot17_y_datagen1 := task26_model26_karin3_z;
  observable_task0_model0_karin3_z := z;
  observable_plot6_z_datagen1 := task6_model6_karin3_z;
  observable_plot2_y_datagen1 := task12_model12_karin3_z;
  observable_plot8_y_datagen1 := task17_model17_karin3_z;
  observable_plot13_y_datagen1 := task22_model22_karin3_z;
  observable_plot18_y_datagen1 := task27_model27_karin3_z;

  // Reactions:
  v1: -> z; z*(4.8/(1 + (7/y)^5) - 6/(1 + (8/y)^5) - 0.1);  // modifiers: y
  v2: -> y; mu*(M - z*y);  // modifiers: z
end
