// SBML level 3 version 1

model karin5()

  // Compartments:
  compartment default = 1;

  // Species:
  species beta in default = 400;
  species g in default = 4.966667;
  species ins in default = 11.42;
  species mbeta in default = 0;
  species tamox in default = 0.27;

  // Parameters:
  alpha = 8.4;
  k = 6;

  // Assignment rules:
  lambdapg := 0.1/(1 + (8.4/g)^1.7);
  lambdamg := 0.2*(1/(1 + (g/4)^8) + 1/(1 + (15/g)^6));
  lambdamgmut := 0.2*(1/(1 + (k*g/4)^8) + 1/(1 + (15/(k*g))^6));
  gamma := 432/(24*60);
  r0 := 864/(24*60)/18;
  ego := 1.44/(24*60);
  si := 0.72/(24*60);
  sigma := 43.2/(24*60);
  lambdapgmut := 0.1/(1 + (8.4/(k*g))^1.7);
  perMutatedBcells := 100*(mbeta/beta);
  observable_task0_model0_karin5_g := g;
  observable_task0_model0_karin5_perMutatedBcells := task0_model0_karin5_perMutatedBcells;

  // Reactions:
  v1: -> g; r0 - (ego + si*ins)*g;  // modifiers: ins
  v2: -> ins; beta*sigma*1/(1 + (alpha/g)^1.7) + mbeta*sigma*1/(1 + (alpha/(k*g))^1.7) - gamma*ins;  // modifiers: beta, mbeta, g
  v3: -> beta; 1/(24*60)*beta*(lambdapg - lambdamg - tamox);  // modifiers: tamox
  v4: -> mbeta; 1/(24*60)*(mbeta*(lambdapgmut - lambdamgmut) + beta*tamox);  // modifiers: beta, tamox
  v5: -> tamox; 1/(24*60)*(-1.5)*ln(2)*tamox;
end
