// SBML level 2 version 4

model kholodenko2()

  // Compartments:
  compartment uVol = 1;

  // Species:
  species MAPK in uVol = 280; MAPK is "Erk2";  // isVersionOf uniprot:P26696
  species MAPK_P in uVol = 10; MAPK_P is "Erk2-P";  // isVersionOf uniprot:P26696
  species MAPK_PP in uVol = 10; MAPK_PP is "Erk2-PP";  // isVersionOf uniprot:P26696
  species MKK in uVol = 280; MKK is "Mek1";  // isVersionOf uniprot:Q05116
  species MKKK in uVol = 90; MKKK is "Mos";  // isVersionOf uniprot:P09560
  species MKKK_P in uVol = 10; MKKK_P is "Mos-P";  // isVersionOf uniprot:P09560
  species MKK_P in uVol = 10; MKK_P is "Mek1-P";  // isVersionOf uniprot:Q05116
  species MKK_PP in uVol = 10; MKK_PP is "Mek1-PP";  // isVersionOf uniprot:Q05116

  // Assignment rules:
  observable_task0_model0_kholodenko2_MAPK := MAPK;
  observable_task0_model0_kholodenko2_MAPK_PP := MAPK_PP;

  // Reactions:
  J0: MKKK => MKKK_P; uVol*V1*MKKK/((1 + (MAPK_PP/Ki)^n)*(K1 + MKKK)); J0 is "MAPKKK activation";  // modifiers: MAPK_PP; isHomologTo reactome:REACT_525 ec-code:2.7.11.1 GO:0000185 GO:0008349
    V1 = 2.5; Ki = 9; n = 1; K1 = 10;
  J1: MKKK_P => MKKK; uVol*V2*MKKK_P/(KK2 + MKKK_P); J1 is "MAPKKK inactivation";  // isVersionOf ec-code:3.1.3.16 GO:0051390 GO:0006470
    V2 = 0.25; KK2 = 8;
  J2: MKK => MKK_P; uVol*k3*MKKK_P*MKK/(KK3 + MKK); J2 is "phosphorylation of MAPKK";  // modifiers: MKKK_P; isHomologTo reactome:REACT_614 ec-code:2.7.11.25 GO:0004709 GO:0006468
    k3 = 0.025; KK3 = 15;
  J3: MKK_P => MKK_PP; uVol*k4*MKKK_P*MKK_P/(KK4 + MKK_P); J3 is "phosphorylation of MAPKK-P";  // modifiers: MKKK_P; isHomologTo reactome:REACT_614 ec-code:2.7.11.25 GO:0000186 GO:0006468
    k4 = 0.025; KK4 = 15;
  J4: MKK_PP => MKK_P; uVol*V5*MKK_PP/(KK5 + MKK_PP); J4 is "dephosphorylation of MAPKK-PP";  // isVersionOf ec-code:3.1.3.16 GO:0006470 GO:0051389
    V5 = 0.75; KK5 = 15;
  J5: MKK_P => MKK; uVol*V6*MKK_P/(KK6 + MKK_P); J5 is "dephosphorylation of MAPKK-P";  // isVersionOf ec-code:3.1.3.16 GO:0006470
    V6 = 0.75; KK6 = 15;
  J6: MAPK => MAPK_P; uVol*k7*MKK_PP*MAPK/(KK7 + MAPK); J6 is "phosphorylation of MAPK";  // modifiers: MKK_PP; hasVersion reactome:REACT_136 reactome:REACT_2247 ec-code:2.7.12.2 GO:0004708
    k7 = 0.025; KK7 = 15;
  J7: MAPK_P => MAPK_PP; uVol*k8*MKK_PP*MAPK_P/(KK8 + MAPK_P); J7 is "phosphorylation of MAPK-P";  // modifiers: MKK_PP; hasVersion reactome:REACT_136 reactome:REACT_2247 ec-code:2.7.12.2 GO:0006468
    k8 = 0.025; KK8 = 15;
  J8: MAPK_PP => MAPK_P; uVol*V9*MAPK_PP/(KK9 + MAPK_PP); J8 is "dephosphorylation of MAPK-PP";  // isVersionOf ec-code:3.1.3.16 GO:0000188 GO:0006470
    V9 = 0.5; KK9 = 15;
  J9: MAPK_P => MAPK; uVol*V10*MAPK_P/(KK10 + MAPK_P); J9 is "dephosphorylation of MAPK-P";  // isVersionOf ec-code:3.1.3.16 GO:0006470
    V10 = 0.5; KK10 = 15;

  // Unit definitions:
  unit nanomole = 1e-9 mole;
end
