// SBML level 2 version 4

function Hill_inhibition(V, Shalve, h, substrate)
  V/(Shalve^h + substrate^h);
end

function Hill_Cooperativity(substrate, Shalve, V, h)
  V*substrate^h/(Shalve^h + substrate^h);
end

model kim5()

  // Compartments:
  compartment compartment_1 = 1;  // isVersionOf GO:0005623

  // Species:
  species x in compartment_1 = 0.1;  // isVersionOf CHEBI:33697
  species y in compartment_1 = 0.1;  // isVersionOf CHEBI:35222 CHEBI:33697
  species u in compartment_1 = 0.1;
  species v in compartment_1 = 0.1;

  // Parameters:
  alpha = 0.57;
  beta = 2.5;
  gamma = 1;
  n = 6.5;
  m = 6.5;
  delta = 1.5;

  // Assignment rules:
  observable_task0_model0_kim5_species_1 := x;
  observable_task0_model0_kim5_species_2 := y;
  observable_task0_model0_kim5_species_3 := u;
  observable_task0_model0_kim5_species_4 := v;

  // Reactions:
  reaction1: x => ; compartment_1*reaction1_k1*x;
    reaction1_k1 = 1;
  reaction2: y => ; compartment_1*reaction2_k1*y;
    reaction2_k1 = 1;
  reaction3: u => ; compartment_1*reaction3_k1*u;
    reaction3_k1 = 1;
  reaction4: v => ; compartment_1*reaction4_k1*v;
    reaction4_k1 = 1;
  reaction5: u => u + x; compartment_1*alpha*u;
  reaction6: v => v + y; compartment_1*beta*v;
  reaction7: y => y + u; compartment_1*Hill_inhibition(reaction7_V, reaction7_Shalve, n, y);
    reaction7_V = 1; reaction7_Shalve = 1;
  reaction8: x => x + v; compartment_1*Hill_Cooperativity(x, reaction8_Shalve, reaction8_V, m);
    reaction8_Shalve = 1; reaction8_V = 1;
  reaction9: v => v + x; compartment_1*delta*v;

  // Unit definitions:
  unit volume = dimensionless;
  unit time = dimensionless;
  unit substance = dimensionless;
end
