// SBML level 3 version 1

model kirschner1()

  // Compartments:
  compartment default = 1;

  // Species:
  species T in default = 1000;
  species V in default = 3;

  // Parameters:
  b1 = 14;
  b2 = 1;
  c = 0.007;
  g = 30;
  k = 0.00025;
  mu = 0.002;
  s1 = 2;
  s2 = 1.5;

  // Assignment rules:
  VMULTIPLIED := 1000*V;
  observable_task0_model0_kirschner_T := T;
  observable_task0_model0_kirschner_VMULTIPLIED := task0_model0_kirschner_VMULTIPLIED;

  // Reactions:
  v1: -> T; s1;
  v2: T -> ; s2*V/(b1 + V);  // modifiers: V
  v3: T -> ; mu*T;
  v4: T -> ; k*T*V;  // modifiers: V
  v5: -> V; g*V/(b2 + V);
  v6: V -> ; c*T*V;  // modifiers: T
end
