// SBML level 3 version 1

model kolodkin1()
  // model units - substance: nmol, time: min, volume: L, extent: nM

  // Compartments:
  compartment default_compartment = 1;

  // Species:
  species L in default_compartment = 0;
  species REL in default_compartment = 0;
  species ReNR in default_compartment = 3.7;

  // Parameters:
  EXTERNAL = 0;
  Kapb = 3.24e-11;
  Kapf = 3.24e-11;
  Lc = 0.005;
  Vcytosol = 1.55e-12;
  Vnucleus = 4.5e-13;
  k1 = 60;
  k2 = 60;

  // Assignment rules:
  observable_kolodkin1_gen_transresp := REL/(ReNR + REL);
  observable_kolodkin2_gen_transresp := REL/(RE + REL);
  observable_kolodkin3_gen_transresp := REL/(RE + REL);
  observable_kolodkin4_gen_transresp := REL/(RE + REL);
  observable_kolodkin5_gen_transresp := REL/(RE + REL);
  observable_kolodkin6_gen_transresp := REL/(RE + REL);

  // Reactions:
  v_1: L + ReNR -> REL; -(k2*REL) + k1*L*ReNR;
  v_2: -> L; (Kapf*Lc - Kapb*L)/Vnucleus + 0*L + 0*ReNR + 0*REL + 0*L + 0*ReNR + 0*REL;  // modifiers: REL, ReNR

  // Unit definitions:
  unit L = litre;
  unit nM = 1e-9 mole / litre;
  unit nmol = 1e-9 mole;
  unit min = 60 second;
end
