// SBML level 3 version 1

function TR(Kapf, Cvar, Kapb, Nvar)
  Cvar*Kapf - Kapb*Nvar;
end

model kolodkin2()
  // model units - substance: nmol, time: min, volume: L, extent: nM

  // Compartments:
  compartment default_compartment = 1;

  // Species:
  species $Lc in default_compartment = 0.005;
  species Ln_ in default_compartment = 0;
  species NRLn in default_compartment = 0;
  species NRn in default_compartment = 370;
  species RE in default_compartment = 3.7;
  species REL in default_compartment = 0;

  // Parameters:
  Kapb = 3.24e-11;
  Kapf = 3.24e-11;
  Vcytosol = 1.55e-12;
  Vnucleus = 4.5e-13;
  k1 = 60;
  k12 = 60;
  k2 = 60;
  k22 = 60;

  // Assignment rules:
  observable_kolodkin1_gen_transresp := REL/(ReNR + REL);
  observable_kolodkin2_gen_transresp := REL/(RE + REL);
  observable_kolodkin3_gen_transresp := REL/(RE + REL);
  observable_kolodkin4_gen_transresp := REL/(RE + REL);
  observable_kolodkin5_gen_transresp := REL/(RE + REL);
  observable_kolodkin6_gen_transresp := REL/(RE + REL);

  // Reactions:
  v_1: NRLn + RE -> REL; k1*NRLn*RE - k2*REL;
  v_2: $Lc -> Ln_; TR(Kapf, Lc, Kapb, Ln_)/Vnucleus;
  v_3: Ln_ + NRn -> NRLn; -(k22*NRLn) + k12*Ln_*NRn + 0*NRLn + 0*RE + 0*Ln_ + 0*NRn + 0*REL + 0*NRLn + 0*RE + 0*Ln_ + 0*NRn + 0*REL;  // modifiers: RE, REL

  // Unit definitions:
  unit nM = 1e-9 mole / litre;
  unit min = 60 second;
  unit nmol = 1e-9 mole;
  unit L = litre;
end
