// SBML level 3 version 1

function TR(Kapf, Cvar, Kapb, Nvar)
  Cvar*Kapf - Kapb*Nvar;
end

model kolodkin3()
  // model units - substance: nmol, time: min, volume: L, extent: nMol

  // Compartments:
  compartment default_compartment = 1;

  // Species:
  species $Lc in default_compartment = 0.005;
  species Ln_ in default_compartment = 0;
  species NRLc in default_compartment = 0;
  species NRLm in default_compartment = 0;
  species NRLn in default_compartment = 0;
  species NRc in default_compartment = 42;
  species NRm in default_compartment = 42;
  species NRn in default_compartment = 83.25;
  species RE in default_compartment = 3.7;
  species REL in default_compartment = 0;

  // Parameters:
  EXTERNAL = 0;
  Kapb = 3.24e-11;
  Kapb4 = 3.6;
  Kapb5 = 3.6;
  Kapf = 3.24e-11;
  Kapf4 = 3.6;
  Kapf5 = 3.6;
  Vcytosol = 1.55e-12;
  Vnucleus = 4.5e-13;
  k1 = 60;
  k12 = 60;
  k13 = 60;
  k16 = 60;
  k2 = 60;
  k22 = 60;
  k23 = 60;
  k26 = 60;

  // Assignment rules:
  observable_kolodkin1_gen_transresp := REL/(ReNR + REL);
  observable_kolodkin2_gen_transresp := REL/(RE + REL);
  observable_kolodkin3_gen_transresp := REL/(RE + REL);
  observable_kolodkin4_gen_transresp := REL/(RE + REL);
  observable_kolodkin5_gen_transresp := REL/(RE + REL);
  observable_kolodkin6_gen_transresp := REL/(RE + REL);

  // Reactions:
  v_1: NRLn + RE -> REL; k1*NRLn*RE - k2*REL;
  v_2: $Lc -> Ln_; TR(Kapf, Lc, Kapb, Ln_)/Vnucleus;
  v_3: Ln_ + NRn -> NRLn; -(k22*NRLn) + k12*Ln_*NRn;
  v_4: NRm + 3.444444 Ln_ -> NRLm; Vnucleus*(-(k23*NRLm) + k13*Ln_*NRm)/Vcytosol;
  v_5: NRc -> NRm; TR(Kapf4, NRc, Kapb4, NRm);
  v_6: NRLc -> NRLm; TR(Kapf5, NRLc, Kapb5, NRLm);
  v_7: NRc -> NRLc; k16*Lc*NRc - k26*NRLc + 0*NRLn + 0*RE + 0*Ln_ + 0*NRn + 0*NRm + 0*NRc + 0*NRLc + 0*REL + 0*NRLm + 0*NRLn + 0*RE + 0*Ln_ + 0*NRn + 0*NRm + 0*NRc + 0*NRLc + 0*REL + 0*NRLm;  // modifiers: NRLn, RE, Ln_, NRm, REL, NRn, NRLm, Lc

  // Unit definitions:
  unit nmol = 1e-9 mole;
  unit L = litre;
  unit min = 60 second;
  unit nMol = 1e-9 mole / litre;
end
