// SBML level 3 version 1

function TR(Kapf, Cvar, Kapb, Nvar)
  Cvar*Kapf - Kapb*Nvar;
end

model kolodkin6()
  // model units - substance: nmol, time: min, volume: L, extent: nM

  // Compartments:
  compartment default_compartment = 1;

  // Species:
  species $Lc in default_compartment = 0.005;
  species Ln_ in default_compartment = 0;
  species NR in default_compartment = 199.403;
  species NRLc in default_compartment = 0;
  species NRLn in default_compartment = 0;
  species NRc in default_compartment = 49.85;
  species RE in default_compartment = 3.7;
  species REL in default_compartment = 0;

  // Parameters:
  EXTERNAL = 0;
  Kapb = 3.24e-11;
  Kapb4 = 5.4e-14;
  Kapb5 = 5.4e-14;
  Kapf = 3.24e-11;
  Kapf4 = 2.16e-13;
  Kapf5 = 5.4e-12;
  Vcytosol = 1.55e-12;
  Vnucleus = 4.5e-13;
  k1 = 60;
  k12 = 60;
  k13 = 60;
  k2 = 60;
  k22 = 60;
  k23 = 60;

  // Assignment rules:
  observable_kolodkin1_gen_transresp := REL/(ReNR + REL);
  observable_kolodkin2_gen_transresp := REL/(RE + REL);
  observable_kolodkin3_gen_transresp := REL/(RE + REL);
  observable_kolodkin4_gen_transresp := REL/(RE + REL);
  observable_kolodkin5_gen_transresp := REL/(RE + REL);
  observable_kolodkin6_gen_transresp := REL/(RE + REL);

  // Reactions:
  v_1: NRLn + RE -> REL; k1*NRLn*RE - k2*REL;
  v_2: $Lc -> Ln_; TR(Kapf, Lc, Kapb, Ln_)/Vnucleus;
  v_3: Ln_ + NR -> NRLn; k12*Ln_*NR - k22*NRLn;
  v_4: NRc -> NRLc; k13*Lc*NRc - k23*NRLc;  // modifiers: Lc
  v_5: NRc -> 3.444444 NR; TR(Kapf4, NRc, Kapb4, NR)/Vcytosol;
  v_6: NRLc -> 3.444444 NRLn; TR(Kapf5, NRLc, Kapb5, NRLn)/Vcytosol + 0*NRLn + 0*RE + 0*Ln_ + 0*NR + 0*NRc + 0*NRLc + 0*REL + 0*NRLn + 0*RE + 0*Ln_ + 0*NR + 0*NRc + 0*NRLc + 0*REL;  // modifiers: Lc, NR, Ln_, RE, REL, NRc

  // Unit definitions:
  unit nmol = 1e-9 mole;
  unit L = litre;
  unit min = 60 second;
  unit nM = 1e-9 mole / litre;
end
