// SBML level 2 version 1

model kowald1()

  // Compartments:
  compartment cell = 1;  // isVersionOf GO:0005623

  // Species:
  species O2 in cell = 0; O2 is "O2*-";  // CHEBI:18421 kegg.compound:C00704
  species Cu_II_ZnSOD in cell = 5e-6; Cu_II_ZnSOD is "Cu(II)ZnSOD";  // isVersionOf interpro:IPR001424
  species H2O2 in cell = 0;  // CHEBI:16240 kegg.compound:C00027
  species LOO in cell = 0; LOO is "LOO*";
  species HO in cell = 0; HO is "HO*";  // CHEBI:29191
  species LOOH in cell = 0;  // kegg.compound:C01025 CHEBI:61051
  species L in cell = 0; L is "L*";  // isVersionOf CHEBI:18059
  species SODtotal in cell = 1e-5;  // isVersionOf interpro:IPR001424
  species Cat in cell = 1e-5;  // hasVersion interpro:IPR002226

  // Parameters:
  var Cu_I_ZnSOD; Cu_I_ZnSOD is "Cu(I)ZnSOD";
  var HO2star; HO2star is "HO2*";
  k1 = 6.6e-7;
  k10 = 1000;
  k11 = 250000000;
  k12 = 0.38;
  k13a = 0.0087;
  k13b = 0.0087;
  k17 = 30000;
  k18 = 7;
  k19 = 88000;
  k2 = 1600000000;
  k3 = 1600000000;
  k4 = 100000;
  k5 = 20000;
  k6 = 1;
  k7 = 34000000;
  k9 = 1000000;

  // Assignment rules:
  // Cu(I)ZnSOD=SODtotal-Cu(II)ZnSOD
  Cu_I_ZnSOD := SODtotal - Cu_II_ZnSOD;
  // HO2*=O2*/100
  HO2star := O2/100;
  observable_task0_model0_kowald1_species_0000001 := O2;
  observable_task0_model0_kowald1_species_0000006 := H2O2;
  observable_task0_model0_kowald1_species_0000011 := L;
  observable_task0_model0_kowald1_species_0000007 := LOO;

  // Reactions:
  // Reaction16 showed in the paper is a fast equilibrium reaction. HO2* =" H+" + "O2*-". So in the equation (1) in the paper, you will see there is one item k10*"HO2*" . However, most simulation software does not support fast reaction yet, so curator creat this fake v16 reaction in order to make the final ODE correct.
  fast: O2 -> ; k10*HO2star*cell; fast is "v16";
  v2: O2 + Cu_II_ZnSOD => ; cell*k2*O2*Cu_II_ZnSOD;  // isPartOf GO:0004784
  v1: => O2; cell*k1;  // isVersionOf GO:0042554
  v3: O2 => H2O2 + Cu_II_ZnSOD; cell*k3*O2*Cu_I_ZnSOD;  // isPartOf GO:0004784 ec-code:1.15.1.2 kegg.reaction:R05743
  v13a: => Cu_II_ZnSOD; cell*k13a*Cu_I_ZnSOD;  // isVersionOf GO:0009055
  v13b: Cu_II_ZnSOD => ; cell*k13b*Cu_II_ZnSOD;  // isVersionOf GO:0009055
  v17: L => LOO; cell*k17*L;
  v18: LOO => L + LOOH; cell*k18*LOO;
  v19: 2 LOO => ; cell*k19*LOO^2;
  v4: O2 + LOO => LOOH; cell*k4*O2*LOO;
  v5: O2 + H2O2 => 2 HO; cell*k5*O2*H2O2;
  v6: H2O2 => 2 HO; cell*k6*H2O2*Cu_II_ZnSOD;  // modifiers: Cu_II_ZnSOD
  v7: H2O2 => ; cell*k7*H2O2*Cat;  // modifiers: Cat; isVersionOf ec-code:1.11.1.6 GO:0004096
  v9: HO => ; cell*k9*HO;  // isVersionOf GO:0044248
  v10: => L + H2O2; cell*k10*HO2star;
  v11: HO => L; cell*k11*HO;
  v12: LOOH => ; cell*k12*LOOH;
end
