// SBML level 2 version 1

model laub1()

  // Compartments:
  compartment Extracellular = 1;  // isVersionOf GO:0005576
  compartment Intracellular = 1;  // isVersionOf GO:0005623

  // Species:
  species Ex_cAMP in Extracellular = 0;  // CHEBI:17489 kegg.compound:C00575
  species In_cAMP in Intracellular = 1;  // CHEBI:17489 kegg.compound:C00575
  species PKA in Intracellular = 1;  // uniprot:P34099 interpro:IPR002373
  species REGA in Intracellular = 2.5;  // isVersionOf interpro:IPR000396
  species ACA in Intracellular = 1.4;  // isVersionOf interpro:IPR008172
  species CAR1 in Intracellular = 1.5;  // uniprot:P13773 interpro:IPR000848
  species ERK2 in Intracellular = 1.6;  // isVersionOf interpro:IPR008349 uniprot:P28482

  // Parameters:
  parameter_0 = 1.4; parameter_0 is "k1";
  parameter_1 = 0.9; parameter_1 is "k2";
  // The value for this parameters is different from paper (k11=0.3).
  parameter_10 = 0.6; parameter_10 is "k11";
  parameter_11 = 3.1; parameter_11 is "k12";
  // In the paper, k13=1.8. This is the most different parameter value between model and paper.
  parameter_12 = 33; parameter_12 is "k13";
  // In paper this value k14=1.5
  parameter_13 = 4.5; parameter_13 is "k14";
  parameter_2 = 2.5; parameter_2 is "k3";
  parameter_3 = 1.5; parameter_3 is "k4";
  parameter_4 = 0.6; parameter_4 is "k5";
  parameter_5 = 0.8; parameter_5 is "k6";
  parameter_6 = 2; parameter_6 is "k7";
  parameter_7 = 1.3; parameter_7 is "k8";
  // The value of the k9 is different from the paper. In the paper k9=0.7.
  parameter_8 = 0.29; parameter_8 is "k9";
  parameter_9 = 1; parameter_9 is "k10";

  // Assignment rules:
  observable_task0_model0_laub1_species_0 := Ex_cAMP;
  observable_task0_model0_laub1_species_1 := In_cAMP;
  observable_task0_model0_laub1_species_3 := REGA;
  observable_task0_model0_laub1_species_4 := ACA;

  // Reactions:
  reaction_0: => ACA; Intracellular*parameter_0*ERK2; reaction_0 is "k1";  // modifiers: ERK2; isVersionOf GO:0004707 GO:0007190
  reaction_1: ACA => ; Intracellular*parameter_1*ACA; reaction_1 is "k2";  // isVersionOf GO:0007194
  reaction_10: => Ex_cAMP; Extracellular*parameter_10*ACA; reaction_10 is "k11";  // modifiers: ACA; isVersionOf GO:0004016
  reaction_11: Ex_cAMP => ; Extracellular*parameter_11*Ex_cAMP; reaction_11 is "k12";  // isVersionOf GO:0006198
  reaction_12: => CAR1; Intracellular*parameter_12*Ex_cAMP; reaction_12 is "k13";  // modifiers: Ex_cAMP; isVersionOf GO:0001646
  reaction_13: CAR1 => ; Intracellular*parameter_13*CAR1*PKA; reaction_13 is "k14";  // modifiers: PKA; isVersionOf ec-code:2.7.11.1 GO:0004672
  reaction_2: => PKA; Intracellular*parameter_2*In_cAMP; reaction_2 is "k3";  // modifiers: In_cAMP; isVersionOf GO:0001646 GO:0032147
  reaction_3: PKA => ; Intracellular*parameter_3*PKA; reaction_3 is "k4";  // isVersionOf GO:0006469
  reaction_4: => ERK2; Intracellular*parameter_4*CAR1; reaction_4 is "k5";  // modifiers: CAR1; isVersionOf GO:0045860
  reaction_5: ERK2 => ; Intracellular*parameter_5*ERK2*PKA; reaction_5 is "k6";  // modifiers: PKA; isVersionOf GO:0004672
  reaction_6: => REGA; Intracellular*parameter_6; reaction_6 is "k7";
  reaction_7: REGA => ; Intracellular*parameter_7*REGA*ERK2; reaction_7 is "k8";  // modifiers: ERK2; isVersionOf GO:0004707
  reaction_8: => In_cAMP; Intracellular*parameter_8*ACA; reaction_8 is "k9";  // modifiers: ACA; isVersionOf GO:0004016 GO:0030819
  reaction_9: In_cAMP => ; Intracellular*parameter_9*In_cAMP*REGA; reaction_9 is "k10";  // modifiers: REGA; isVersionOf GO:0004115

  // Unit definitions:
  unit min = 60 second;
  unit micro_Mole = 1e-6 mole;
end
