// SBML level 2 version 4

model lee4()

  // Compartments:
  compartment compartment = 1;

  // Species:
  species E in compartment = 0.00015;  // hasPart uniprot:P12259 uniprot:P00742
  species E_M in compartment = 0;  // hasPart CHEBI:9574 uniprot:P00742 uniprot:P12259
  species E_M1 in compartment = 0;  // hasPart CHEBI:9574 uniprot:P00742 uniprot:P12259
  species E_P1 in compartment = 0;  // hasPart uniprot:P00742 uniprot:P12259 interpro:IPR003966
  species E_P2 in compartment = 0;  // hasPart CHEBI:9574 uniprot:P00742 uniprot:P12259
  species E_P21 in compartment = 0;  // hasPart CHEBI:9574 uniprot:P00742 uniprot:P12259
  species E_P_1 in compartment = 0;  // hasPart uniprot:P00742 uniprot:P12259 interpro:IPR003966
  species E_P_2 in compartment = 0;  // hasPart uniprot:P00742 uniprot:P12259
  species M in compartment = 0;  // isVersionOf CHEBI:9574
  species M1 in compartment = 0;  // isVersionOf CHEBI:9574
  species P in compartment = 1;  // isVersionOf interpro:IPR003966
  species P2 in compartment = 0;  // isVersionOf CHEBI:9574
  species P21 in compartment = 0;  // isVersionOf CHEBI:9574
  species T in compartment = 0;  // CHEBI:9574

  // Parameters:
  j1 = 33.4;
  j3 = 1.58e-6;
  j3a = 0.185;
  j5 = 21.8;
  j7 = 4.46e-9;
  j7a = 2.66e-5;
  k1 = 91.8;
  k10 = 7.23e-10;
  k2 = 82.4;
  k3 = 38.1;
  k3a = 151.5;
  k4 = 38.1;
  k4a = 209.9;
  k5 = 5.16;
  k6 = 32.3;
  k7 = 6.76e-8;
  k7a = 4.7;
  k8 = 0.00599;
  k8a = 42.6;
  k9 = 3.12e-8;
  kC1 = 2.39e-6;
  kC2 = 0.031;

  // Assignment rules:
  observable_task0_model0_lee4_M := M;
  observable_task0_model0_lee4_P := P;
  observable_task0_model0_lee4_P2 := P2;
  observable_task0_model0_lee4_T := T;

  // Reactions:
  r1: E + P -> E_P_1; compartment*(k1*E*P - j1*E_P_1);
  r10: P2 => P21; compartment*k10*P2;
  r11: E + P21 -> E_P21; compartment*(k7*E*P21 - j7*E_P21);
  r12: E + P2 -> E_P2; compartment*(k7a*E*P2 - j7a*E_P2);
  r13: E_P21 => E + T; compartment*k8*E_P21;
  r14: E_P2 => E + T; compartment*k8a*E_P2;
  r15: E_P_1 => T; compartment*kC1*E_P_1;
  r16: E_P_2 => T; compartment*kC2*E_P_2;
  r2: E_P_1 => E + M; compartment*k2*E_P_1;
  r3: M => M1; compartment*k9*M;
  r4: E + M1 -> E_M1; compartment*(k3*E*M1 - j3*E_M1);
  r5: E + M -> E_M; compartment*(k3a*E*M - j3a*E_M);
  r6: E_M1 => E + T; compartment*k4*E_M1;
  r7: E_M => E + T; compartment*k4a*E_M;
  r8: E + P -> E_P_2; compartment*(k5*E*P - j5*E_P_2);
  r9: E_P_2 => E + P2; compartment*k6*E_P_2;

  // Unit definitions:
  unit substance = 1e-6 mole;
end
