// SBML level 2 version 4

model lee3()

  // Compartments:
  compartment compartment = 1;

  // Species:
  species II in compartment = 1;  // uniprot:P00734
  species IIa in compartment = 0;  // uniprot:P00734
  species M in compartment = 0;
  species P2 in compartment = 0;

  // Assignment rules:
  observable_task0_model0_lee3_M := M;
  observable_task0_model0_lee3_P2 := P2;
  observable_task0_model0_lee3_II := II;
  observable_task0_model0_lee3_IIa := IIa;

  // Reactions:
  r1: II => M; compartment*r1_k1*II;
    r1_k1 = 0.005;
  r2: M => IIa; compartment*r2_k1*M;
    r2_k1 = 0.01;
  r3: II => P2; compartment*r3_k1*II;
    r3_k1 = 1e-5;
  r4: P2 => IIa; compartment*r4_k1*P2;
    r4_k1 = 2.5e-5;

  // Unit definitions:
  unit substance = 1e-6 mole;
end
