// SBML level 2 version 4

model levchenko1()

  // Compartments:
  compartment Cytoplasm = 1;  // GO:0005737

  // Species:
  substanceOnly species MAPK in Cytoplasm = 0.4;  // isVersionOf uniprot:P26696
  substanceOnly species MAPKMEKpp in Cytoplasm = 0; MAPKMEKpp is "MAPK_MEK-PP";  // hasPart uniprot:P26696 uniprot:Q05116
  substanceOnly species MAPKPH in Cytoplasm = 0.3; MAPKPH is "MAPK phosphatase";  // uniprot:Q90W58
  substanceOnly species MAPKp in Cytoplasm = 0; MAPKp is "MAPK-P";  // isVersionOf uniprot:P26696
  substanceOnly species MAPKpMAPKPH in Cytoplasm = 0; MAPKpMAPKPH is "MAPK-P_MAPKPase";  // hasPart uniprot:P26696 uniprot:Q90W58
  substanceOnly species MAPKpMEKpp in Cytoplasm = 0; MAPKpMEKpp is "MAPK-P_MEK-PP";  // hasPart uniprot:Q05116 uniprot:P26696
  substanceOnly species MAPKpp in Cytoplasm = 0; MAPKpp is "MAPK-PP";  // isVersionOf uniprot:P26696
  substanceOnly species MAPKppMAPKPH in Cytoplasm = 0; MAPKppMAPKPH is "MAPK-PP_MAPKPase";  // hasPart uniprot:P26696 uniprot:Q90W58
  substanceOnly species MEK in Cytoplasm = 0.2;  // isVersionOf uniprot:Q05116
  substanceOnly species MEKPH in Cytoplasm = 0.2; MEKPH is "MEK phosphatase";
  substanceOnly species MEKRAFp in Cytoplasm = 0; MEKRAFp is "MEK_RAF-P";  // hasPart uniprot:P09560 uniprot:Q05116
  substanceOnly species MEKp in Cytoplasm = 0; MEKp is "MEK-P";  // isVersionOf uniprot:Q05116
  substanceOnly species MEKpMEKPH in Cytoplasm = 0; MEKpMEKPH is "MEK-P_MEKPase";  // hasPart uniprot:Q05116
  substanceOnly species MEKpRAFp in Cytoplasm = 0; MEKpRAFp is "MEK-P_RAF-P";  // hasPart uniprot:P09560 uniprot:Q05116
  substanceOnly species MEKpp in Cytoplasm = 0; MEKpp is "MEK-PP";  // isVersionOf uniprot:Q05116
  substanceOnly species MEKppMEKPH in Cytoplasm = 0; MEKppMEKPH is "MEK-PP_MEKPase";  // hasPart uniprot:Q05116
  substanceOnly species RAF in Cytoplasm = 0.3;  // isVersionOf uniprot:P09560
  substanceOnly species RAFK in Cytoplasm = 0.2;  // isVersionOf interpro:IPR003577
  substanceOnly species RAFPH in Cytoplasm = 0.3; RAFPH is "RAF phosphatase";
  substanceOnly species RAFRAFK in Cytoplasm = 0; RAFRAFK is "RAF_RAFK";  // hasPart uniprot:P09560 interpro:IPR003577
  substanceOnly species RAFp in Cytoplasm = 0; RAFp is "RAF-P";  // isVersionOf uniprot:P09560
  substanceOnly species RAFpRAFPH in Cytoplasm = 0; RAFpRAFPH is "RAF-P_RAFPase";  // hasPart uniprot:P09560

  // Assignment rules:
  observable_plot0_MAPKpp_datagen1 := task0_model0_levchenko2_TotalScaffold_1uM_MAPKpp;
  observable_task1_model1_levchenko2_TotalScaffold_1uM_MAPKpp := MAPKpp;
  observable_plot2_MAPKpp_datagen1 := task2_model2_levchenko2_TotalScaffold_1uM_MAPKpp;
  observable_plot3_MAPKpp_datagen1 := task3_model3_levchenko2_TotalScaffold_1uM_MAPKpp;
  observable_plot4_MAPKpp_datagen1 := task4_model4_levchenko2_TotalScaffold_1uM_MAPKpp;
  observable_plot5_MAPKpp_datagen1 := task6_model6_levchenko1_MAPKpp;

  // Reactions:
  binding_of_RAF_and_RAFK: RAF + RAFK => RAFRAFK; a1*RAF*RAFK;  // isHomologTo reactome:REACT_996 GO:0031435
    a1 = 1;
  Reaction10: MEKp + MEKPH => MEKpMEKPH; a4*MEKp*MEKPH; Reaction10 is "binding of MEK-P and MEK phosphatase";  // isVersionOf GO:0031434
    a4 = 10;
  dissociation_of_MEK_P_MEKPase: MEKpMEKPH => MEKp + MEKPH; d4*MEKpMEKPH; dissociation_of_MEK_P_MEKPase is "dissociation of MEK-P_MEKPase";  // isVersionOf GO:0043241
    d4 = 0.8;
  dephosphorylation_of_MEK_P: MEKpMEKPH => MEK + MEKPH; k4*MEKpMEKPH; dephosphorylation_of_MEK_P is "dephosphorylation of MEK-P";  // isVersionOf ec-code:3.1.3.16 GO:0006470
    k4 = 0.1;
  binding_of_MEK_P_and_RAF_P: MEKp + RAFp => MEKpRAFp; a5*MEKp*RAFp; binding_of_MEK_P_and_RAF_P is "binding of MEK-P and RAF-P";  // isHomologTo reactome:REACT_143 GO:0031435 GO:0031434
    a5 = 3.3;
  dissociation_of_MEK_P_RAF_P: MEKpRAFp => MEKp + RAFp; d5*MEKpRAFp; dissociation_of_MEK_P_RAF_P is "dissociation of MEK-P_RAF-P";  // isVersionOf GO:0043241
    d5 = 0.4;
  phosphorylation_of_MEK_P: MEKpRAFp => MEKpp + RAFp; k5*MEKpRAFp; phosphorylation_of_MEK_P is "phosphorylation of MEK-P";  // isHomologTo reactome:REACT_614 ec-code:2.7.11.25 GO:0006468 GO:0004709
    k5 = 0.1;
  Reaction16: MEKPH + MEKpp => MEKppMEKPH; a6*MEKPH*MEKpp; Reaction16 is "binding of MEK-PP and MEK phosphatase";  // isVersionOf GO:0031434
    a6 = 10;
  dissociation_of_MEK_PP_MEKPase: MEKppMEKPH => MEKPH + MEKpp; d6*MEKppMEKPH; dissociation_of_MEK_PP_MEKPase is "dissociation of MEK-PP_MEKPase";  // isVersionOf GO:0043241
    d6 = 0.8;
  dephosphorylation_of_MEK_PP: MEKppMEKPH => MEKp + MEKPH; k6*MEKppMEKPH; dephosphorylation_of_MEK_PP is "dephosphorylation of MEK-PP";  // isVersionOf ec-code:3.1.3.16 GO:0051389 GO:0006470
    k6 = 0.1;
  binding_of_MAPK_and_MEK_PP: MAPK + MEKpp => MAPKMEKpp; a7*MAPK*MEKpp; binding_of_MAPK_and_MEK_PP is "binding of MAPK and MEK-PP";  // isHomologTo reactome:REACT_495 reactome:REACT_1780 GO:0051019 GO:0031434
    a7 = 20;
  dissociation_of_RAF_RAFK: RAFRAFK => RAF + RAFK; d1*RAFRAFK;  // isVersionOf GO:0043241
    d1 = 0.4;
  dissociation_of_MAPK_MEK_PP: MAPKMEKpp => MAPK + MEKpp; d7*MAPKMEKpp; dissociation_of_MAPK_MEK_PP is "dissociation of MAPK_MEK-PP";  // isVersionOf GO:0043241
    d7 = 0.6;
  phosphorylation_of_MAPK: MAPKMEKpp => MAPKp + MEKpp; k7*MAPKMEKpp;  // isHomologTo reactome:REACT_2247 reactome:REACT_136 ec-code:2.7.12.2 GO:0006468
    k7 = 0.1;
  Reaction22: MAPKp + MAPKPH => MAPKpMAPKPH; a8*MAPKp*MAPKPH; Reaction22 is "binding of MAPK-P and MAPK phosphatase";  // isVersionOf GO:0051019
    a8 = 5;
  dissociation_of_MAPK_P_MAPKPase: MAPKpMAPKPH => MAPKp + MAPKPH; d8*MAPKpMAPKPH; dissociation_of_MAPK_P_MAPKPase is "dissociation of MAPK-P_MAPKPase";  // isVersionOf GO:0043241
    d8 = 0.4;
  dephosphorylation_of_MAPK_P: MAPKpMAPKPH => MAPK + MAPKPH; k8*MAPKpMAPKPH; dephosphorylation_of_MAPK_P is "dephosphorylation of MAPK-P";  // isVersionOf ec-code:3.1.3.16 GO:0006470
    k8 = 0.1;
  binding_of_MAPK_P_and_MEK_PP: MAPKp + MEKpp => MAPKpMEKpp; a9*MAPKp*MEKpp; binding_of_MAPK_P_and_MEK_PP is "binding of MAPK-P and MEK-PP";  // isHomologTo reactome:REACT_495 reactome:REACT_1780 GO:0051019 GO:0031434
    a9 = 20;
  dissociation_of_MAPK_P_MEK_PP: MAPKpMEKpp => MAPKp + MEKpp; d9*MAPKpMEKpp; dissociation_of_MAPK_P_MEK_PP is "dissociation of MAPK-P_MEK-PP";  // isVersionOf GO:0043241
    d9 = 0.6;
  phosphorylation_of_MAPK_P: MAPKpMEKpp => MAPKpp + MEKpp; k9*MAPKpMEKpp; phosphorylation_of_MAPK_P is "phosphorylation of MAPK-P";  // isVersionOf ec-code:2.7.12.2 GO:0000187 GO:0006468 GO:0004708
    k9 = 0.1;
  Reaction28: MAPKPH + MAPKpp => MAPKppMAPKPH; a10*MAPKPH*MAPKpp; Reaction28 is "binding of MAPK-PP and MAPK phosphatase";  // isVersionOf GO:0051019
    a10 = 5;
  dissociation_of_MAPK_PP_MAPKPase: MAPKppMAPKPH => MAPKPH + MAPKpp; d10*MAPKppMAPKPH; dissociation_of_MAPK_PP_MAPKPase is "dissociation of MAPK-PP_MAPKPase";  // isVersionOf GO:0043241
    d10 = 0.4;
  phosphorylation_of_RAF: RAFRAFK => RAFK + RAFp; k1*RAFRAFK;  // isVersionOf ec-code:2.7.11.1 GO:0008349 GO:0000185 GO:0006468
    k1 = 0.1;
  dephosphorylation_of_MAPK_PP: MAPKppMAPKPH => MAPKp + MAPKPH; k10*MAPKppMAPKPH; dephosphorylation_of_MAPK_PP is "dephosphorylation of MAPK-PP";  // isVersionOf ec-code:3.1.3.16 GO:0006470 GO:0000188
    k10 = 0.1;
  Reaction4: RAFp + RAFPH => RAFpRAFPH; a2*RAFp*RAFPH; Reaction4 is "binding of RAF-P and RAF phosphatase";  // isVersionOf GO:0031435
    a2 = 0.5;
  dissociation_of_RAF_P_RAFPase: RAFpRAFPH => RAFp + RAFPH; d2*RAFpRAFPH; dissociation_of_RAF_P_RAFPase is "dissociation of RAF-P_RAFPase";  // isVersionOf GO:0043241
    d2 = 0.5;
  dephosphorylation_of_RAF_P: RAFpRAFPH => RAF + RAFPH; k2*RAFpRAFPH; dephosphorylation_of_RAF_P is "dephosphorylation of RAF-P";  // isVersionOf ec-code:3.1.3.16 GO:0051390 GO:0006470
    k2 = 0.1;
  binding_of_MEK_and_RAF_P: MEK + RAFp => MEKRAFp; a3*MEK*RAFp; binding_of_MEK_and_RAF_P is "binding of MEK and RAF-P";  // isHomologTo reactome:REACT_143 GO:0031434 GO:0031435
    a3 = 3.3;
  dissociation_of_MEK_RAF_P: MEKRAFp => MEK + RAFp; d3*MEKRAFp; dissociation_of_MEK_RAF_P is "dissociation of MEK_RAF-P";  // isVersionOf GO:0043241
    d3 = 0.42;
  phosphorylation_of_MEK: MEKRAFp => MEKp + RAFp; k3*MEKRAFp;  // isHomologTo reactome:REACT_614 ec-code:2.7.11.25 GO:0004709 GO:0006468
    k3 = 0.1;

  // Unit definitions:
  unit micromole = 1e-6 mole;
end
