// SBML level 3 version 1

model li1()

  // Compartments:
  compartment default = 1;

  // Species:
  species T in default = 100;
  species TStar in default = 0;
  species V in default = 100;

  // Parameters:
  NN = 10;
  Tmax = 1500;
  alpha = 0.2;
  beta = 1;
  epsilon = 2.4;
  k = 0.0027;
  r1 = 0.55;
  r2 = 0.5;
  s = 0.1;
  sigma = 0.7;

  // Assignment rules:
  observable_task0_model0_li1_T := T;
  observable_task0_model0_li1_V := V;

  // Reactions:
  v1: -> T; s;
  v10: -> V; beta*NN*TStar;  // modifiers: TStar
  v11: V -> ; epsilon*V;
  v2: T -> ; alpha*T;
  v3: -> T; r1*T;
  v4: T -> ; r1*T*(T + TStar)/Tmax;  // modifiers: TStar
  v5: T -> ; k*T*V;  // modifiers: V
  v6: -> TStar; k*sigma*T*V;  // modifiers: T, V
  v7: TStar -> ; beta*TStar;
  v8: -> TStar; r2*TStar;
  v9: TStar -> ; r2*TStar*(T + TStar)/Tmax;  // modifiers: T
end
