// SBML level 2 version 4

function my_MM(k, E, S, Km)
  k*E*S/(Km + S);
end
my_MM is "my-MM";

model liu2()

  // Compartments:
  compartment compartment = 1;  // isVersionOf FMA:62970 GO:0005576

  // Species:
  species C1 in compartment = 2470;  // isVersionOf reactome:REACT_8815.1
  species C2 in compartment = 310;  // isVersionOf uniprot:P06681 reactome:REACT_8260.1
  species C2a in compartment = 0;  // isVersionOf reactome:REACT_8331.2
  species C2b in compartment = 0;  // isVersionOf reactome:REACT_8600.2
  species C3 in compartment = 4650;  // isVersionOf reactome:REACT_8213.1 uniprot:P01024
  species C3a in compartment = 0;  // isVersionOf reactome:REACT_8086.1 uniprot:P01024
  species C3b in compartment = 0;  // isVersionOf reactome:REACT_8621.1
  species C4 in compartment = 770;  // isVersionOf reactome:REACT_26761.1 uniprot:P0C0L4 uniprot:P0C0L5
  species C4BP in compartment = 260;  // isVersionOf uniprot:P04003
  species C4BP_C4b in compartment = 0; C4BP_C4b is "C4BP/C4b";  // hasVersion uniprot:P04003 reactome:REACT_26471.1
  species C4BP_GlcNac_LF_CRP in compartment = 0; C4BP_GlcNac_LF_CRP is "C4BP/GlcNac/LF/CRP";  // hasPart CHEBI:506227 uniprot:P04003 uniprot:Q15485 uniprot:P02741
  species C4BP_PC_CRP in compartment = 0; C4BP_PC_CRP is "C4BP/PC/CRP";  // hasPart CHEBI:18132 uniprot:P04003 uniprot:P02741
  species C4BP_PC_CRP_LF in compartment = 0; C4BP_PC_CRP_LF is "C4BP/PC/CRP/LF";  // hasPart CHEBI:18132 uniprot:P04003 uniprot:Q15485 uniprot:P02741
  species C4a in compartment = 0;  // isVersionOf uniprot:P0C0L4 uniprot:P0C0L5 reactome:REACT_25991.1
  species C4b in compartment = 0;  // isVersionOf uniprot:P0C0L5 uniprot:P0C0L4 reactome:REACT_26471.1
  species C4b_C2a in compartment = 0; C4b_C2a is "C4b/C2a";  // hasVersion reactome:REACT_8331.2 reactome:REACT_26471.1
  species C4b_C2a_C4BP in compartment = 0; C4b_C2a_C4BP is "C4b/C2a/C4BP";  // hasVersion reactome:REACT_26471.1 uniprot:P04003 reactome:REACT_8331.2
  species CRP in compartment = 2;  // isVersionOf uniprot:P02741 interpro:IPR001759 reactome:REACT_27052.1
  species GlcNac in compartment = 0;  // CHEBI:506227 kegg.compound:C00140
  species GlcNac_HF in compartment = 0; GlcNac_HF is "GlcNac/HF";  // hasPart CHEBI:506227
  species GlcNac_HF_MASP in compartment = 0; GlcNac_HF_MASP is "GlcNac/HF/MASP";  // hasPart CHEBI:506227 uniprot:O00187
  species GlcNac_LF in compartment = 0; GlcNac_LF is "GlcNac/LF";  // hasPart CHEBI:506227 uniprot:Q15485
  species GlcNac_LF_C1_MASP in compartment = 0; GlcNac_LF_C1_MASP is "GlcNac/LF/C1/MASP";  // hasPart CHEBI:506227 uniprot:O00187 uniprot:Q15485 reactome:REACT_8815.1
  species GlcNac_LF_CRP in compartment = 0; GlcNac_LF_CRP is "GlcNac/LF/CRP";  // hasPart CHEBI:506227 uniprot:Q15485 uniprot:P02741
  species GlcNac_LF_CRP_C1 in compartment = 0; GlcNac_LF_CRP_C1 is "GlcNac/LF/CRP/C1";  // hasPart CHEBI:506227 uniprot:P02741 uniprot:Q15485 reactome:REACT_8815.1
  species GlcNac_LF_CRP_MASP in compartment = 0; GlcNac_LF_CRP_MASP is "GlcNac/LF/CRP/MASP";  // hasPart CHEBI:506227 uniprot:O00187 uniprot:Q15485 uniprot:P02741
  species GlcNac_LF_MASP in compartment = 0; GlcNac_LF_MASP is "GlcNac/LF/MASP";  // hasPart CHEBI:506227 uniprot:Q15485 uniprot:O00187
  species HF in compartment = 0;
  species LF in compartment = 20;  // isVersionOf uniprot:Q15485
  species MASP in compartment = 6.8;  // hasVersion uniprot:O00187
  species PC in compartment = 0.0327796;  // CHEBI:18132 kegg.compound:C00588
  species PC_CRP in compartment = 0; PC_CRP is "PC/CRP";  // hasPart CHEBI:18132 uniprot:P02741
  species PC_CRP_C1 in compartment = 0; PC_CRP_C1 is "PC/CRP/C1";  // hasPart CHEBI:18132 uniprot:P02741 reactome:REACT_8815.1
  species PC_CRP_LF in compartment = 0; PC_CRP_LF is "PC/CRP/LF";  // hasPart CHEBI:18132 uniprot:P02741 uniprot:Q15485
  species PC_CRP_LF_C1 in compartment = 0; PC_CRP_LF_C1 is "PC/CRP/LF/C1";  // hasPart CHEBI:18132 uniprot:P02741 uniprot:Q15485 reactome:REACT_8815.1
  species PC_CRP_LF_C1_MASP in compartment = 0; PC_CRP_LF_C1_MASP is "PC/CRP/LF/C1/MASP";  // hasPart CHEBI:18132 uniprot:O00187 uniprot:Q15485 reactome:REACT_8815.1
  species PC_CRP_LF_MASP in compartment = 0; PC_CRP_LF_MASP is "PC/CRP/LF/MASP";  // hasPart CHEBI:18132 uniprot:Q15485 uniprot:P02741 uniprot:O00187
  species X in compartment = 0.0005;
  species dC3b in compartment = 0;  // isVersionOf reactome:REACT_26114.1 GO:0009986
  species dC4b_C2a in compartment = 0; dC4b_C2a is "dC4b/C2a";  // hasProperty GO:0009986
  species dC4b_C2a_C4BP in compartment = 0; dC4b_C2a_C4BP is "dC4b/C2a/C4BP";  // hasVersion uniprot:P04003 GO:0009986 reactome:REACT_8331.2 reactome:REACT_26471.1
  species iC4b_C2a in compartment = 0; iC4b_C2a is "iC4b/C2a";  // hasVersion reactome:REACT_26471.1 reactome:REACT_8331.2

  // Parameters:
  ka01_1 = 0.0275999;
  ka01_2 = 0.0109;
  ka02_1 = 0.00074;
  ka02_2 = 0.0011;
  ka03_1 = 2;
  ka03_2 = 500;
  ka04_1 = 10.5;
  ka04_2 = 2500;
  kb01_1 = 0.09101111;
  kb01_2 = 0.05082055;
  kb02_1 = 0.03680108;
  kb02_2 = 0.1;
  kb03_1 = 66.37768;
  kb03_2 = 829.1158;
  kb04_1 = 1.1;
  kb04_2 = 2000;
  kc01_1 = 0.6456466;
  kc01_2 = 0.1945511;
  kc02 = 0.0005911528;
  kc03_1 = 0.4140045;
  kc03_2 = 0.9964757;
  kc04_1 = 0.9778366;
  kc04_2 = 0.1991624;
  kd01_1 = 7.07e-5;
  kd01_2 = 7.23e-5;
  kd02_1 = 0.03680108;
  kd02_2 = 0.1;
  kd03_1 = 66.37768;
  kd03_2 = 829.1158;
  kd04_1 = 1.1;
  kd04_2 = 2000;
  kd05_1 = 0.00074;
  kd05_2 = 0.0011;
  kd06_1 = 2;
  kd06_2 = 500;
  kd07_1 = 10.5;
  kd07_2 = 2500;
  kd08_1 = 0.03680108;
  kd08_2 = 0.1;
  kd09_1 = 0.00074;
  kd09_2 = 0.0011;
  kd10_1 = 71.17058;
  kd10_2 = 3796.227;
  kd11_1 = 38.96259;
  kd11_2 = 5972.306;
  ke01_1 = 7.07e-5;
  ke01_2 = 0.0001;
  ke02_1 = 0.00074;
  ke02_2 = 0.0011;
  ke03_1 = 2;
  ke03_2 = 500;
  ke04_1 = 10.5;
  ke04_2 = 2500;
  ke05_1 = 0.03680108;
  ke05_2 = 0.1;
  ke06_1 = 66.37768;
  ke06_2 = 829.1158;
  ke07_1 = 1.1;
  ke07_2 = 2000;
  kf01_1 = 0.9699983;
  kf01_2 = 0.06902058;
  kf02_1 = 0.9699983;
  kf02_2 = 0.06902058;
  kf03 = 0.06135372;
  kf04_1 = 0.6134161;
  kf04_2 = 0.9836912;
  kf05 = 0.9807776;
  kf06_1 = 0.6134161;
  kf06_2 = 0.9836912;
  kf07_1 = 0.6134161;
  kf07_2 = 0.9836912;
  kg01_1 = 0.09101111;
  kg01_2 = 0.05082055;
  kg02_1 = 0.03680108;
  kg02_2 = 0.1;
  kg03_1 = 66.37768;
  kg03_2 = 829.1158;
  kg04_1 = 1.1;
  kg04_2 = 2000;
  kt01 = 0.000342266;
  kt02 = 0.492901;
  kt03 = 0.0470911;
  kt04_1 = 0;
  kt04_2 = 0;

  // Assignment rules:
  mC3 := dC3b;
  observable_task0_model0_liu2_dC3b := dC3b;
  observable_plot2_dC3b_datagen1 := task2_model2_liu2_dC3b;
  observable_plot1_dC3b_datagen1 := task1_model1_liu2_dC3b;

  // Reactions:
  a_01: PC + CRP -> PC_CRP; compartment*(ka01_1*PC*CRP - ka01_2*PC_CRP);
  a_02: PC_CRP + C1 -> PC_CRP_C1; compartment*(ka02_1*PC_CRP*C1 - ka02_2*PC_CRP_C1);
  a_03: C4 => C4a + C4b; compartment*my_MM(ka03_1, PC_CRP_C1, C4, ka03_2);  // modifiers: PC_CRP_C1
  a_04: C2 => C2a + C2b; compartment*my_MM(ka04_1, PC_CRP_C1, C2, ka04_2);  // modifiers: PC_CRP_C1
  b_01: GlcNac + LF -> GlcNac_LF; compartment*(kb01_1*GlcNac*LF - kb01_2*GlcNac_LF);
  b_02: GlcNac_LF + MASP -> GlcNac_LF_MASP; compartment*(kb02_1*GlcNac_LF*MASP - kb02_2*GlcNac_LF_MASP);
  b_03: C4 => C4a + C4b; compartment*my_MM(kb03_1, GlcNac_LF_MASP, C4, kb03_2);  // modifiers: GlcNac_LF_MASP
  b_04: C2 => C2a + C2b; compartment*my_MM(kb04_1, GlcNac_LF_MASP, C2, kb04_2);  // modifiers: GlcNac_LF_MASP
  c_01: C4b + C2a -> C4b_C2a; compartment*(kc01_1*C4b*C2a - kc01_2*C4b_C2a);
  c_02: C4b_C2a + C3 => C4b_C2a + C3a + C3b; compartment*kc02*C4b_C2a*C3;
  c_03: C3b -> dC3b; compartment*(kc03_1*C3b - kc03_2*dC3b);
  c_04: C4b_C2a -> dC4b_C2a; compartment*(kc04_1*C4b_C2a - kc04_2*dC4b_C2a);
  d_01: PC_CRP + LF -> PC_CRP_LF; compartment*(kd01_1*PC_CRP*LF - kd01_2*PC_CRP_LF);
  d_02: PC_CRP_LF + MASP -> PC_CRP_LF_MASP; compartment*(kd02_1*PC_CRP_LF*MASP - kd02_2*PC_CRP_LF_MASP);
  d_03: C4 => C4a + C4b; compartment*my_MM(kd03_1, PC_CRP_LF_MASP, C4, kd03_2);  // modifiers: PC_CRP_LF_MASP
  d_04: C2 => C2a + C2b; compartment*my_MM(kd04_1, PC_CRP_LF_MASP, C2, kd04_2);  // modifiers: PC_CRP_LF_MASP
  d_05: PC_CRP_LF + C1 -> PC_CRP_LF_C1; compartment*(kd05_1*PC_CRP_LF*C1 - kd05_2*PC_CRP_LF_C1);
  d_06: C4 => C4a + C4b; compartment*my_MM(kd06_1, PC_CRP_LF_C1, C4, kd06_2);  // modifiers: PC_CRP_LF_C1
  d_07: C2 => C2a + C2b; compartment*my_MM(kd07_1, PC_CRP_LF_C1, C2, kd07_2);  // modifiers: PC_CRP_LF_C1
  d_08: PC_CRP_LF_C1 + MASP -> PC_CRP_LF_C1_MASP; compartment*(kd08_1*PC_CRP_LF_C1*MASP - kd08_2*PC_CRP_LF_C1_MASP);
  d_09: PC_CRP_LF_MASP + C1 -> PC_CRP_LF_C1_MASP; compartment*(kd09_1*PC_CRP_LF_MASP*C1 - kd09_2*PC_CRP_LF_C1_MASP);
  d_10: C4 => C4a + C4b; compartment*my_MM(kd10_1, PC_CRP_LF_C1_MASP, C4, kd10_2);  // modifiers: PC_CRP_LF_C1_MASP
  d_11: C2 => C2a + C2b; compartment*my_MM(kd11_1, PC_CRP_LF_C1_MASP, C2, kd11_2);  // modifiers: PC_CRP_LF_C1_MASP
  e_01: GlcNac_LF + CRP -> GlcNac_LF_CRP; compartment*(ke01_1*GlcNac_LF*CRP - ke01_2*GlcNac_LF_CRP);
  e_02: GlcNac_LF_CRP + C1 -> GlcNac_LF_CRP_C1; compartment*(ke02_1*GlcNac_LF_CRP*C1 - ke02_2*GlcNac_LF_CRP_C1);
  e_03: C4 => C4a + C4b; compartment*my_MM(ke03_1, GlcNac_LF_CRP_C1, C4, ke03_2);  // modifiers: GlcNac_LF_CRP_C1
  e_04: C2 => C2a + C2b; compartment*my_MM(ke04_1, GlcNac_LF_CRP_C1, C2, ke04_2);  // modifiers: GlcNac_LF_CRP_C1
  e_05: GlcNac_LF_CRP + MASP -> GlcNac_LF_CRP_MASP; compartment*(ke05_1*GlcNac_LF_CRP*MASP - ke05_2*GlcNac_LF_CRP_MASP);
  e_06: C4 => C4a + C4b; compartment*my_MM(ke06_1, GlcNac_LF_CRP_MASP, C4, ke06_2);  // modifiers: GlcNac_LF_CRP_MASP
  e_07: C2 => C2a + C2b; compartment*my_MM(ke07_1, GlcNac_LF_CRP_MASP, C2, ke07_2);  // modifiers: GlcNac_LF_CRP_MASP
  f_01: C4BP + PC_CRP -> C4BP_PC_CRP; compartment*(kf01_1*C4BP*PC_CRP - kf01_2*C4BP_PC_CRP);
  f_02: C4BP + GlcNac_LF_CRP -> C4BP_GlcNac_LF_CRP; compartment*(kf02_1*C4BP*GlcNac_LF_CRP - kf02_2*C4BP_GlcNac_LF_CRP);
  f_03: C4b_C2a + C4BP => iC4b_C2a + C4BP; compartment*kf03*C4b_C2a*C4BP;
  f_04: C4BP + C4b -> C4BP_C4b; compartment*(kf04_1*C4BP*C4b - kf04_2*C4BP_C4b);
  f_05: C4b_C2a + C4BP => C4b + C2a + C4BP; compartment*kf05*C4b_C2a*C4BP;
  f_06: C4b_C2a + C4BP -> C4b_C2a_C4BP; compartment*(kf06_1*C4b_C2a*C4BP - kf06_2*C4b_C2a_C4BP);
  f_07: dC4b_C2a + C4BP -> dC4b_C2a_C4BP; compartment*(kf07_1*dC4b_C2a*C4BP - kf07_2*dC4b_C2a_C4BP);
  g_01: X + HF -> GlcNac_HF; compartment*(kg01_1*X*HF - kg01_2*GlcNac_HF);
  g_02: GlcNac_HF + MASP -> GlcNac_HF_MASP; compartment*(kg02_1*GlcNac_HF*MASP - kg02_2*GlcNac_HF_MASP);
  g_03: C4 => C4a + C4b; compartment*my_MM(kg03_1, GlcNac_HF_MASP, C4, kg03_2);  // modifiers: GlcNac_HF_MASP
  g_04: C2 => C2a + C2b; compartment*my_MM(kg04_1, GlcNac_HF_MASP, C2, kg04_2);  // modifiers: GlcNac_HF_MASP
  t_01: C4BP => ; compartment*t_01_k1_4*C4BP;
    t_01_k1_4 = 0.000342266;
  t_02: C3b => ; compartment*t_02_k1_4*C3b;
    t_02_k1_4 = 0.492901;
  t_03: C4b_C2a => ; compartment*t_03_k1_4*C4b_C2a;
    t_03_k1_4 = 0.0470911;
  t_04: C4BP + PC_CRP_LF -> C4BP_PC_CRP_LF; compartment*(t_04_k1_4*C4BP*PC_CRP_LF - k2*C4BP_PC_CRP_LF);
    t_04_k1_4 = 0; k2 = 0;

  // Unit definitions:
  unit volume = 1e-3 litre;
  unit nano_mole = 1e-9 mole;
  unit nM = 1e-9 mole * 0.1 litre;
end
