// SBML level 3 version 1

model lou1()

  // Compartments:
  compartment default = 1;  // 0-D

  // Species:
  species Ib in default = 39455; Ib is "Infected bottom";
  species It in default = 36931; It is "Infected top";
  species Iv in default = 234800; Iv is "Infected versatile";
  species Sb in default = 2590800; Sb is "Susceptible bottom";
  species St in default = 2425100; St is "Susceptible top";
  species Sv in default = 15418000; Sv is "Susceptible versatile";

  // Parameters:
  betaBT = 0.2563;
  betaBV = 0.2826;
  betaTB = 0.5786;
  betaTV = 0.5653;
  betaVB = 0.5786;
  betaVT = 0.2563;
  betaVV = 0.4239;
  dI = 0.105;
  dM = 0.022;
  rb = 70817;
  rt = 96667;
  rv = 603950;

  // Assignment rules:
  lambdaT := (betaBT*Ib + betaVT*Iv)/(Sb + Ib + Sv + Iv);
  lambdaV := (betaTV*It + betaBV*Ib + betaVV*Iv)/(St + It + Sv + Iv + Sb + Ib);
  lambdaB := (betaTB*It + betaVB*Iv)/(St + It + Sv + Iv);
  Total_infected_MSM := It + Iv + Ib;
  observable_Ib_1 := Ib;
  observable_It_1 := It;
  observable_Iv_1 := Iv;
  observable_Total_infected_MSM_1 := Total_infected_MSM;

  // Reactions:
  v_1: -> St; rt;
  v_10: Sb -> Ib; lambdaB*Sb;
  v_11: Sb -> ; dM*Sb;
  v_12: Ib -> ; dI*Ib;
  v_2: St -> It; lambdaT*St;
  v_3: St -> ; dM*St;
  v_4: It -> ; dI*It;
  v_5: -> Sv; rv;
  v_6: Sv -> Iv; lambdaV*Sv;
  v_7: Sv -> ; dM*Sv;
  v_8: Iv -> ; dI*Iv;
  v_9: -> Sb; rb;
end
