// SBML level 2 version 4

model ma()

  // Compartments:
  compartment compartment = 1;

  // Species:
  species ACA in compartment = 3.39;  // isVersionOf interpro:IPR008172
  species CAR1 in compartment = 2.45;  // isVersionOf uniprot:P13773
  species ERK2 in compartment = 1.13;  // isVersionOf uniprot:Q54QB1 interpro:IPR008349
  species PKA in compartment = 1.6;  // isHomologTo uniprot:Q01386 interpro:IPR002373
  species REGA in compartment = 0.9;  // isVersionOf uniprot:Q23917
  species excAMP in compartment = 0.48;  // CHEBI:17489 kegg.compound:C000575
  species incAMP in compartment = 1.2;  // isVersionOf CHEBI:17489 kegg.compound:C000575

  // Parameters:
  k1 = 2;
  k10 = 0.8;
  k11 = 0.7;
  k12 = 4.9;
  k13 = 23;
  k14 = 4.5;
  k2 = 0.9;
  k3 = 2.5;
  k4 = 1.5;
  k5 = 0.6;
  k6 = 0.8;
  k7 = 1;
  k8 = 1.3;
  k9 = 0.3;

  // Assignment rules:
  observable_task0_model0_ma_ACA := ACA;
  observable_task0_model0_ma_REGA := REGA;
  observable_task0_model0_ma_excAMP := excAMP;
  observable_task0_model0_ma_incAMP := incAMP;
  observable_task0_model0_ma_CAR1 := CAR1;
  observable_task0_model0_ma_ERK2 := ERK2;
  observable_task0_model0_ma_PKA := PKA;

  // Reactions:
  v1: -> ACA; k1*CAR1;  // modifiers: CAR1; isVersionOf GO:0045858
  v10: incAMP -> ; k10*REGA*incAMP;  // modifiers: REGA; isVersionOf GO:0006198
  v11: -> excAMP; k11*ACA;  // modifiers: ACA; isVersionOf GO:0006171
  v12: excAMP -> ; k12*excAMP;  // isVersionOf GO:0006198
  v13: -> CAR1; k13*excAMP;  // modifiers: excAMP; isVersionOf GO:0045858
  v14: CAR1 -> ; k14*CAR1;  // isVersionOf GO:0045857
  v2: ACA -> ; k2*ACA*PKA;  // modifiers: PKA; isVersionOf GO:0045857
  v3: -> PKA; k3*incAMP;  // modifiers: incAMP; isVersionOf GO:0045858
  v4: PKA -> ; k4*PKA;  // isVersionOf GO:0045857
  v5: -> ERK2; k5*CAR1;  // modifiers: CAR1; isVersionOf GO:0045858
  v6: ERK2 -> ; k6*PKA*ERK2;  // modifiers: PKA; isVersionOf GO:0045857
  v7: -> REGA; k7;  // isVersionOf GO:0045858
  v8: REGA -> ; k8*ERK2*REGA;  // modifiers: ERK2; isVersionOf GO:0045857
  v9: -> incAMP; k9*ACA;  // modifiers: ACA; isVersionOf GO:0006171
end
