// SBML level 2 version 1

model marhl()

  // Compartments:
  compartment Cytosol = 1;  // GO:0005829
  compartment Endoplasmic_Reticulum = 1;  // GO:0005790
  compartment Mitochondria = 1;  // GO:0005739

  // Species:
  species CaER in Endoplasmic_Reticulum = 0.76;  // CHEBI:29108
  species CaM in Mitochondria = 0.29;  // CHEBI:29108
  species CaPr in Cytosol = 85.45;  // hasPart CHEBI:29108 kegg.compound:C00017
  species Ca_cyt in Cytosol = 0.35;  // CHEBI:29108
  species Pr in Cytosol = 34.55;  // isVersionOf kegg.compound:C00017

  // Assignment rules:
  observable_task0_model0_marhl_Ca_cyt := Ca_cyt;

  // Reactions:
  Jch: 0.25 CaER => Ca_cyt; Cytosol*(Kch*Ca_cyt^2*(CaER - Ca_cyt)/(K1^2 + Ca_cyt^2));  // isVersionOf GO:0051482 GO:0006816
    Kch = 4100; K1 = 5;
  dissociation_of_CaPr: CaPr => Pr + Ca_cyt; Cytosol*Kminus*CaPr;  // isVersionOf GO:0007204
    Kminus = 0.01;
  binding_of_Ca_on_Pr: Pr + Ca_cyt => CaPr; Cytosol*Kplus*Ca_cyt*Pr;  // isVersionOf GO:0005509 GO:0051481
    Kplus = 0.1;
  Jleak: 0.25 CaER => Ca_cyt; Cytosol*Kleak*(CaER - Ca_cyt);  // isVersionOf GO:0006816 GO:0007204
    Kleak = 0.05;
  Jpump: Ca_cyt => 0.25 CaER; Endoplasmic_Reticulum*Kpump*Ca_cyt;  // isVersionOf GO:0051481 GO:0006816
    Kpump = 20;
  Jout: 0.25 CaM => Ca_cyt; Cytosol*CaM*(Kout*Ca_cyt^2/(K3^2 + Ca_cyt^2) + Km);  // GO:0006816 GO:0007204
    Kout = 125; K3 = 5; Km = 0.00625;
  Jin: Ca_cyt => 0.25 CaM; Mitochondria*(Kin*Ca_cyt^8/(K2^8 + Ca_cyt^8));  // isVersionOf GO:0006816 GO:0051481
    Kin = 300; K2 = 0.8;

  // Unit definitions:
  unit micromole_default = 1e-6 mole; micromole_default is "micromole (default)";
end
