// SBML level 2 version 4

function function_1(substrate, Km, V)
  V*substrate/(Km + substrate);
end
function_1 is "Henri-Michaelis-Menten (irreversible)";

model mellor1()

  // Compartments:
  compartment compartment_1 = 1000;  // isVersionOf GO:0005623

  // Species:
  species LA in compartment_1 = 6.7e-5;  // isVersionOf CHEBI:17351
  species _13HOD_R_E_E in compartment_1 = 0; _13HOD_R_E_E is "13HOD-R(E,E)";  // hasVersion CHEBI:35923
  species _9HOD_S_Z_E in compartment_1 = 0; _9HOD_S_Z_E is "9HOD-S(Z,E)";  // hasVersion CHEBI:35923
  species _9HOD_R_Z_E in compartment_1 = 0; _9HOD_R_Z_E is "9HOD-R(Z,E)";  // hasVersion CHEBI:35923
  species _9HOD_S_E_E in compartment_1 = 0; _9HOD_S_E_E is "9HOD-S(E,E)";  // hasVersion CHEBI:35923
  species _9HOD_R_E_E in compartment_1 = 0; _9HOD_R_E_E is "9HOD-R(E,E)";  // hasVersion CHEBI:35923
  species nHexanal in compartment_1 = 0;  // isVersionOf pubchem.compound:6184
  species _13HOD_S_Z_E in compartment_1 = 0; _13HOD_S_Z_E is "13HOD-S(Z,E)";  // hasVersion CHEBI:35923
  species _13HOD_R_Z_E in compartment_1 = 0; _13HOD_R_Z_E is "13HOD-R(Z,E)";  // hasVersion CHEBI:35923
  species _13HOD_S_E_E in compartment_1 = 0; _13HOD_S_E_E is "13HOD-S(E,E)";  // hasVersion CHEBI:35923

  // Parameters:
  Km_L1 = 0.49; Km_L1 is "Km(L1)";
  Vm_L1 = 0.00825; Vm_L1 is "Vm(L1)";
  Km_L2 = 0.49; Km_L2 is "Km(L2)";
  Vm_L2 = 0.039; Vm_L2 is "Vm(L2)";
  Km_L3 = 0.49; Km_L3 is "Km(L3)";
  Vm_L3 = 0.00255; Vm_L3 is "Vm(L3)";
  Km_HPL = 0.05; Km_HPL is "Km(HPL)";
  Vm_HPL_SZE = 0.285; Vm_HPL_SZE is "Vm(HPL-SZE)";
  var Vm_HPL_RZE; Vm_HPL_RZE is "Vm(HPL-RZE)";

  // Assignment rules:
  Vm_HPL_RZE := 0.135*Vm_HPL_SZE;
  observable_plot4_species_15_datagen1 := task4_model4_mellor1_species_15;
  observable_plot3_species_15_datagen1 := task3_model3_mellor1_species_15;
  observable_plot2_species_15_datagen1 := task2_model2_mellor1_species_15;
  observable_plot1_species_15_datagen1 := task1_model1_mellor1_species_15;
  observable_task0_model0_mellor1_species_15 := nHexanal;

  // Reactions:
  LOX1: LA => 0.004 _9HOD_R_E_E + 0.014 _9HOD_S_E_E + 0.04 _9HOD_R_Z_E + 0.162 _9HOD_S_Z_E + 0.012 _13HOD_R_E_E + 0.05 _13HOD_S_E_E + 0.144 _13HOD_R_Z_E + 0.574 _13HOD_S_Z_E; compartment_1*function_1(LA, Km_L1, Vm_L1);  // isVersionOf GO:0050665
  LOX2: LA => 0.016 _9HOD_R_E_E + 0.018 _9HOD_S_E_E + 0.026 _9HOD_R_Z_E + 0.127 _9HOD_S_Z_E + 0.015 _13HOD_R_E_E + 0.025 _13HOD_S_E_E + 0.023 _13HOD_R_Z_E + 0.751 _13HOD_S_Z_E; compartment_1*function_1(LA, Km_L2, Vm_L2);  // isVersionOf GO:0050665
  LOX3: LA => 0.097 _9HOD_R_E_E + 0.098 _9HOD_S_E_E + 0.218 _9HOD_R_Z_E + 0.218 _9HOD_S_Z_E + 0.107 _13HOD_R_E_E + 0.136 _13HOD_S_E_E + 0.059 _13HOD_R_Z_E + 0.068 _13HOD_S_Z_E; compartment_1*function_1(LA, Km_L3, Vm_L3);  // isVersionOf GO:0050665
  HPL: _13HOD_S_Z_E => nHexanal; compartment_1*function_1(_13HOD_S_Z_E, Km_HPL, Vm_HPL_SZE);
  HPL_RZE: _13HOD_R_Z_E => nHexanal; compartment_1*function_1(_13HOD_R_Z_E, Km_HPL, Vm_HPL_RZE); HPL_RZE is "HPL(RZE)";

  // Unit definitions:
  unit substance = 1e-3 mole;
  unit time = 60 second;
  unit volume = 1e-3 litre;
end
