// SBML level 3 version 1

model miao1()

  // Compartments:
  compartment default = 1;

  // Species:
  species T in default = 32554830;
  species Tm in default = 134173;
  species Tmw in default = 9818;
  species Tw in default = 26180;

  // Parameters:
  kM = 1.51e-9;
  kR = 4.3e-10;
  kW = 1.11e-9;
  qM = 4.15e-9;
  qW = 1.1e-9;
  rho = 0.015;
  rhoM = -0.0229;
  rhoMW = 0.000568;
  rhoW = 0.00713;

  // Assignment rules:
  observable_task0_model0_miao2008_Tm := Tm;
  observable_task0_model0_miao2008_Tmw := Tmw;
  observable_task0_model0_miao2008_Tw := Tw;
  observable_task0_model0_miao2008_T := T;

  // Reactions:
  v1: -> T; rho*T;
  v2: T -> Tm; kM*T*Tm;
  v3: T -> Tw; kW*T*Tw;
  v4: T -> 0.25 Tm + 0.5 Tmw + 0.25 Tw; kR*T*Tmw;
  v5: -> Tm; rhoM*Tm;
  v6: Tm -> Tmw; qM*Tm*Tw;  // modifiers: Tw
  v7: -> Tw; rhoW*Tw;
  v8: Tw -> Tmw; qW*Tm*Tw;  // modifiers: Tm
  v9: -> Tmw; rhoMW*Tmw;
end
