// SBML level 2 version 3

model montanez1()

  // Compartments:
  compartment cytosol = 1;  // GO:0005829
  compartment extracellular = 1;  // GO:0005615

  // Species:
  species $ARGex in extracellular = 330; ARGex is "Arginine ex";  // CHEBI:16467 kegg.compound:C00062
  species ARGin in cytosol = 1; ARGin is "Arginine in";  // CHEBI:16467 kegg.compound:C00062
  species ORN in cytosol = 1; ORN is "Ornithine";  // CHEBI:15729 kegg.compound:C00077

  // Assignment rules:
  observable_task0_model0_montanez1_ARGin := ARGin;
  observable_task0_model0_montanez1_ORN := ORN;

  // Reactions:
  Arginase: ARGin => ORN; cytosol*(Vmaxarg*ARGin/(Kmarg*(1 + ORN/Kioarg) + ARGin));  // isVersionOf ec-code:3.5.3.1 kegg.reaction:R00551 reactome:REACT_394.2 GO:0004053
    Vmaxarg = 110 microMpermin; Kmarg = 1500 microM; Kioarg = 1000 microM;
  Arginine_transport: $ARGex => ARGin; extracellular*(ARGex/(Arginine_transport_Kmhat + ARGex)*(Vmaxhat/(1 + ORN/Arginine_transport_Kiornhat + ARGin/Arginine_transport_Kmhat)) + ARGex/(Arginine_transport_Kmlat + ARGex)*(Vmaxlat/(1 + ORN/Arginine_transport_Kiornhat + ARGin/Arginine_transport_Kmlat)));  // modifiers: ORN; GO:0015326
    Arginine_transport_Kmhat = 70 microM; Vmaxhat = 160.5 microM; Arginine_transport_Kmlat = 847 microM; Vmaxlat = 420 microMpermin; Arginine_transport_Kiornhat = 360 microM;
  NOS: ARGin => ; cytosol*(Vmaxnos1*ARGin/(Kmnos1 + ARGin)); NOS is "Nitric oxide synthase";  // isVersionOf ec-code:1.14.13.39 kegg.reaction:R00557 reactome:REACT_12443.1 GO:0004517
    Vmaxnos1 = 1.33 microMpermin; Kmnos1 = 16 microM;
  ODC: ORN => ; cytosol*(Vmaxodc*ORN/(Kmodc + ORN)); ODC is "Ornithine decarboxylase";  // isVersionOf ec-code:4.1.1.17 kegg.reaction:R00670 reactome:REACT_1211.3 GO:0004586
    Vmaxodc = 0.013 microMpermin; Kmodc = 90 microM;
  Ornithine_efflux: ORN => ; cytosol*(Vmaxefflhat/(1 + ARGex/Ornithine_efflux_Kmhat)*(ORN/(Ornithine_efflux_Kiornhat*(1 + ARGin/Ornithine_efflux_Kmhat) + ORN)) + Vmaxeffllat/(1 + ARGex/Ornithine_efflux_Kmlat)*(ORN/(Kmeffllat*(1 + ARGin/Ornithine_efflux_Kmlat) + ORN)));  // modifiers: ARGex, ARGin; GO:0015326
    Ornithine_efflux_Kmhat = 70 microM; Ornithine_efflux_Kmlat = 847 microM; Vmaxefflhat = 160.5 microMpermin; Vmaxeffllat = 420 microMpermin; Kmeffllat = 847 microM; Ornithine_efflux_Kiornhat = 360 microM;

  // Unit definitions:
  unit time = 60 second;
  unit substance = 1e-6 mole;
  unit microM = 1e-6 mole / litre;
  unit microMpermin = 1e-6 mole / (litre * 60 second);
end
