// SBML level 3 version 1

model naresh2()

  // Compartments:
  compartment default = 1;

  // Species:
  species A in default = 200; A is "AIDS";
  species $EXT in default = 1;
  species I1 in default = 5000; I1 is "Unaware infected";
  species I2 in default = 1000; I2 is "Aware infected";
  species S in default = 3800; S is "Susceptible";

  // Parameters:
  Alpha = 1;
  Beta_1 = 1.5;
  Beta_2 = 0.5;
  Delta_1 = 0.2;
  Delta_2 = 0.1;
  Epsilon = 0.01;
  Mu = 0.02;
  Q_0 = 2000;
  Theta = 0.015;
  k = 1e-5;

  // Assignment rules:
  N := S + I1 + I2 + A;
  observable_task0_model0_naresh2_I1 := I1;
  observable_plot2_I2_datagen1 := task0_model0_naresh2_I2;
  observable_task0_model0_naresh2_A := A;
  observable_plot1_I1_datagen1 := task1_model1_naresh2_I1;
  observable_plot0_I2_datagen1 := task1_model1_naresh2_I2;
  observable_plot3_A_datagen1 := task1_model1_naresh2_A;
  observable_plot2_I1_datagen1 := task2_model2_naresh2_I1;
  observable_task2_model2_naresh2_I2 := I2;
  observable_plot1_A_datagen1 := task2_model2_naresh2_A;

  // Reactions:
  v_1: $EXT -> S; Q_0;
  v_10: I2 -> A; Delta_2*I2;
  v_11: I2 -> $EXT; Mu*I2;
  v_12: A -> $EXT; Alpha*A;
  v_13: A -> $EXT; Mu*A;
  v_2: S -> I1; Beta_1*S*I1/(S + I1 + I2 + A);  // modifiers: A, I2
  v_3: S -> I2; Epsilon*Beta_2*S*I2/(S + I1 + I2 + A);  // modifiers: A, I1
  v_4: S -> $EXT; Mu*S;
  v_5: S -> I1; (1 - Epsilon)*Beta_2*I2*S/(S + I1 + I2 + A);  // modifiers: A, I2
  v_6: I1 -> I2; Theta*I1;
  v_7: I1 -> A; Delta_1*I1;
  v_8: I1 -> $EXT; Mu*I1;
  v_9: I1 -> I2; k*I1*I2;
end
