// SBML level 2 version 4

model panteleev3()

  // Compartments:
  compartment compartment = 1;

  // Species:
  species TFPI in compartment = 2.399999;  // uniprot:P10646
  species VIIa_TF in compartment = 0.9999997;  // hasPart uniprot:P13726 uniprot:P08709
  species VIIa_TF_X in compartment = 0;  // hasPart uniprot:P00742 uniprot:P13726 uniprot:P08709
  species VIIa_TF_Xa in compartment = 0;  // hasPart uniprot:P00742 uniprot:P13726 uniprot:P08709
  species X in compartment = 169.9999;  // uniprot:P00742
  species Xa in compartment = 0;  // uniprot:P00742
  species Xa_TFPI in compartment = 0;  // hasPart uniprot:P10646 uniprot:P00742
  species Xa_TFPI_VIIa_TF in compartment = 0;  // hasPart uniprot:P13726 uniprot:P08709 uniprot:P10646 uniprot:P00742

  // Assignment rules:
  observable_plot5_Xa_datagen3 := task9_model9_panteleev3_Xa;
  observable_plot4_Xa_datagen3 := task8_model8_panteleev3_Xa;
  observable_plot3_Xa_datagen3 := task7_model7_panteleev3_Xa;
  observable_task6_model6_panteleev3_Xa := Xa;
  observable_plot5_Xa_datagen1 := task5_model5_panteleev3_Xa;
  observable_plot4_Xa_datagen1 := task4_model4_panteleev3_Xa;
  observable_plot3_Xa_datagen1 := task3_model3_panteleev3_Xa;
  observable_task2_model2_panteleev3_Xa := Xa;
  observable_task1_model1_panteleev3_Xa := Xa;
  observable_plot0_Xa_datagen3 := task0_model0_panteleev3_Xa;
  observable_plot0_Xa_datagen1 := task0_model0_panteleev3_Xa;

  // Reactions:
  reaction_1: VIIa_TF + X -> VIIa_TF_X; compartment*(reaction_1_k1*X*VIIa_TF - reaction_1_k2*VIIa_TF_X);
    reaction_1_k2 = 770; reaction_1_k1 = 5;
  reaction_2: VIIa_TF_X => VIIa_TF_Xa; compartment*reaction_2_k1*VIIa_TF_X;
    reaction_2_k1 = 420;
  reaction_3: VIIa_TF_Xa -> VIIa_TF + Xa; compartment*(reaction_3_k1*VIIa_TF_Xa - reaction_3_k2*Xa*VIIa_TF);
    reaction_3_k2 = 5; reaction_3_k1 = 770;
  reaction_4: TFPI + Xa -> Xa_TFPI; compartment*(reaction_4_k1*Xa*TFPI - reaction_4_k2*Xa_TFPI);
    reaction_4_k2 = 0.02; reaction_4_k1 = 0.054;
  reaction_5: Xa_TFPI + VIIa_TF -> Xa_TFPI_VIIa_TF; compartment*(reaction_5_k1*VIIa_TF*Xa_TFPI - reaction_5_k2*Xa_TFPI_VIIa_TF);
    reaction_5_k2 = 0.066; reaction_5_k1 = 0.44;

  // Unit definitions:
  unit substance = 1e-9 mole;
  unit time = 60 second;
end
