// SBML level 3 version 1

model perelson2()
  // model units - substance: concentration_per_microlitre, time: day, volume: microlitre

  // Compartments:
  compartment default = 1;

  // Species:
  species T in default = 1000;
  species Tstar in default = 0;
  species Tstarstar in default = 0;
  species Ttot in default = 1000;
  species V in default = 0.001;

  // Parameters:
  N0 = 1000;
  Tmax = 1500;
  k1 = 2.4e-5;
  k2 = 0.003;
  muB = 0.24;
  muT = 0.02;
  muV = 2.4;
  r = 0.03;
  s = 10;
  theta = 1;

  // Assignment rules:
  observable_task0_model0_perelson2_V := V;
  observable_task0_model0_perelson2_T := T;
  observable_task0_model0_perelson2_Tstar := Tstar;
  observable_task0_model0_perelson2_Tstarstar := Tstarstar;

  // Reactions:
  CD4TproductionV: -> V; muB*N0*Tstarstar; CD4TproductionV is "v9";  // modifiers: Tstarstar
  VinfectionCD4T: V + T -> Tstar; k1*T*V; VinfectionCD4T is "v4";
  activationCD4T: Tstar -> Tstarstar; k2*Tstar; activationCD4T is "v6";
  clearanceV: V -> ; muV*V; clearanceV is "v8";
  deathCD4TactiveInfected: Ttot + Tstarstar -> ; muB*Tstarstar; deathCD4TactiveInfected is "v7";
  deathCD4Tplain: T + Ttot -> ; muT*T; deathCD4Tplain is "v3";
  deathCD4TrestingInfected: Ttot + Tstar -> ; muT*Tstar; deathCD4TrestingInfected is "v5";
  growthCD4T: -> T + Ttot; r*T*(1 - Ttot/Tmax); growthCD4T is "v2";
  sourceCD4T: -> T + Ttot; s; sourceCD4T is "v1";

  // Unit definitions:
  unit concentration_per_microlitre = 1;
  unit day = 1;
  unit microlitre = 1;
end
