// SBML level 3 version 1

model perelson1()

  // Compartments:
  compartment default = 1;

  // Species:
  species Tstar in default = 15061.32;
  species V in default = 1860000;
  species Vin in default = 1860000;
  species Vni in default = 0;

  // Parameters:
  NN = 480;
  T0 = 11000;
  c = 2.06;
  delta = 0.53;
  K0 = 3.9e-7;
  noiseParameter1_task0_model0_perelson1_V = 1;

  // Assignment rules:
  sigma_task0_model0_perelson1_V := noiseParameter1_task0_model0_perelson1_V;
  observable_task0_model0_perelson1_V := V;

  // Reactions:
  v1: -> Tstar; K0*T0*Vin;  // modifiers: Vin
  v2: Tstar -> ; delta*Tstar;
  v3: V + Vin -> ; c*Vin;
  v4: V + Vni -> ; c*Vni;
  v5: -> V + Vni; delta*NN*Tstar;  // modifiers: Tstar
end
