// SBML level 2 version 4

model piedrafita1()

  // Compartments:
  compartment env = 1; env is "environment";

  // Species:
  species $S in env = 4;
  species ST in env = 0;
  species STU in env = 5;
  species STUS in env = 0;
  species STUST in env = 0;
  species STUSU in env = 0;
  species SU in env = 0;
  species SUST in env = 0;
  species SUSTU in env = 0;
  species $T in env = 2;
  species $U in env = 1;

  // Parameters:
  k1 = 10 per_time_per_M;
  k10 = 0.05 per_time;
  k10r = 0.05 per_time_per_M;
  k11 has per_time;
  k1r = 10 per_time;
  k2 = 10 per_time_per_M;
  k2r = 10 per_time;
  k3 = 2 per_time;
  k3r = 1 per_time_per_M;
  k4 = 0.3 per_time;
  k5 = 1 per_time_per_M;
  k5r = 1 per_time;
  k6 = 1 per_time_per_M;
  k6r = 1 per_time;
  k7 = 0.1 per_time;
  k7r = 0.1 per_time_per_M;
  k8 has per_time;
  k9 = 0.1 per_time_per_M;
  k9r = 0.05 per_time;

  // Assignment rules:
  k11 := k4;
  k8 := k4;
  observable_task1_model1_piedrafita1_SUSTU := SUSTU;
  observable_task1_model1_piedrafita1_SUST := SUST;
  observable_task1_model1_piedrafita1_SU := SU;
  observable_task1_model1_piedrafita1_STUSU := STUSU;
  observable_task1_model1_piedrafita1_STUST := STUST;
  observable_task1_model1_piedrafita1_STUS := STUS;
  observable_task1_model1_piedrafita1_STU := STU;
  observable_task1_model1_piedrafita1_ST := ST;
  observable_task0_model0_piedrafita1_SUSTU := SUSTU;
  observable_task0_model0_piedrafita1_SUST := SUST;
  observable_task0_model0_piedrafita1_SU := SU;
  observable_task0_model0_piedrafita1_STUSU := STUSU;
  observable_task0_model0_piedrafita1_STUST := STUST;
  observable_task0_model0_piedrafita1_STUS := STUS;
  observable_task0_model0_piedrafita1_STU := STU;
  observable_task0_model0_piedrafita1_ST := ST;

  // Reactions:
  reaction1: STU + $S -> STUS; env*(k1*S*STU - k1r*STUS);
  reaction10: STUSU -> SU + STU; env*(k10*STUSU - k10r*STU*SU);
  reaction11: ST => ; env*k11*ST;
  reaction2: STUS + $T -> STUST; env*(k2*T*STUS - k2r*STUST);
  reaction3: STUST -> STU + ST; env*(k3*STUST - k3r*ST*STU);
  reaction4: STU => ; env*k4*STU;
  reaction5: ST + SU -> SUST; env*(k5*ST*SU - k5r*SUST);
  reaction6: SUST + $U -> SUSTU; env*(k6*U*SUST - k6r*SUSTU);
  reaction7: SUSTU -> SU + STU; env*(k7*SUSTU - k7r*STU*SU);
  reaction8: SU => ; env*k8*SU;
  reaction9: STUS + $U -> STUSU; env*(k9*U*STUS - k9r*STUSU);

  // Unit definitions:
  unit per_time_per_M = litre / (second * mole);
  unit per_time = 1 / second;
  unit sec = second;
end
