// SBML level 2 version 4

model saeidi1()

  // Compartments:
  compartment default = 1 volume;

  // Species:
  substanceOnly species Ptet_LasR in default = 1e-5; Ptet_LasR is "Ptet-LasR";
  substanceOnly species pLuxR in default = 1e-5;
  species A_pLux in default = 0;  // isVersionOf GO:0000428
  substanceOnly species LasR in default = 1e-6;  // uniprot:P25084
  substanceOnly species mRNA_LasR in default = 0; mRNA_LasR is "mRNA(LasR)";  // isVersionOf CHEBI:33699
  substanceOnly species sa3_degraded in default = 0;
  species _3OC12HSL in default = 5e-6;  // CHEBI:56080
  species LasR_AHL in default = 0; LasR_AHL is "LasR/AHL";  // isVersionOf GO:0005667
  species GFP in default = 0;  // uniprot:P42212
  species sa6_degraded in default = 0;

  // Assignment rules:
  observable_plot2_s45_datagen1 := task2_model2_saeidi1_s45;
  observable_plot1_s45_datagen1 := task1_model1_saeidi1_s45;
  observable_task0_model0_saeidi1_s45 := GFP;

  // Reactions:
  re1: Ptet_LasR => mRNA_LasR; k1*Ptet_LasR - Y1*mRNA_LasR;  // isVersionOf GO:0009299
    Y1 = 0.348 substance; k1 = 3.734 substance;
  re14: A_pLux => GFP; (K7 + K8*A_pLux^n1/(K9^n1 + A_pLux^n1))*(k10 + K11*A_pLux^n2/(K12^n2 + A_pLux^n2) - GFP);  // isVersionOf GO:0006412
    n2 = 2 substance; n1 = 2 substance; K12 = 2.4e-7 substance; K11 = 1e-14 substance; k10 = 6.5e-16 substance; K9 = 9.742e-8 substance; K8 = 0.009567 substance; K7 = 0.004051 substance;
  re2: mRNA_LasR => LasR; k2*mRNA_LasR;  // isVersionOf GO:0006412
    k2 = 35.7 substance;
  re3: LasR => sa3_degraded; Y2*LasR;  // isVersionOf GO:0030163
    Y2 = 0.0696 substance;
  re4: _3OC12HSL + LasR => LasR_AHL; LasR*_3OC12HSL*k3 - k4*LasR_AHL;  // isVersionOf GO:0008134
    k4 = 0 substance; k3 = 9600000 substance;
  re5: pLuxR + LasR_AHL => A_pLux; pLuxR*LasR_AHL*k5 - k6*A_pLux;  // isVersionOf GO:0010843
    k6 = 10.2 substance; k5 = 1960000 substance;
  re8: _3OC12HSL => sa6_degraded; Y3*_3OC12HSL;
    Y3 = 0.0002832 substance;

  // Unit definitions:
  unit time = second;
  unit length = metre;
  unit area = metre^2;
  unit volume = litre;
  unit substance = mole;
end
