// SBML level 2 version 4

function function_4_10_1(K10, k10, P3, M_P, M_PP)
  k10*P3*M_P/K10/(1 + M_PP/K10 + M_P/K10);
end

function function_4_9_1(K9, k9, P3, M_P, M_PP)
  k9*P3*M_PP/K9/(1 + M_PP/K9 + M_P/K9);
end

function function_4_6_1(K6, k6, MKK_P, MKK_PP, P2)
  k6*P2*MKK_P/K6/(1 + MKK_PP/K6 + MKK_P/K6);
end

function function_4_5_1(K5, k5, MKK_P, MKK_PP, P2)
  k5*P2*MKK_PP/K5/(1 + MKK_PP/K5 + MKK_P/K5);
end

function function_4_2_1(K2, k2, MKKK_P, P1)
  k2*P1*MKKK_P/K2/(1 + MKKK_P/K2);
end

function function_4_8_1(K8, k8, MKK_PP, M, M_P)
  k8*MKK_PP*M_P/K8/(1 + M/K8 + M_P/K8);
end

function function_4_7_1(K7, k7, MKK_PP, M, M_P)
  k7*MKK_PP*M/K7/(1 + M/K7 + M_P/K7);
end

function function_4_4_1(A, K4, Ka, k4, MKKK_P, MKK, MKK_P, M_PP)
  k4*MKKK_P*MKK_P/K4/(1 + MKK_P/K4 + MKK/K4)*((1 + A*M_PP/Ka)/(1 + M_PP/Ka));
end

function function_4_3_1(A, K3, Ka, k3, MKKK_P, MKK, MKK_P, M_PP)
  k3*MKKK_P*MKK/K3/(1 + MKK/K3 + MKK_P/K3)*((1 + A*M_PP/Ka)/(1 + M_PP/Ka));
end

function function_4_1_1(K1, KI, V1, MKKK, M_PP)
  V1*MKKK/K1/((1 + MKKK/K1)*(1 + M_PP/KI));
end

model sarma5()

  // Compartments:
  compartment compartment_0 = 1;  // GO:0005623

  // Species:
  species MKKK in compartment_0 = 999.9999;  // isVersionOf uniprot:P04049
  species MKKK_P in compartment_0 = 0;  // isVersionOf kegg.compound:C00562 uniprot:P04049
  species P3 in compartment_0 = 500;  // isVersionOf uniprot:P51452
  species MKK in compartment_0 = 4000;  // isVersionOf uniprot:Q02750
  species MKK_P in compartment_0 = 0;  // isVersionOf kegg.compound:C00562 uniprot:Q02750
  species MKK_PP in compartment_0 = 0;  // isVersionOf kegg.compound:C00562 uniprot:Q02750
  species M in compartment_0 = 999.9999;  // isVersionOf uniprot:P28482
  species M_P in compartment_0 = 0;  // isVersionOf kegg.compound:C00562 uniprot:P28482
  species M_PP in compartment_0 = 0;  // isVersionOf kegg.compound:C00562 uniprot:P28482
  species P1 in compartment_0 = 99.99999;  // isVersionOf uniprot:P51452
  species P2 in compartment_0 = 500;  // isVersionOf uniprot:P51452

  // Assignment rules:
  observable_task0_model0_sarma5_species_7 := M_PP;
  observable_task0_model0_sarma5_species_4 := MKK_PP;
  observable_task0_model0_sarma5_species_1 := MKKK_P;

  // Reactions:
  _1: MKKK => MKKK_P; compartment_0*function_4_1_1(K1, KI, V1, MKKK, M_PP);  // modifiers: M_PP; isVersionOf GO:0016310
    V1 = 2.5; KI = 9; K1 = 20;
  _3: MKK => MKK_P; compartment_0*function_4_3_1(_3_A, K3, _3_Ka, k3, MKKK_P, MKK, MKK_P, M_PP);  // modifiers: M_PP, MKKK_P; isVersionOf GO:0016310
    k3 = 0.1; _3_Ka = 500; K3 = 20; _3_A = 10;
  _4: MKK_P => MKK_PP; compartment_0*function_4_4_1(_4_A, K4, _4_Ka, k4, MKKK_P, MKK, MKK_P, M_PP);  // modifiers: M_PP, MKK, MKKK_P; isVersionOf GO:0016310
    k4 = 0.1; _4_Ka = 500; K4 = 20; _4_A = 10;
  _7: M => M_P; compartment_0*function_4_7_1(K7, k7, MKK_PP, M, M_P);  // modifiers: MKK_PP; isVersionOf GO:0016310
    k7 = 0.1; K7 = 20;
  _8: M_P => M_PP; compartment_0*function_4_8_1(K8, k8, MKK_PP, M, M_P);  // modifiers: M, MKK_PP; isVersionOf GO:0016310
    k8 = 0.1; K8 = 20;
  _2: MKKK_P => MKKK; compartment_0*function_4_2_1(K2, k2, MKKK_P, P1);  // modifiers: P1; isVersionOf GO:0016311
    k2 = 0.025; K2 = 200;
  _5: MKK_PP => MKK_P; compartment_0*function_4_5_1(K5, k5, MKK_P, MKK_PP, P2);  // modifiers: P2; isVersionOf GO:0016311
    k5 = 0.1; K5 = 200;
  _6: MKK_P => MKK; compartment_0*function_4_6_1(K6, k6, MKK_P, MKK_PP, P2);  // modifiers: P2, MKK_PP; isVersionOf GO:0016311
    k6 = 0.1; K6 = 200;
  _9: M_PP => M_P; compartment_0*function_4_9_1(K9, k9, P3, M_P, M_PP);  // modifiers: P3, M; isVersionOf GO:0016311
    k9 = 0.1; K9 = 200;
  _10: M_P => M; compartment_0*function_4_10_1(K10, k10, P3, M_P, M_PP);  // modifiers: M_PP, P3; isVersionOf GO:0016311
    k10 = 0.1; K10 = 200;

  // Unit definitions:
  unit substance = 1e-9 mole;
  unit volume = 1e-3 litre;
end
