// SBML level 3 version 1

model teusink2()

  // Compartments:
  compartment default_compartment = 1;

  // Species:
  species ATP in default_compartment = 4;  // kegg.compound:C00002 CHEBI:15422
  species Fru16P2 in default_compartment = 1; Fru16P2 is "fructose 1,6-bisphosphate";  // CHEBI:16905 kegg.compound:C00354
  species $Glc in default_compartment = 10; Glc is "glucose";  // CHEBI:17925 kegg.compound:C00293
  species HMP in default_compartment = 0.1; HMP is "hexose monophosphate";  // CHEBI:16084 CHEBI:17665

  // Parameters:
  EXTERNAL = 0;
  KADP = 0.1;
  KATP = 0.15;
  KATP3 = 3;
  KFru16P2 = 1;
  KGlc = 1;
  KRATP = 0.06;
  KRHMP = 1;
  KiATP = 10;
  KiTre6P = 4.422;
  L0 = 1000;
  VATPase = 68;
  VHK = 68;
  VPFK = 30;
  Vlower = 20;
  c1 = 0.0005;
  c2 = 1;
  ci = 10;
  gR = 10;
  gT = 1;
  wildtype = 1;

  // Assignment rules:
  observable_task0_model0_teusink2_v_4 := task0_model0_teusink2_v_4;
  observable_task0_model0_teusink2_v_3 := task0_model0_teusink2_v_3;
  observable_task0_model0_teusink2_v_2 := task0_model0_teusink2_v_2;
  observable_task0_model0_teusink2_v_1 := task0_model0_teusink2_v_1;
  observable_task0_model0_teusink2_ATP := ATP;
  observable_task0_model0_teusink2_HMP := HMP;
  observable_task0_model0_teusink2_Fru16P2 := Fru16P2;

  // Reactions:
  hexokinase: ATP + $Glc -> HMP; Glc*VHK*ATP/(KATP*KGlc*(1 + ATP/KATP)*(1 + Glc/KGlc + wildtype*HMP^2/KiTre6P));  // reactome:REACT_1318 interpro:IPR001312
  phosphofructokinase: ATP + HMP -> Fru16P2; gR*VPFK*ATP*HMP*(1 + ATP/KRATP + HMP/KRHMP + gR*ATP*HMP/(KRATP*KRHMP))/(KRATP*KRHMP*((1 + ATP/KRATP + HMP/KRHMP + gR*ATP*HMP/(KRATP*KRHMP))^2 + L0*(1 + ci*ATP/KiATP)^2*(1 + c2*ATP/KRATP + c1*HMP/KRHMP + c1*c2*gT*ATP*HMP/(KRATP*KRHMP))^2/(1 + ATP/KiATP)^2));  // reactome:REACT_1840 interpro:IPR022953
  lower: Fru16P2 -> 4 ATP; Vlower*(5 - ATP)*Fru16P2/(KADP*KFru16P2*(1 + (5 - ATP)/KADP)*(1 + Fru16P2/KFru16P2));  // ec-code:5.3.1.1 ec-code:2.7.1.40 ec-code:2.7.2.3 ec-code:4.2.1.11
  ATPase: ATP -> ; VATPase*ATP/(KATP3 + ATP);  // GO:0016887 interpro:IPR020958
end
