// SBML level 2 version 1

model tiago2()

  // Compartments:
  compartment Organism = 1;
  compartment default = 1; default is "Environment";  // isVersionOf GO:0043245

  // Species:
  species iron_in_Plasma in Organism = 0;
  species iron_ions_Outside in default = 0;
  species iron_in_Heart in Organism = 0;
  species iron_in_Lungs in Organism = 0;
  species iron_in_Kidneys in Organism = 0;
  species iron_in_Testes in Organism = 0;
  species iron_in_Stomach in Organism = 0;
  species iron_in_Fat in Organism = 0;
  species iron_in_Brain in Organism = 0;
  species iron_in_Bone_Marrow in Organism = 0;
  species iron_in_RBC in Organism = 0;
  species iron_in_Spleen in Organism = 0;
  species iron_in_Liver in Organism = 0;
  species iron_in_Muscle in Organism = 0;
  species iron_in_Duodenum in Organism = 0;
  species iron_in_Integument in Organism = 0;
  species iron_in_Intestine in Organism = 0;

  // Assignment rules:
  observable_task0_model0_tiago2_s17 := iron_in_Brain;
  observable_task0_model0_tiago2_s15 := iron_in_Stomach;
  observable_task0_model0_tiago2_s16 := iron_in_Fat;
  observable_task0_model0_tiago2_s13 := iron_in_Kidneys;
  observable_task0_model0_tiago2_s14 := iron_in_Testes;
  observable_task0_model0_tiago2_s12 := iron_in_Lungs;
  observable_task0_model0_tiago2_s8 := iron_in_Integument;
  observable_task0_model0_tiago2_s11 := iron_in_Heart;

  // Reactions:
  re1: iron_in_Plasma => iron_in_Bone_Marrow; iron_in_Plasma*re1_k1;
    re1_k1 = 12.67032;
  re10: iron_in_Plasma => iron_in_Duodenum; iron_in_Plasma*re10_k1;
    re10_k1 = 0.042900396;
  re11: iron_in_Plasma => iron_in_Intestine; iron_in_Plasma*re11_k1;
    re11_k1 = 0.899045295;
  re12: iron_in_Plasma => iron_in_Integument; iron_in_Plasma*re12_k1;
    re12_k1 = 1.144131;
  re14: iron_in_Intestine => iron_ions_Outside; iron_in_Intestine*re14_k1;
    re14_k1 = 0.355490081;
  re15: iron_in_Integument => iron_ions_Outside; iron_in_Integument*re15_k1;
    re15_k1 = 0.043759386;
  re16: iron_in_Plasma => iron_in_Heart; iron_in_Plasma*re16_k1;
    re16_k1 = 0.134371419;
  re17: iron_in_Heart => iron_in_Plasma; iron_in_Heart*re17_k1;
    re17_k1 = 0.076683565;
  re18: iron_in_Plasma => iron_in_Lungs; iron_in_Plasma*re18_k1;
    re18_k1 = 0.304695409;
  re19: iron_in_Lungs => iron_in_Plasma; iron_in_Lungs*re19_k1;
    re19_k1 = 0.192119917;
  re2: iron_in_Bone_Marrow => iron_in_RBC; iron_in_Bone_Marrow*re2_k1;
    re2_k1 = 1.067151;
  re22: iron_in_Plasma => iron_in_Kidneys; iron_in_Plasma*re22_k1;
    re22_k1 = 0.445547231;
  re23: iron_in_Kidneys => iron_in_Plasma; iron_in_Kidneys*re23_k1;
    re23_k1 = 0.201360515;
  re24: iron_in_Plasma => iron_in_Testes; iron_in_Plasma*re24_k1;
    re24_k1 = 0.054570911;
  re25: iron_in_Testes => iron_in_Plasma; iron_in_Testes*re25_k1;
    re25_k1 = 0.093227796;
  re26: iron_in_Plasma => iron_in_Stomach; iron_in_Plasma*re26_k1;
    re26_k1 = 0.121370929;
  re28: iron_in_Plasma => iron_in_Fat; iron_in_Plasma*re28_k1;
    re28_k1 = 0.044747636;
  re29: iron_in_Fat => iron_in_Plasma; iron_in_Fat*re29_k1;
    re29_k1 = 0.125873837;
  re3: iron_in_RBC => iron_in_Spleen; iron_in_RBC*re3_k1;
    re3_k1 = 0.061112865;
  re30: iron_in_Plasma => iron_in_Brain; iron_in_Plasma*re30_k1;
    re30_k1 = 0.031742475;
  re31: iron_in_Brain => iron_in_Plasma; iron_in_Brain*re31_k1;
    re31_k1 = 0.060942602;
  re32: iron_in_Duodenum => iron_in_Plasma; re32_k1*iron_in_Duodenum;
    re32_k1 = 0.42;
  re33: iron_in_Stomach => iron_ions_Outside; re33_k1*iron_in_Stomach;
    re33_k1 = 0.37;
  re4: iron_in_Spleen => iron_in_Plasma; iron_in_Spleen*re4_k1;
    re4_k1 = 7.27706671;
  re5: iron_in_Bone_Marrow => iron_in_Spleen; iron_in_Bone_Marrow*re5_k1;
    re5_k1 = 0.100527605;
  re6: iron_in_Plasma => iron_in_Liver; iron_in_Plasma*re6_k1;
    re6_k1 = 2.613229;
  re7: iron_in_Liver => iron_in_Plasma; iron_in_Liver*re7_k1;
    re7_k1 = 0.137763703;
  re8: iron_in_Plasma => iron_in_Muscle; iron_in_Plasma*re8_k1;
    re8_k1 = 1.493333;
  re9: iron_in_Muscle => iron_in_Plasma; iron_in_Muscle*re9_k1;
    re9_k1 = 0.154446568;
end
