// SBML level 3 version 1

model zhao1()

  // Compartments:
  compartment default = 1;

  // Species:
  species $EXT in default = 1;
  species I in default = 149400; I is "Infected";
  species Ip in default = 16600; Ip is "Infected on PrEP";
  species S in default = 667200; S is "Susceptible";
  species Sp in default = 166800; Sp is "Susceptible on PrEP";

  // Parameters:
  Lambda = 38094;
  alphai = 0.5;
  alphas = 0.5;
  ba = 0.003;
  d = 0.1302;
  k = 0.2;
  mu = 0.025;
  n = 65.8494;

  // Assignment rules:
  N := Sp + S + Ip + I;
  beta := 1 - (1 - ba)^n;
  observable_task0_model0_zhao1_I := I;
  observable_task0_model0_zhao1_S := S;
  observable_task0_model0_zhao1_Sp := Sp;
  observable_task0_model0_zhao1_Ip := Ip;

  // Reactions:
  v_1: $EXT -> Sp; k*Lambda;
  v_10: I -> $EXT; d*I;
  v_2: Sp -> Ip; ((1 - alphas)*beta*I/N + (1 - alphas)*(1 - alphai)*beta*Ip/N)*Sp;  // modifiers: I
  v_3: Sp -> $EXT; mu*Sp;
  v_4: $EXT -> S; (1 - k)*Lambda;
  v_5: S -> I; (beta*I/N + (1 - alphai)*beta*Ip/N)*S;  // modifiers: Ip
  v_6: S -> $EXT; mu*S;
  v_7: Ip -> $EXT; mu*Ip;
  v_8: Ip -> $EXT; d*Ip;
  v_9: I -> $EXT; mu*I;
end
