// SBML level 2 version 1

model zi1()

  // Compartments:
  compartment V_cyt = 0.00105; V_cyt is "Cytoplasm";  // GO:0005737
  compartment V_medium = 1; V_medium is "Medium";  // GO:0005576
  compartment V_nuc = 0.00035; V_nuc is "Nucleus";  // GO:0005634

  // Species:
  species LRC_Cave in V_cyt = 0;  // hasPart uniprot:P01137 uniprot:Q8NER5 uniprot:P37173
  species LRC_EE in V_cyt = 0;  // hasPart uniprot:P01137 uniprot:Q8NER5 uniprot:P37173
  species LRC_Surf in V_cyt = 0;  // hasPart uniprot:P01137 uniprot:Q8NER5 uniprot:P37173
  species Smad2c in V_cyt = 492.61;  // isVersionOf uniprot:Q15796
  species Smad2n in V_nuc = 236.45;  // isVersionOf uniprot:Q15796
  species Smad4c in V_cyt = 1149.4;  // isVersionOf uniprot:Q13485
  species Smad4n in V_nuc = 551.72;  // isVersionOf uniprot:Q13485
  species Smads_Complex_c in V_cyt = 0;  // hasPart uniprot:Q15796 uniprot:Q13485
  species Smads_Complex_n in V_nuc = 0;  // hasPart uniprot:Q15796 uniprot:Q13485
  species T1R_Cave in V_cyt = 2.092;  // isVersionOf uniprot:Q8NER5
  species T1R_EE in V_cyt = 2.06;  // isVersionOf uniprot:Q8NER5
  species T1R_Surf in V_cyt = 0.237;  // isVersionOf uniprot:Q8NER5
  species T2R_Cave in V_cyt = 1.778;  // isVersionOf uniprot:P37173
  species T2R_EE in V_cyt = 1.148;  // isVersionOf uniprot:P37173
  species T2R_Surf in V_cyt = 0.202;  // isVersionOf uniprot:P37173
  species TGF_beta in V_medium = 0.08;  // isVersionOf uniprot:P01137

  // Parameters:
  Kcd = 0.005;
  Kdeg_T1R_EE = 0.005;
  Kdeg_T2R_EE = 0.025;
  Kdiss_Smads_Complex_n = 0.1174;
  Kexp_Smad2n = 1;
  Kexp_Smad4n = 0.5;
  Kimp_Smad2c = 0.16;
  Kimp_Smad4c = 0.08;
  Kimp_Smads_Complex_c = 0.16;
  Klid = 0.02609;
  k_LRC = 2197;
  k_Smads_Complex_c = 6.85e-5;
  ki_Cave = 0.33;
  ki_EE = 0.33;
  kr_Cave = 0.03742;
  kr_EE = 0.033;
  v_T1R = 0.0103;
  v_T2R = 0.02869;

  // Assignment rules:
  Total_Smad2c := Smad2c + Smads_Complex_c;
  Total_Smad2n := Smad2n + Smads_Complex_n;
  observable_task0_model0_zi1_Total_Smad2n := Total_Smad2n;
  observable_task0_model0_zi1_Total_Smad2c := Total_Smad2c;

  // Reactions:
  R10_T1R_EE_degradation: T1R_EE => ; V_cyt*Kdeg_T1R_EE*T1R_EE;  // isVersionOf GO:0031623
  R11_T2R_production: => T2R_Surf; V_cyt*v_T2R;  // isVersionOf GO:0032906
  R12_T2R_Cave_formation: T2R_Surf => T2R_Cave; V_cyt*ki_Cave*T2R_Surf;  // isVersionOf GO:0002090
  R13_T2R_Cave_recycling: T2R_Cave => T2R_Surf; V_cyt*kr_Cave*T2R_Cave;  // isVersionOf GO:0002090
  R14_T2R_EE_formation: T2R_Surf => T2R_EE; V_cyt*ki_EE*T2R_Surf;  // isVersionOf GO:0031623
  R15_T2R_EE_recycling: T2R_EE => TGF_beta + T2R_Surf; V_cyt*kr_EE*T2R_EE;  // isVersionOf GO:0002090
  R16_T2R_EE_degradation: T2R_EE => ; V_cyt*Kdeg_T2R_EE*T2R_EE;  // isVersionOf GO:0031623
  R17_LRC_formation: T1R_Surf + T2R_Surf + TGF_beta => LRC_Surf; V_cyt*k_LRC*TGF_beta*T2R_Surf*T1R_Surf;  // isVersionOf GO:0005160
  R18_LRC_Cave_formation: LRC_Surf => LRC_Cave; V_cyt*ki_Cave*LRC_Surf;  // isVersionOf GO:0017015
  R19_LRC_Cave_recycling: LRC_Cave => T2R_Surf + TGF_beta + T1R_Surf; V_cyt*kr_Cave*LRC_Cave;  // isVersionOf GO:0017015
  R1_Smad2_import: Smad2c => Smad2n; V_cyt*Kimp_Smad2c*Smad2c;  // GO:0007184
  R20_LRC_EE_formation: LRC_Surf => LRC_EE; V_cyt*ki_EE*LRC_Surf;  // isVersionOf GO:0017015
  R21_LRC_EE_recycling: LRC_EE => TGF_beta + T2R_Surf + T1R_Surf; V_cyt*kr_EE*LRC_EE;  // isVersionOf GO:0017015
  R22_LRC_EE_degradation: LRC_EE => ; V_cyt*Kcd*LRC_EE;  // isVersionOf GO:0017015
  R23_Smads_Complex_formation: Smad4c + Smad2c => Smads_Complex_c; V_cyt*k_Smads_Complex_c*Smad2c*Smad4c*LRC_EE;  // modifiers: LRC_EE; GO:0007184
  R24_Smads_Complex_import: Smads_Complex_c => Smads_Complex_n; V_cyt*Kimp_Smads_Complex_c*Smads_Complex_c;  // isVersionOf GO:0007184
  R25_Smads_Complex_Dissociation: Smads_Complex_n => Smad2n + Smad4n; V_nuc*Kdiss_Smads_Complex_n*Smads_Complex_n;
  R26_LRC_Cave_degradation: LRC_Cave => ; V_cyt*Klid*LRC_Cave*Smads_Complex_n;  // modifiers: Smads_Complex_n; isVersionOf GO:0030163
  R2_Smad2_export: Smad2n => Smad2c; V_nuc*Kexp_Smad2n*Smad2n;  // isVersionOf GO:0006886
  R3_Smad4_import: Smad4c => Smad4n; V_cyt*Kimp_Smad4c*Smad4c;  // GO:0007184
  R4_Smad4_export: Smad4n => Smad4c; V_nuc*Kexp_Smad4n*Smad4n;  // isVersionOf GO:0006886
  R5_T1R_production: => T1R_Surf; V_cyt*v_T1R;  // isVersionOf GO:0032905
  R6_T1R_Cave_formation: T1R_Surf => T1R_Cave; V_cyt*ki_Cave*T1R_Surf;  // isVersionOf GO:0002090
  R7_T1R_Cave_recycling: T1R_Cave => T1R_Surf; V_cyt*kr_Cave*T1R_Cave;  // isVersionOf GO:0002090
  R8_T1R_EE_formation: T1R_Surf => T1R_EE; V_cyt*ki_EE*T1R_Surf;  // isVersionOf GO:0002090
  R9_T1R_EE_recycling: T1R_EE => T1R_Surf; V_cyt*kr_EE*T1R_EE;  // isVersionOf GO:0002090

  // Unit definitions:
  unit nano_mole = 1e-9 mole;
  unit minute = 60 second;
end
